Simulations: Version=79
  Memo TitlePage
    # The APSIM Grapevine Model

    ZHU, J., Brown, H.E., Parker, A.K.,Trought, M.C.T.

    ##Building the model.
    The APSIM Grapevine model has been adapted from the potato model [Brown_etal_2011] and developed using the Plant Modelling Framework (PMF) of [brown_plant_2014]. This new framework provides a library of plant organ and process submodels that can be coupled, at runtime, to construct a model in much the same way that models can be coupled to construct a simulation. This means that dynamic composition of lower level process and organ classes (e.g. photosynthesis, leaf) into larger constructions (e.g. maize, wheat, sorghum) can be achieved by the model developer without additional coding.

    The model consists of:
    * a phenology model to simulate development between growth phases
    * a structure model to simulate plant morphology
    * a collection of organs to simulate the various plant parts
    * an arbitrator to allocate resources (N, biomass) to the various plant organs

    ##Pecularities of Grapevine
    Grapevine is a challenging crop to model because it is a perennial woody plant.
    A budding phase was added for simulating the start of the vegetative phase. This budding phase was similar to the emergence phase for annual crop.
    There are an enormous number of Grapevine cultivars and trainning systems. They differ in phenology and vegetative growth.

    ##Including a Grapevine crop in an APSIM simulation
    To indluce a Grapevine crop in a simulation the grapevine plant needs to be added to the vineyard, field or zone in which it is to be grown.  This can be done by right clicking on the vineyard, selecting Add from the drop down menu and then selecting Plant from the list that comes up.
    ###Setting plant density and bud number (budNumber number and early canopy growth)
    The Grapevine Management script sets the number of stems that will appear from plant.
    ###Setting final leaf number (Crop duration)
    The duration of a Grapevine crop is determined by the number of leaves that the mainstem produces and how long it takes for these to appear and seness.
  Replacements
    Plant Grapevine: CropType=Grapevine; IsEnding=false; DaysAfterEnding=0
      Cultivar SauvignonBlanc
      Phenology
        Memo
          Dormancy sequence: Paradormancy (Apical dominance), Endodormancy(Chilling requirement), Ecodormancy (forcing unit)
          Sarvas (1974) separates bud dormancy in two periods: the "rest" period is defined as the period when buds are dormant due to physiological conditions (endodormancy), and the "quiescence" period is when buds remain dormant due to unfavourable environmental conditions (ecodormancy). The current phenological models assume the dormancy starts at March 1st, and budburst is regulated by temperature. Ecodormancy is induced by a period with chilling temperatures, and then followed by a period with forcing temperatures till bud burst (Chuine et al., 2003).

          We then simulated the time of flowering, fruitSet,veraison, leaf fall. After one cycle, bud goes to dormancy at March 1st.

          Paradormancy, which is the suspension of growth caused by factors outside the meristem but within the plant. It is typically an influence of one organ over another, and includes an apical bud preventing outgrowth of a lower bud, which relates to apical dominance (see Martin 1987 for review).
        WangEngelTempFunction ThermalTime: MinTemp=4; OptTemp=28; MaxTemp=40; RefTemp=25; MaximumTemperatureWeighting=0.5
        GenericPhase EndoDormancy: Start=Endodormancy; End=Ecodormancy
          SubtractFunction Target
            Constant BaseTarget: FixedValue=6; Units=days
            VariableReference AccChillMar1st: VariableName=[Phenology].AccChillMar1st
          AirTemperatureFunction Progression
            XYPairs: X=[0, 2, 4, 8, 20]; Y=[1, 1, 0.91, 0, 0]
        GenericPhase Budding: Start=Ecodormancy; End=BudBurst
          WangEngelTempFunction Progression: MinTemp=0; OptTemp=22; MaxTemp=40; RefTemp=25; MaximumTemperatureWeighting=0.5
          Constant Target: FixedValue=75; Units=days
        GenericPhase Flowering: Start=BudBurst; End=Flowering
          Constant Target: FixedValue=28
          VariableReference Progression: VariableName=[Phenology].ThermalTime
        GenericPhase BerryDevelopment: Start=Flowering; End=Veraison
          MultiplyFunction Target
            Constant Base: FixedValue=40
            LinearInterpolationFunction LAIAdjustment
              XYPairs: X=[0, 1, 2, 3, 4, 5]; Y=[1, 1, 1, 1, 1, 1]
              VariableReference XValue: VariableName=[Grapevine].Leaf.LAI
          VariableReference Progression: VariableName=[Phenology].ThermalTime
        LeafDeathPhase: Start=Veraison; End=LeafFall
          VariableReference ThermalTime: VariableName=[Phenology].ThermalTime
        GotoPhase: Start=LeafFall; End=Unused; PhaseNameToGoto=EndoDormancy
        OnEventFunction BudBurstDOY: SetEvent=BudBurst; ReSetEvent=Endodormancy
          Memo
            A function is used to provide flowering date as days after sowing(DAS).
          Constant PreEventValue: FixedValue=0
          VariableReference PostEventValue: VariableName=[Clock].Today.DayOfYear
          VariableReference PostEventValue1: VariableName=[Grapevine].DOYFromJuly1st
        OnEventFunction FloweringDOY: SetEvent=Flowering; ReSetEvent=Endodormancy
          Memo
            A function is used to provide flowering date as days after sowing(DAS).
          Constant PreEventValue: FixedValue=0
          VariableReference PostEventValue: VariableName=[Phenology].DoyJuly1st
          VariableReference PostEventValue1: VariableName=[Clock].Today.DayOfYear
        OnEventFunction VeraisonDOY: SetEvent=Veraison; ReSetEvent=Endodormancy
          Memo
            A function is used to provide flowering date as days after sowing(DAS).
          Constant PreEventValue: FixedValue=0
          VariableReference PostEventValue: VariableName=[Clock].Today.DayOfYear
        OnEventFunction CurrentSeason: SetEvent=BudBurst; ReSetEvent=Endodormancy
          Memo
            A function is used to capture the year of the current season as in the south hemisphere the growing season extends to the second year.
          Constant PreEventValue: FixedValue=0
          VariableReference PostEventValue: VariableName=[Clock].Today.Year
        AccumulateByDate DoyJuly1st: StartDate=01-JUL; EndDate=30-JUN; ResetDate=30-JUN
          Constant Days: FixedValue=1; Units=days/day
        AccumulateByDate AccChillMar1st: StartDate=01-MAR; EndDate=1-MAY; ResetDate=30-JUN
          VariableReference ThermalTime: VariableName=[Phenology].EndoDormancy.Progression
      Structure: CohortInitialisationStage=Ecodormancy; LeafInitialisationStage=BudBurst
        MultiplyFunction ThermalTime
          Constant RefTem: FixedValue=25
          WangEngelTempFunction TempRes: MinTemp=10; OptTemp=25; MaxTemp=37; RefTemp=25; MaximumTemperatureWeighting=0.5
        PhaseLookupValue MainStemPrimordiaInitiationRate: Start=BudBurst; End=Veraison
          Constant: FixedValue=20; Units=degree day
        PhaseLookupValue Phyllochron: Start=BudBurst; End=Veraison
          MultiplyFunction
            Constant: FixedValue=30
            LinearInterpolationFunction
              XYPairs: X=[1, 5, 10, 24]; Y=[0.5, 0.5, 0.7, 1]
              VariableReference XValue: VariableName=[Leaf].AppearedCohortNo
        Constant FinalLeafNumber: FixedValue=30; Units=number
        MultiplyFunction BranchingRate
          LinearInterpolationFunction Potential_Branching_Rate
            XYPairs: X=[0, 7, 8, 13, 14, 34]; Y=[0, 0, 0, 0, 0, 0]
            VariableReference XValue: VariableName=[Structure].LeafTipsAppeared
          LinearInterpolationFunction
            XYPairs: X=[0, 0.4, 0.55, 0.8, 1]; Y=[1, 1, 0.45, 0, 0]
            VariableReference XValue: VariableName=[Leaf].CoverGreen
        Constant BranchMortality: FixedValue=0
        Constant DroughtInducedBranchMortality: FixedValue=0
        Constant StemSenescenceAge: FixedValue=0
        HoldFunction HeightModel: WhenToHold=Flowering
          LinearInterpolationFunction
            XYPairs: X=[0, 1000]; Y=[1000, 2000]
            VariableReference XValue: VariableName=[Grapevine].Phenology.AccumulatedEmergedTT
        BudNumberFunction BudNumber: SetStage=BudBurst
          MultiplyFunction FractionOfBudBurst
            SigmoidFunction BudNumberEffect
              VariableReference XValue: VariableName=[Structure].PrimaryBudNo
              Constant Ymax: FixedValue=1.4
              Constant Xo: FixedValue=100
              Constant b: FixedValue=-54.8977
            LinearInterpolationFunction CordonDiameterEffect
              XYPairs: X=[0, 12, 15]; Y=[0.1, 1, 1]
              VariableReference XValue: VariableName=[Grapevine].Cordon.CordonDiameter
      Leaf: CurrentExpandingLeaf=34; StartFractionExpanded=0.83819; FractionNextleafExpanded=0.926641; MaxCover=1; Albedo=0.25; Gsmax350=0.01; R50=200; KDead=0.03; MaximumMainStemLeafNumber=30
        zero: DeadNodesYesterday, GrowthRespiration, LAI, FRGR, PotentialEP, WaterDemand, TipsAtEmergence, CohortsAtInitialisation, FractionDied
        VariableReference ThermalTime: VariableName=[Structure].ThermalTime
        LeafCohort InitialLeaf1: Rank=1; Area=1000
          zero: NReallocationFactor, DMReallocationFactor, NRetranslocationFactor, DMRetranslocationFactor, ShadeInducedSenRate, SenescedFrac, DeltaPotentialArea, DeltaStressConstrainedArea, DeltaCarbonConstrainedArea, PotentialStructuralDMAllocation, PotentialMetabolicDMAllocation, MetabolicNReallocated, MetabolicWtReallocated, StorageNReallocated, StorageWtReallocated, MetabolicNRetranslocated, StorageNRetrasnlocated, DMRetranslocated, MetabolicNAllocation, StructuralDMAllocation, MetabolicDMAllocation, MaintenanceRespiration
        LeafCohort InitialLeaf2: Rank=2
          zero: NReallocationFactor, DMReallocationFactor, NRetranslocationFactor, DMRetranslocationFactor, ShadeInducedSenRate, SenescedFrac, DeltaPotentialArea, DeltaStressConstrainedArea, DeltaCarbonConstrainedArea, PotentialStructuralDMAllocation, PotentialMetabolicDMAllocation, MetabolicNReallocated, MetabolicWtReallocated, StorageNReallocated, StorageWtReallocated, MetabolicNRetranslocated, StorageNRetrasnlocated, DMRetranslocated, MetabolicNAllocation, StructuralDMAllocation, MetabolicDMAllocation, Area, MaintenanceRespiration
        LeafCohort InitialLeaf3: Rank=3
          zero: NReallocationFactor, DMReallocationFactor, NRetranslocationFactor, DMRetranslocationFactor, ShadeInducedSenRate, SenescedFrac, DeltaPotentialArea, DeltaStressConstrainedArea, DeltaCarbonConstrainedArea, PotentialStructuralDMAllocation, PotentialMetabolicDMAllocation, MetabolicNReallocated, MetabolicWtReallocated, StorageNReallocated, StorageWtReallocated, MetabolicNRetranslocated, StorageNRetrasnlocated, DMRetranslocated, MetabolicNAllocation, StructuralDMAllocation, MetabolicDMAllocation, Area, MaintenanceRespiration
        LeafCohortParameters CohortParameters: ExpansionStressValue=0
          LinearInterpolationFunction MaxArea
            XYPairs: X=[0, 0.5, 1]; Y=[18000, 25000, 22000]
            VariableReference XValue: VariableName=[Structure].RelativeNodeApperance
          LinearInterpolationFunction GrowthDuration
            XYPairs: X=[0, 0.3, 0.4, 1]; Y=[150, 150, 150, 150]
            VariableReference XValue: VariableName=[Structure].RelativeNodeApperance
          LinearInterpolationFunction LagDuration
            XYPairs: X=[0, 0.15, 0.3, 0.4, 0.73, 1]; Y=[1000, 1500, 1800, 1900, 2000, 2000]
            VariableReference XValue: VariableName=[Structure].RelativeNodeApperance
          LinearInterpolationFunction SenescenceDuration
            XYPairs: X=[0, 0.2, 1]; Y=[1000, 1000, 1200]
            VariableReference XValue: VariableName=[Structure].RelativeNodeApperance
          Constant DetachmentLagDuration: FixedValue=1000000; Units=degreeDay
          Constant DetachmentDuration: FixedValue=1000000; Units=degreeDay
          LinearInterpolationFunction SpecificLeafAreaMax
            XYPairs: X=[0, 1]; Y=[40000, 25000]
            VariableReference XValue: VariableName=[Structure].RelativeNodeApperance
          Constant SpecificLeafAreaMin: FixedValue=20000; Units=mm2/g
          Constant StructuralFraction: FixedValue=0.8; Units=percentage
          Constant MaximumNConc: FixedValue=0.05; Units=g/g
          Constant MinimumNConc: FixedValue=0.01; Units=g/g
          Constant InitialNConc: FixedValue=0.04; Units=g/g
          Constant NReallocationFactor: FixedValue=0; Units=percentage
          Constant NRetranslocationFactor: FixedValue=0; Units=percentage
          LinearInterpolationFunction ExpansionStress
            XYPairs: X=[0, 1]; Y=[1, 1]
            VariableReference XValue: VariableName=[Grapevine].Leaf.Fw
          Constant CriticalNConc: FixedValue=0.03; Units=g/g
          Constant DMRetranslocationFactor: FixedValue=0; Units=percentage
          LinearInterpolationFunction ShadeInducedSenescenceRate
            XYPairs: X=[0, 0.5, 0.8, 1]; Y=[0, 0, 0, 0]
            VariableReference XValue: VariableName=[Leaf].CohortCurrentRankCoverAbove
          Constant StorageFraction: FixedValue=0.2; Units=percentage
          Constant SenessingLeafRelativeSize: FixedValue=1; Units=0-1
          Constant DMReallocationFactor: FixedValue=0.1; Units=percentage
          Constant LeafSizeShapeParameter: FixedValue=0.01
            Units=parameter controls the logistic growth of the leaf in growth stage
          Constant MaintenanceRespirationFunction: FixedValue=0; Units=g/g
          Constant DroughtInducedLagAcceleration: FixedValue=1
          Constant DroughtInducedSenAcceleration: FixedValue=1
          Constant CellDivisionStress: FixedValue=1; Units=0-1
          ArrayFunction LagDurationAgeMultiplier: Values=1 1 1
          ArrayFunction SenescenceDurationAgeMultiplier: Values=1 1 1
          ArrayFunction LeafSizeAgeMultiplier: Values=1 1 1 1 1 1 1 1 1 1 1 1
          Constant RemobilisationCost: FixedValue=0
          Constant CarbonConcentration: FixedValue=0.4
        RUEModel Photosynthesis
          PhaseLookup RUE
            PhaseLookupValue Juvenile: Start=BudBurst; End=Flowering
              Constant: FixedValue=1.2; Units=g/MJ
            PhaseLookupValue Vegetative: Start=Flowering; End=Veraison
              Constant: FixedValue=1.05; Units=g/MJ
            PhaseLookupValue Reproductive: Start=Veraison; End=LeafFall
              Constant: FixedValue=1.5; Units=g/MJ
          RUECO2Function FCO2: PhotosyntheticPathway=C3
          LinearInterpolationFunction FN
            XYPairs: X=[0, 1, 1.5]; Y=[1, 1, 1]
            VariableReference XValue: VariableName=[Leaf].Fn
          WeightedTemperatureFunction FT: MaximumTemperatureWeighting=0.75
            XYPairs: X=[5, 20, 30, 45]; Y=[0, 1, 1, 0]
          LinearInterpolationFunction FW
            XYPairs: X=[0, 1, 1.5]; Y=[1, 1, 1]
            VariableReference XValue: VariableName=[Leaf].Fw
          LinearInterpolationFunction FVPD
            XYPairs: X=[0, 10, 50]; Y=[1, 1, 1]
            VariableReference XValue: VariableName=[Leaf].Photosynthesis.VPD
          VariableReference RadnInt: VariableName=[Leaf].RadIntTot
        MinimumFunction FRGRFunction
          VariableReference RUE_FT: VariableName=[Leaf].Photosynthesis.FT
          MinimumFunction Others
            VariableReference RUE_FN: VariableName=[Leaf].Photosynthesis.FN
            VariableReference RUE_FVPD: VariableName=[Leaf].Photosynthesis.FVPD
        MultiplyFunction ExtinctionCoeff
          Constant: FixedValue=0.5
        CompositeBiomass Total: Propertys=[[Leaf].Live, [Leaf].Dead]; DMDOfStructural=0.6
        BiomassRemoval BiomassRemovalDefaults
          OrganBiomassRemovalType Harvest: FractionLiveToRemove=0; FractionDeadToRemove=0; FractionLiveToResidue=1; FractionDeadToResidue=1
          OrganBiomassRemovalType Cut: FractionLiveToRemove=0; FractionDeadToRemove=0; FractionLiveToResidue=0.1; FractionDeadToResidue=0.1
          OrganBiomassRemovalType Prune: FractionLiveToRemove=0; FractionDeadToRemove=0; FractionLiveToResidue=0.05; FractionDeadToResidue=0.05
          OrganBiomassRemovalType Graze: FractionLiveToRemove=0.5; FractionDeadToRemove=0; FractionLiveToResidue=0.1; FractionDeadToResidue=0
        PhaseLookupValue FrostFraction: Start=Veraison; End=LeafFall
          LinearInterpolationFunction
            XYPairs: X=[4, 3]; Y=[0, 0]
            VariableReference XValue: VariableName=[Weather].MinT
        Constant DMConversionEfficiency: FixedValue=1
        Constant RemobilisationCost: FixedValue=0
        Constant CarbonConcentration: FixedValue=0.4
        Constant StructuralFraction: FixedValue=0.8; Units=g/g
        Constant StomatalConductanceCO2Modifier: FixedValue=1
      GenericOrgan Shoot: IsAboveGround=true
        Constant NReallocationFactor: FixedValue=0.2; Units=percentage
        Constant NRetranslocationFactor: FixedValue=0.05; Units=percentage
        PhaseBasedSwitch NitrogenDemandSwitch: Start=BudBurst; End=LeafFall
        Constant DMRetranslocationFactor: FixedValue=0; Units=percentage
        LinearInterpolationFunction MaximumNConc
          XYPairs: X=[3, 4, 5.3]; Y=[0.06, 0.05, 0.025]
          VariableReference XValue: VariableName=[Phenology].Stage
        Constant MinimumNConc: FixedValue=0.006; Units=g/g
        BiomassRemoval BiomassRemovalDefaults
          OrganBiomassRemovalType Harvest: FractionLiveToRemove=0; FractionDeadToRemove=0; FractionLiveToResidue=0; FractionDeadToResidue=0
          OrganBiomassRemovalType Cut: FractionLiveToRemove=0; FractionDeadToRemove=0; FractionLiveToResidue=0; FractionDeadToResidue=0
          OrganBiomassRemovalType Prune: FractionLiveToRemove=1; FractionDeadToRemove=0; FractionLiveToResidue=0; FractionDeadToResidue=1
          OrganBiomassRemovalType Graze: FractionLiveToRemove=0; FractionDeadToRemove=0; FractionLiveToResidue=0; FractionDeadToResidue=0
        Constant InitialWtFunction: FixedValue=0; Units=g/m^2
        Constant DetachmentRateFunction: FixedValue=0; Units=1/d
        Constant SenescenceRate: FixedValue=0; Units=/d
        Constant MaintenanceRespirationFunction: FixedValue=0; Units=0-1
        Constant DMConversionEfficiency: FixedValue=1; Units=0-1
        Constant DMReallocationFactor: FixedValue=0
        VariableReference CriticalNConc: VariableName=[Shoot].MinimumNConc
        Constant RemobilisationCost: FixedValue=0
        Constant CarbonConcentration: FixedValue=0.4
        BiomassDemand DMDemands
          MultiplyFunction Structural
            PartitionFractionDemandFunction DMDemandFunction
              Constant PartitionFraction: FixedValue=0.2
            Constant StructuralFraction: FixedValue=1; Units=g/g
          Constant Metabolic: FixedValue=0
          StorageDMDemandFunction Storage
            SubtractFunction StorageFraction
              Constant One: FixedValue=1
              VariableReference StructuralFraction: VariableName=[Shoot].DMDemands.Structural.StructuralFraction
        BiomassDemand NDemands
          MultiplyFunction Structural
            VariableReference MinNconc: VariableName=[Shoot].minimumNconc
            VariableReference PotentialDMAllocation: VariableName=[Shoot].potentialDMAllocation.Structural
          MultiplyFunction Metabolic
            SubtractFunction MetabolicNconc
              VariableReference CritNconc: VariableName=[Shoot].criticalNConc
              VariableReference MinNconc: VariableName=[Shoot].minimumNconc
            VariableReference PotentialDMAllocation: VariableName=[Shoot].potentialDMAllocation.Structural
          StorageNDemandFunction Storage
            VariableReference NitrogenDemandSwitch: VariableName=[Shoot].nitrogenDemandSwitch
            VariableReference MaxNconc: VariableName=[Shoot].maximumNconc
        RetranslocateNonStructural RetranslocateNitrogen
      GenericOrgan Cordon: IsAboveGround=true
        Constant DMReallocationFactor: FixedValue=0.2
        Constant NReallocationFactor: FixedValue=0; Units=percentage
        Constant NRetranslocationFactor: FixedValue=0.05; Units=percentage
        PhaseBasedSwitch NitrogenDemandSwitch: Start=BudBurst; End=LeafFall
        Constant DMRetranslocationFactor: FixedValue=0; Units=percentage
        LinearInterpolationFunction MaximumNConc
          XYPairs: X=[3, 4, 5.3]; Y=[0.06, 0.05, 0.025]
          VariableReference XValue: VariableName=[Phenology].Stage
        Constant MinimumNConc: FixedValue=0.006; Units=g/g
        BiomassRemoval BiomassRemovalDefaults: same as Replacements.Grapevine.Shoot.BiomassRemovalDefaults
        Constant InitialWtFunction: FixedValue=130; Units=g/m^2
        Constant DetachmentRateFunction: FixedValue=0; Units=/d
        Constant SenescenceRate: FixedValue=0; Units=/d
        Constant MaintenanceRespirationFunction: FixedValue=0; Units=0-1
        Constant DMConversionEfficiency: FixedValue=1; Units=0-1
        VariableReference CriticalNConc: VariableName=[Cordon].MinimumNConc
        Constant RemobilisationCost: FixedValue=0
        Constant CarbonConcentration: FixedValue=0.4
        Constant CordonDiameter: FixedValue=10
        BiomassDemand DMDemands
          MultiplyFunction Structural
            PartitionFractionDemandFunction DMDemandFunction
              Constant PartitionFraction: FixedValue=0.01
            Constant StructuralFraction: FixedValue=0.8; Units=percentage
          Constant Metabolic: FixedValue=0
          StorageDMDemandFunction Storage
            SubtractFunction StorageFraction
              Constant One: FixedValue=1
              VariableReference StructuralFraction: VariableName=[Cordon].DMDemands.Structural.StructuralFraction
        BiomassDemand NDemands
          MultiplyFunction Structural
            VariableReference MinNconc: VariableName=[Cordon].minimumNconc
            VariableReference PotentialDMAllocation: VariableName=[Cordon].potentialDMAllocation.Structural
          MultiplyFunction Metabolic
            SubtractFunction MetabolicNconc
              VariableReference CritNconc: VariableName=[Cordon].criticalNConc
              VariableReference MinNconc: VariableName=[Cordon].minimumNconc
            VariableReference PotentialDMAllocation: VariableName=[Cordon].potentialDMAllocation.Structural
          StorageNDemandFunction Storage
            VariableReference NitrogenDemandSwitch: VariableName=[Cordon].nitrogenDemandSwitch
            VariableReference MaxNconc: VariableName=[Cordon].maximumNconc
        RetranslocateNonStructural RetranslocateNitrogen
      GenericOrgan Trunk: IsAboveGround=true
        Constant NReallocationFactor: FixedValue=0
        Constant NRetranslocationFactor: FixedValue=0.05
        PhaseBasedSwitch NitrogenDemandSwitch: Start=BudBurst; End=LeafFall
        Constant DMRetranslocationFactor: FixedValue=0.1
        LinearInterpolationFunction MaximumNConc
          XYPairs: X=[3, 4, 5.3]; Y=[0.06, 0.05, 0.025]
          VariableReference XValue: VariableName=[Phenology].Stage
        Constant MinimumNConc: FixedValue=0.006
        BiomassRemoval BiomassRemovalDefaults
          OrganBiomassRemovalType Harvest: FractionLiveToRemove=0; FractionDeadToRemove=0; FractionLiveToResidue=0; FractionDeadToResidue=0
          OrganBiomassRemovalType Cut: FractionLiveToRemove=0; FractionDeadToRemove=0; FractionLiveToResidue=0; FractionDeadToResidue=0
          OrganBiomassRemovalType Prune: FractionLiveToRemove=0; FractionDeadToRemove=0; FractionLiveToResidue=0; FractionDeadToResidue=0
          OrganBiomassRemovalType Graze: FractionLiveToRemove=0; FractionDeadToRemove=0; FractionLiveToResidue=0; FractionDeadToResidue=0
        Constant InitialWtFunction: FixedValue=2000; Units=g/m^2
        Constant DetachmentRateFunction: FixedValue=0; Units=/d
        Constant SenescenceRate: FixedValue=0; Units=/d
        Constant MaintenanceRespirationFunction: FixedValue=0; Units=0-1
        Constant DMConversionEfficiency: FixedValue=1; Units=0-1
        Constant DMReallocationFactor: FixedValue=0.2
        VariableReference CriticalNConc: VariableName=[Trunk].MinimumNConc
        Constant RemobilisationCost: FixedValue=0
        Constant CarbonConcentration: FixedValue=0.4
        BiomassDemand DMDemands
          MultiplyFunction Structural
            PartitionFractionDemandFunction DMDemandFunction
              Constant PartitionFraction: FixedValue=0.05
            Constant StructuralFraction: FixedValue=0.8; Units=g/g
          Constant Metabolic: FixedValue=0
          StorageDMDemandFunction Storage
            SubtractFunction StorageFraction
              Constant One: FixedValue=1
              VariableReference StructuralFraction: VariableName=[Trunk].DMDemands.Structural.StructuralFraction
        BiomassDemand NDemands
          MultiplyFunction Structural
            VariableReference MinNconc: VariableName=[Trunk].minimumNconc
            VariableReference PotentialDMAllocation: VariableName=[Trunk].potentialDMAllocation.Structural
          MultiplyFunction Metabolic
            SubtractFunction MetabolicNconc
              VariableReference CritNconc: VariableName=[Trunk].criticalNConc
              VariableReference MinNconc: VariableName=[Trunk].minimumNconc
            VariableReference PotentialDMAllocation: VariableName=[Trunk].potentialDMAllocation.Structural
          StorageNDemandFunction Storage
            VariableReference NitrogenDemandSwitch: VariableName=[Trunk].nitrogenDemandSwitch
            VariableReference MaxNconc: VariableName=[Trunk].maximumNconc
        RetranslocateNonStructural RetranslocateNitrogen
      ReproductiveOrgan Berry: GrowthRespiration=0; MaintenanceRespiration=0; RipeStage=Ripe
        Biomass Live: DMDOfStructural=0.6
        Biomass Dead: DMDOfStructural=0.6
        Memo
          The final yield was calculated by vines per hectare, shoots per vine, bunches per shoot, flower number per bunch, berries per bunch,and mean berry weight. The effects of temperature and carbon status were or will be considered on bunches per shoot, flower number per bunch, berries per bunch,and mean berry weight.
        Folder MetFactors
          Memo MetFactors
            The final yield was calculated by vines per hectare, shoots per vine, bunches per shoot, flower number per bunch, berries per bunch,and mean berry weight. The effects of temperature and carbon status were or will be considered on bunches per shoot, flower number per bunch, berries per bunch,and mean berry weight.
          DivideFunction BUN_TmaxIni
            AccumulateByNumericPhase TmaxIni: StartStageName=3.4321; EndStageName=4.0318; FractionRemovedOnCut=0; FractionRemovedOnHarvest=0; FractionRemovedOnGraze=0; FractionRemovedOnPrune=0
              VariableReference Tmax: VariableName=[Weather].MaxT
            AccumulateByNumericPhase Time: StartStageName=3.4321; EndStageName=4.0318; FractionRemovedOnCut=0; FractionRemovedOnHarvest=0; FractionRemovedOnGraze=0; FractionRemovedOnPrune=0
              Constant Days: FixedValue=1; Units=days/day
          DivideFunction BUN_RadIni
            AccumulateByNumericPhase RadIni: StartStageName=3.62786; EndStageName=4.0035; FractionRemovedOnCut=0; FractionRemovedOnHarvest=0; FractionRemovedOnGraze=0; FractionRemovedOnPrune=0
              VariableReference Rad: VariableName=[Weather].Radn
            AccumulateByNumericPhase Time: StartStageName=3.62786; EndStageName=4.0035; FractionRemovedOnCut=0; FractionRemovedOnHarvest=0; FractionRemovedOnGraze=0; FractionRemovedOnPrune=0
              Constant Days: FixedValue=1; Units=days/day
          DivideFunction BEN_TmeanFlow
            AccumulateByNumericPhase TmeanFlow: StartStageName=3.74714; EndStageName=4.0005; FractionRemovedOnCut=0; FractionRemovedOnHarvest=0; FractionRemovedOnGraze=0; FractionRemovedOnPrune=0
              VariableReference Tmean: VariableName=[Weather].MeanT
            AccumulateByNumericPhase Time: StartStageName=3.74714; EndStageName=4.0005; FractionRemovedOnCut=0; FractionRemovedOnHarvest=0; FractionRemovedOnGraze=0; FractionRemovedOnPrune=0
              Constant Days: FixedValue=1; Units=days/day
          DivideFunction BEN_RainTotFlow
            AccumulateByNumericPhase RainTotFlow: StartStageName=3.625; EndStageName=4.06725; FractionRemovedOnCut=0; FractionRemovedOnHarvest=0; FractionRemovedOnGraze=0; FractionRemovedOnPrune=0
              VariableReference RainTot: VariableName=[Weather].Rain
            Constant: FixedValue=1
          DivideFunction BEN_TmaxIni
            AccumulateByNumericPhase TmaxIni: StartStageName=3.71714; EndStageName=4.75925; FractionRemovedOnCut=0; FractionRemovedOnHarvest=0; FractionRemovedOnGraze=0; FractionRemovedOnPrune=0
              VariableReference Tmax: VariableName=[Weather].MaxT
            AccumulateByNumericPhase Time: StartStageName=3.71714; EndStageName=4.75925; FractionRemovedOnCut=0; FractionRemovedOnHarvest=0; FractionRemovedOnGraze=0; FractionRemovedOnPrune=0
              Constant Days: FixedValue=1; Units=days/day
          DivideFunction BM_TmeanFlow
            AccumulateByNumericPhase TmeanFlow: StartStageName=3.64214; EndStageName=4.02925; FractionRemovedOnCut=0; FractionRemovedOnHarvest=0; FractionRemovedOnGraze=0; FractionRemovedOnPrune=0
              VariableReference Tmean: VariableName=[Weather].MeanT
            AccumulateByNumericPhase Time: StartStageName=3.64214; EndStageName=4.02925; FractionRemovedOnCut=0; FractionRemovedOnHarvest=0; FractionRemovedOnGraze=0; FractionRemovedOnPrune=0
              Constant Days: FixedValue=1; Units=days/day
          DivideFunction BM_RainTotFlow
            AccumulateByNumericPhase RainTotFlow: StartStageName=3.52071; EndStageName=4.073; FractionRemovedOnCut=0; FractionRemovedOnHarvest=0; FractionRemovedOnGraze=0; FractionRemovedOnPrune=0
              VariableReference RainTot: VariableName=[Weather].Rain
            Constant: FixedValue=1
          DivideFunction BM_RadFlow
            AccumulateByNumericPhase RadFlow: StartStageName=3.59393; EndStageName=4.2855; FractionRemovedOnCut=0; FractionRemovedOnHarvest=0; FractionRemovedOnGraze=0; FractionRemovedOnPrune=0
              VariableReference Rad: VariableName=[Weather].Radn
            AccumulateByNumericPhase Time: StartStageName=3.59393; EndStageName=4.2855; FractionRemovedOnCut=0; FractionRemovedOnHarvest=0; FractionRemovedOnGraze=0; FractionRemovedOnPrune=0
              Constant Days: FixedValue=1; Units=days/day
          DivideFunction BM_RainTotVer
            AccumulateByNumericPhase RainTotVer: StartStageName=4.3805; EndStageName=4.6725; FractionRemovedOnCut=0; FractionRemovedOnHarvest=0; FractionRemovedOnGraze=0; FractionRemovedOnPrune=0
              VariableReference RainTot: VariableName=[Weather].Rain
            Constant: FixedValue=1
          OnEventFunction BUN_TmaxIni1: SetEvent=Veraison
            Constant PreEventValue: FixedValue=21
            VariableReference PostEventValue: VariableName=[Berry].MetFactors.BUN_TmaxIni
          OnEventFunction BUN_RadIni1: SetEvent=Veraison
            Constant PreEventValue: FixedValue=21
            VariableReference PostEventValue: VariableName=[Berry].MetFactors.BUN_RadIni
          OnEventFunction BEN_TmaxIni1: SetEvent=Veraison
            Constant PreEventValue: FixedValue=21
            VariableReference PostEventValue: VariableName=[Berry].MetFactors.BEN_TmaxIni
        Folder YieldComponent
          OnEventFunction BunchesPerVine: SetEvent=BudBurst
            Memo
              here we use a trigger function for bunches per shoot as the value of mean flowering temperature Y0 is updating itself during the growing season, which would cause inconvience if we directly correlates the bunches per shoot and mean flowering temperature Y0.

              Numbers were guessed based on Eltom 2013 Fig. 7.7. y=0.0981*Ta + 0.35

               Bunches per shoot is affected by the temperature and CHO during initiation, it is further affected by the CHO during bud burst. The later decided whether the potential initiated inflorescence can grow out successfully or been realized.

              For simiplicity, right now, the CHO effect during bud burst is expressed as a function of number of buds retained.
            Constant PreEventValue: FixedValue=68
            MinimumFunction PostEventValue
              MaximumFunction BunchFun
                AddFunction MetFun
                  Constant: FixedValue=-43.43
                  LinearInterpolationFunction TmaxIni
                    VariableReference XValue: VariableName=[Berry].MetFactors.BUN_TmaxIni1
                    XYPairs: X=[0, 0.5, 10, 20, 25, 30, 40]; Y=[0, 0, 46, 92, 115, 120, 120]
                  LinearInterpolationFunction RadIni
                    VariableReference XValue: VariableName=[Berry].MetFactors.BUN_RadIni1
                    XYPairs: X=[0, 0.1, 10, 20, 25, 30, 40]; Y=[0, 0, 4.2, 8.4, 10.5, 12, 12]
                Constant zero: FixedValue=0
          OnEventFunction BerryNum: SetEvent=Flowering
            Memo: same as Replacements.Grapevine.Berry.YieldComponent.BunchesPerVine.Memo
            Constant PreEventValue: FixedValue=65
            MinimumFunction PostEventValue
              MaximumFunction BerryNumFun
                AddFunction MetFun
                  Constant: FixedValue=-40
                  LinearInterpolationFunction TmeanFlow
                    VariableReference XValue: VariableName=[Berry].MetFactors.BEN_TmeanFlow
                    XYPairs: X=[0, 0.01, 10, 20, 25, 30, 40]; Y=[0, 0, 31.8, 63.6, 79.5, 95.4, 95.4]
                  LinearInterpolationFunction RainTotFlow
                    VariableReference XValue: VariableName=[Berry].MetFactors.BEN_RainTotFlow
                    XYPairs: X=[0, 0.01, 10, 20, 30, 60, 100, 120, 150, 200]; Y=[0, 0, -8.3, -16.6, -24.75, -49.8, -83, -99.6, -123, -140]
                  LinearInterpolationFunction TmaxIni
                    VariableReference XValue: VariableName=[Berry].MetFactors.BEN_TmaxIni1
                    XYPairs: X=[0, 0.01, 10, 20, 25, 30, 40]; Y=[0, 0, 23.3, 46.6, 58.25, 69.9, 70]
                  MinimumFunction TmeanRainTot
                    MultiplyFunction
                      Constant: FixedValue=0.04812
                      VariableReference Tmean: VariableName=[Berry].MetFactors.BEN_TmeanFlow
                      VariableReference RainTot: VariableName=[Berry].MetFactors.BEN_RainTotFlow
                    Constant: FixedValue=150
                Constant zero: FixedValue=0
              Constant UpperLimit: FixedValue=150
          OnEventFunction BerryMass: SetEvent=Veraison; ReSetEvent=Flowering
            Memo: same as Replacements.Grapevine.Berry.YieldComponent.BunchesPerVine.Memo
            Constant PreEventValue: FixedValue=1.9
            MinimumFunction PostEventValue
              MaximumFunction BerryMassFun
                AddFunction MetFun
                  Constant: FixedValue=1.4
                  LinearInterpolationFunction TmeanFlow
                    VariableReference XValue: VariableName=[Berry].MetFactors.BM_TmeanFlow
                    XYPairs: X=[0, 0.01, 10, 20, 25, 30, 40]; Y=[0, 0, -0.165, -0.33, -0.4125, -0.495, -0.495]
                  LinearInterpolationFunction RainTotFlow
                    VariableReference XValue: VariableName=[Berry].MetFactors.BM_RainTotFlow
                    XYPairs: X=[0, 0.01, 10, 20, 30, 60, 90, 150]; Y=[0, 0, -0.167, -0.334, -0.501, -1.002, -1.503, -2]
                  LinearInterpolationFunction RadFlow
                    VariableReference XValue: VariableName=[Berry].MetFactors.BM_RadFlow
                    XYPairs: X=[0, 0.01, 10, 20, 25, 30, 40, 50]; Y=[0, 0, 0.38, 0.76, 0.95, 1.14, 1.52, 1.52]
                  LinearInterpolationFunction RainTotVer
                    VariableReference XValue: VariableName=[Berry].MetFactors.BM_RainTotVer
                    XYPairs: X=[0, 0.01, 10, 20, 30, 60, 90, 100, 150]; Y=[0, 0, 0.233, 0.466, 0.699, 1.398, 2.097, 2.33, 2.8]
                  MinimumFunction TmeanRainTotFlow
                    MultiplyFunction
                      Constant: FixedValue=0.000987
                      VariableReference Tmean: VariableName=[Berry].MetFactors.BM_TmeanFlow
                      VariableReference RainTotFlow: VariableName=[Berry].MetFactors.BM_RainTotFlow
                    Constant: FixedValue=2
                  MaximumFunction RadRainTotVer
                    MultiplyFunction
                      Constant: FixedValue=-0.000898
                      VariableReference RadFlow: VariableName=[Berry].MetFactors.BM_RadFlow
                      VariableReference RainTotVer: VariableName=[Berry].MetFactors.BM_RainTotVer
                    Constant: FixedValue=-2.4246
                Constant zero: FixedValue=0
              Constant UpperLimit: FixedValue=2.5
        DivideFunction MeanTempBudBurst
          AccumulateByNumericPhase Temperature: StartStageName=2.5877; EndStageName=3; ResetStageName=5; FractionRemovedOnCut=0; FractionRemovedOnHarvest=0; FractionRemovedOnGraze=0; FractionRemovedOnPrune=0
            AirTemperatureFunction
              XYPairs: X=[0, 40]; Y=[0, 40]
          AccumulateByNumericPhase Time: StartStageName=2.5877; EndStageName=3; ResetStageName=5; FractionRemovedOnCut=0; FractionRemovedOnHarvest=0; FractionRemovedOnGraze=0; FractionRemovedOnPrune=0
            Constant Days: FixedValue=1; Units=days/day
        DivideFunction MeanTempFlowering
          AccumulateFunction Temperature: StartStageName=Flowering; EndStageName=Veraison; ResetStageName=Flowering; FractionRemovedOnCut=0; FractionRemovedOnHarvest=0; FractionRemovedOnGraze=0; FractionRemovedOnPrune=0
            AirTemperatureFunction
              XYPairs: X=[0, 40]; Y=[0, 40]
          AccumulateFunction Time: StartStageName=Flowering; EndStageName=Veraison; ResetStageName=Flowering; FractionRemovedOnCut=0; FractionRemovedOnHarvest=0; FractionRemovedOnGraze=0; FractionRemovedOnPrune=0
            Constant Days: FixedValue=1; Units=days/day
        OnEventFunction MeanTempInitiationY0: SetEvent=Veraison; ReSetEvent=Flowering
          Constant PreEventValue: FixedValue=13
          VariableReference PostEventValue: VariableName=[Berry].MeanTempInitiation
        OnEventFunction BunchesPerShoot: SetEvent=BudBurst; ReSetEvent=Ecodormancy
          Memo: same as Replacements.Grapevine.Berry.YieldComponent.BunchesPerVine.Memo
          Constant PreEventValue: FixedValue=1.7
          MultiplyFunction PostEventValue
            Constant meanBunchesPerShoot: FixedValue=1.7
            LinearInterpolationFunction TempInitiation
              XYPairs: X=[0, 10, 14, 15, 17, 20, 40]; Y=[0, 0.76, 1, 1.0588, 1.176, 1.35, 1.4]
              VariableReference XValue: VariableName=[Berry].MeanTempInitiationY0
            LinearInterpolationFunction CHOInitiation
              XYPairs: X=[0, 1, 2]; Y=[1, 1, 1]
              VariableReference XValue: VariableName=[Berry].MeanCHOInitiationY0
            LinearInterpolationFunction RetainedBudNum
              XYPairs: X=[0, 20, 40, 108]; Y=[1, 1, 0.85, 0.65]
              VariableReference XValue: VariableName=[Structure].PrimaryBudNo
            LinearInterpolationFunction CordonDiameter
              XYPairs: X=[0, 20]; Y=[1, 1]
              VariableReference XValue: VariableName=[Cordon].CordonDiameter
        MultiplyFunction BunchNumPerVine
          Memo
            Number of bunches per vine calculated by maximum temperature and radiation during initiation
          Constant meanFlowersPerBunch: FixedValue=300
          LinearInterpolationFunction TempInitiation
            XYPairs: X=[1, 10, 14, 15, 17, 20, 40]; Y=[1, 1, 1, 1, 1, 1, 1]
            VariableReference XValue: VariableName=[Berry].MeanTempInitiationY0
          LinearInterpolationFunction TempBudBurst
            XYPairs: X=[8, 10, 11, 11.6, 12.2, 14]; Y=[1.5, 1.5, 1.3, 1, 0.7, 0.7]
            VariableReference XValue: VariableName=[Berry].MeanTempBudBurst
          LinearInterpolationFunction CHOInitiation
            XYPairs: X=[0, 1]; Y=[1, 1]
            VariableReference XValue: VariableName=[Berry].MeanCHOInitiationY0
          LinearInterpolationFunction CHOBudBurst
            XYPairs: X=[0, 1]; Y=[1, 1]
            VariableReference XValue: VariableName=[Berry].MeanCHOBudBurst
        MultiplyFunction FlowersPerBunch
          Memo
            Numbers were guessed based on Eltom 2013 Fig. 6.3. However, this is based on the mean daily temperature from 12 days pre-budbreak. the model only work forward, and can not know the budburst date before it actually happens. Furthermore, for the moment, it always require to calculate from certain phenological stage instead of actual date.

            Flowers per bunch is affected by the temperature and CHO during initiation, which affects the number of primary branches, temperature and CHO during bud burst, which affect the secondary braches and flower initiation,
          Constant meanFlowersPerBunch: FixedValue=300
          LinearInterpolationFunction TempInitiation
            XYPairs: X=[1, 10, 14, 15, 17, 20, 40]; Y=[1, 1, 1, 1, 1, 1, 1]
            VariableReference XValue: VariableName=[Berry].MeanTempInitiationY0
          LinearInterpolationFunction TempBudBurst
            XYPairs: X=[8, 10, 11, 11.6, 12.2, 14]; Y=[1.5, 1.5, 1.3, 1, 0.7, 0.7]
            VariableReference XValue: VariableName=[Berry].MeanTempBudBurst
          LinearInterpolationFunction CHOInitiation: same as Replacements.Grapevine.Berry.BunchNumPerVine.CHOInitiation
          LinearInterpolationFunction CHOBudBurst: same as Replacements.Grapevine.Berry.BunchNumPerVine.CHOBudBurst
        MultiplyFunction BerriesPerBunch
          Memo
            Percentage of fruit set were guessed based on mean daily temperature during anthesis (Eltom 2013 Fig. 6.5, y = 0.5*x-8 (wrong equation)). temperature range is 15.5 to 16.2 degree.

            The minimum function was try to cap the maximum berry number and the predicted yield. Due to the size of the peducle or bunch frame, it was not able to sustain lots of berries at harvest even so there was more at fruit set.
          VariableReference FlowersPerBunch: VariableName=[Berry].FlowersPerBunch
          LinearInterpolationFunction TempFlowering
            XYPairs: X=[14, 15.5, 15.8, 16, 16.2, 20]; Y=[0.14, 0.15, 0.3, 0.42, 0.5, 0.55]
            VariableReference XValue: VariableName=[Berry].MeanTempFlowering
          LinearInterpolationFunction CHOFlowering
            XYPairs: X=[0, 1]; Y=[1, 1]
            VariableReference XValue: VariableName=[Berry].MeanCHOFlowering
          LinearInterpolationFunction FlowerNum
            XYPairs: X=[200, 300, 400]; Y=[1, 0.9, 0.8]
            VariableReference XValue: VariableName=[Berry].FlowersPerBunch
        MultiplyFunction NumberFunction
          VariableReference Shoots: VariableName=[Structure].MainStemPopn
          VariableReference BunchesPerShoot: VariableName=[Berry].BunchesPerShoot
          VariableReference BerriesPerBunch: VariableName=[Berry].BerriesPerBunch
        MultiplyFunction PotentialBerrySizeAdj
          Memo
            Temperature or rainful during flowering to fruitset would affect the pollination. a good pollination will result in a high fertility and large seed. the size of the seeds would affect the potential size of the berry. See Adam Friend's thesis.

            Pollination alone results in the development of small, hard green berries (live green ovaries or LGO). Further development requires fertilization of grape ovaries and subsequent seed development (Friend et al. 2009). Should ovules not fully develop, leaving seed traces,  the berries will ripen, but remain small, while successful fertilization of one or more ovule will result in complete berry development, with the berry mass generally reflecting seed mass. The success of fertilization depends on the pollen viability and environmental factors such as temperature, carbohydrate availability and vine nutrition.

            (Ojeda et al. 2001) analysed the effects of water deficits after anthesis on pericarp cell division and enlargement of cv. Syrah berries. They found water deficits after anthesis did not affect cell division, but mainly limiting cell expansion. These results support the hypothesis that early water deficits modify the structural properties of the cell components and consequently cell wall extensibility, thereby limiting the subsequent enlargement of pericarp cells even with good water status after véraison. (Korkutal et al. 2011) shown water deficit with predawn water potential smaller than -0.6 MPa starting from 17 E-L stage did not affect the pollen viability and pollen germination ratios, but reduced berry set ratio, and delayed berry development.
          LinearInterpolationFunction TempFlowering
            XYPairs: X=[14, 15.6, 15.8, 16, 16.2, 20, 30]; Y=[0.8, 0.95, 1, 1.05, 1.1, 1.2, 1.3]
            VariableReference XValue: VariableName=[Berry].MeanTempFlowering
          LinearInterpolationFunction WaterFlowering
            XYPairs: X=[0, 1]; Y=[0, 1]
            VariableReference XValue: VariableName=[Grapevine].Leaf.Fw
        MultiplyFunction BerryFreshWeight
          BerryFillingRateFunction BerryFillingRate: FirstPhase=BerryDevelopment; SecondPhase=LeafDeathPhase; Wo1=0.0001; Wf1=1; Mu1=0.07; Wo2=0.0001; Wf2=2; Mu2=0.1
            VariableReference TT: VariableName=[Structure].ThermalTime
          VariableReference BerryNumber: VariableName=[Berry].NumberFunction
          VariableReference potentialBerrySizeAdj: VariableName=[Berry].PotentialBerrySizeAdj
        MultiplyFunction DMDemandFunction
          BerryFillingRateFunction BerryFillingRate: FirstPhase=BerryDevelopment; SecondPhase=LeafDeathPhase; Wo1=0.0001; Wf1=0.15; Mu1=0.007; Wo2=0.0001; Wf2=0.3; Mu2=0.011
            VariableReference TT: VariableName=[Structure].ThermalTime
          VariableReference BerryNumber: VariableName=[Berry].NumberFunction
          VariableReference potentialBerrySizeAdj: VariableName=[Berry].PotentialBerrySizeAdj
        AccumulateFunction ThermalTimeAfterVeraison: StartStageName=Veraison; EndStageName=LeafFall; ResetStageName=Veraison; FractionRemovedOnCut=0; FractionRemovedOnHarvest=0; FractionRemovedOnGraze=0; FractionRemovedOnPrune=0
          VariableReference ThermalTime: VariableName=[Phenology].ThermalTime
        AccumulateFunction ThermalTimeAfterFlowering: StartStageName=Flowering; EndStageName=LeafFall; ResetStageName=Flowering; FractionRemovedOnCut=0; FractionRemovedOnHarvest=0; FractionRemovedOnGraze=0; FractionRemovedOnPrune=0
          VariableReference ThermalTime: VariableName=[Phenology].ThermalTime
        ExponentialFunction SolubleSolidsConc: A=24; B=-15.6582; C=-0.040501
          VariableReference ThermalTime: VariableName=[Berry].DaysAfterVeraison
        LinearInterpolationFunction ReadyForHarvest
          XYPairs: X=[0, 200, 201]; Y=[0, 0, 1]
          VariableReference XValue: VariableName=[Berry].ThermalTimeAfterVeraison
        Constant MaxNConcDailyGrowth: FixedValue=0.01; Units=g/g
        Constant NFillingRate: FixedValue=0
        Constant MinimumNConc: FixedValue=0
        Constant MaximumNConc: FixedValue=0.0001
        BiomassRemoval BiomassRemovalDefaults
          OrganBiomassRemovalType Harvest: FractionLiveToRemove=1; FractionDeadToRemove=0; FractionLiveToResidue=0; FractionDeadToResidue=0
          OrganBiomassRemovalType Cut: FractionLiveToRemove=1; FractionDeadToRemove=0; FractionLiveToResidue=0; FractionDeadToResidue=0
          OrganBiomassRemovalType Prune: FractionLiveToRemove=0; FractionDeadToRemove=0; FractionLiveToResidue=1; FractionDeadToResidue=0
          OrganBiomassRemovalType Graze: FractionLiveToRemove=0; FractionDeadToRemove=0; FractionLiveToResidue=0; FractionDeadToResidue=0
          OrganBiomassRemovalType Thin: FractionLiveToRemove=0; FractionDeadToRemove=0; FractionLiveToResidue=0; FractionDeadToResidue=0
        Constant MaximumPotentialGrainSize: FixedValue=2.5; Units=g fresh or dry
        SubtractFunction WaterContent
          Constant: FixedValue=0.903
          PhaseLookupValue: Start=Veraison; End=LeafFall
            LinearInterpolationFunction
              XYPairs: X=[0, 100, 200, 300, 400, 600]; Y=[0, 0.01, 0.02, 0.04, 0.15, 0.15]
              VariableReference XValue: VariableName=[Berry].ThermalTimeAfterVeraison
        Constant DMConversionEfficiency: FixedValue=1
        Constant RemobilisationCost: FixedValue=0
        Constant CarbonConcentration: FixedValue=0.4
      Root: GrowthRespiration=0; MaintenanceRespiration=0; RootAngle=45
        PhaseBasedSwitch NitrogenDemandSwitch: Start=BudBurst; End=LeafFall
        Constant MinimumNConc: FixedValue=0.01; Units=g/g
        Constant MaximumNConc: FixedValue=0.01; Units=g/g
        Constant MaximumRootDepth: FixedValue=1000000; Units=mm
        LinearInterpolationFunction KLModifier
          XYPairs: X=[0, 3]; Y=[1, 1]
          VariableReference XValue: VariableName=[Leaf].LAI
        LinearInterpolationFunction SenescenceRate
          XYPairs: X=[0, 1]; Y=[0, 0.05]
          VariableReference XValue: VariableName=[Leaf].FractionDied
        BiomassRemoval BiomassRemovalDefaults: same as Replacements.Grapevine.Trunk.BiomassRemovalDefaults
        LinearInterpolationFunction NUptakeSWFactor
          XYPairs: X=[0, 1]; Y=[0, 1]
          VariableReference XValue: VariableName=[Root].RWC
        Constant InitialDM: FixedValue=2500; Units=g/plant
        Constant SpecificRootLength: FixedValue=40; Units=m/g
        Constant RootFrontVelocity: FixedValue=10; Units=mm/d
        Constant KNO3: FixedValue=0.02
        Constant KNH4: FixedValue=0.003
        Constant MaxDailyNUptake: FixedValue=6
        Constant DMConversionEfficiency: FixedValue=1
        Constant MaintenanceRespirationFunction: FixedValue=0.002
        Constant RemobilisationCost: FixedValue=0
        Constant CarbonConcentration: FixedValue=0.4
        Constant DMRetranslocationFactor: FixedValue=0.1
        BiomassDemand DMDemands
          MultiplyFunction Structural
            PartitionFractionDemandFunction DMDemandFunction
              Constant PartitionFraction: FixedValue=0.2
            Constant StructuralFraction: FixedValue=0.8; Units=g/g
          Constant Metabolic: FixedValue=0
          StorageDMDemandFunction Storage
            SubtractFunction StorageFraction
              Constant One: FixedValue=1
              VariableReference StructuralFraction: VariableName=[Root].DMDemands.Structural.StructuralFraction
        BiomassDemand NDemands
          MultiplyFunction Structural
            VariableReference MinNconc: VariableName=[Root].minimumNconc
            VariableReference PotentialDMAllocation: VariableName=[Root].potentialDMAllocation.Structural
          MultiplyFunction Metabolic
            SubtractFunction MetabolicNconc
              VariableReference CritNconc: VariableName=[Root].criticalNConc
              VariableReference MinNconc: VariableName=[Root].minimumNconc
            VariableReference PotentialDMAllocation: VariableName=[Root].potentialDMAllocation.Structural
          StorageNDemandFunction Storage
            VariableReference NitrogenDemandSwitch: VariableName=[Root].nitrogenDemandSwitch
            VariableReference MaxNconc: VariableName=[Root].maximumNconc
      OrganArbitrator Arbitrator
        RelativeAllocation NArbitrator
        RelativeAllocation DMArbitrator
    Folder Management
      Manager ExtraVariables
        CordonDiameter = 10
```csharp
using System;
using Models.Core;
using Models.PMF;
using Models;
using System.Xml.Serialization;
using APSIM.Shared.Utilities;

namespace Models
{
    [Serializable] 
    public class Script : Model
    {
        [Link] Clock Clock;
        [Link] Plant Grapevine;
        [Link] Zone zone;

        [Description("CordonDiameter_mm")]         
        public double CordonDiameter { get; set; }  //mm
        

        [EventSubscribe("PlantSowing")]
        private void OnPlantSowing(object sender, EventArgs e)
        {
            zone.Set("Grapevine.Cordon.CordonDiameter.FixedValue", CordonDiameter);      
        }

     }
}
```
      Operations
        2004-01-01  [Grapevine].Sow(population: 0.231481, cultivar: "SauvignonBlanc", depth: 800, rowSpacing: 2400, budNumber:48);
      Manager Pruning
        PruneDateString = 1-May
        CordonDiameter = 10
```csharp
using System;
using System.Collections.Generic;
using Models.Core;
using Models.PMF;
using Models.PMF.Interfaces;
using System.Xml.Serialization;

namespace Models
{
    [Serializable] 
    [System.Xml.Serialization.XmlInclude(typeof(Model))]
    public class Script : Model
    {
        [Link] Plant Grapevine;
        [Link] Clock Clock;
        [Link] Zone zone;

        [Description("Prune Date")]
        public string PruneDateString { get; set; }
        [Description("CordonDiameter_mm")]         
        public double CordonDiameter { get; set; }  //mm

        [XmlIgnore] private DateTime PruneDate { get; set; }
        [XmlIgnore] private RemovalFractions Remove { get; set; }
        
        [EventSubscribe("Commencing")]
        private void OnSimulationCommencing(object sender, EventArgs e)
        {
            Remove = new RemovalFractions();
        }
        
        [EventSubscribe("DoManagement")]
        private void OnDoManagement(object sender, EventArgs e)
        {
            //Set up  array of remove fractions to send with Cut method.  Each member in the array corresponds to an organ in the same order they are set up in.
            PruneDate = DateTime.Parse(PruneDateString);
                        
            if (PruneDate.Month == Clock.Today.Month && PruneDate.Day == Clock.Today.Day)
            {
                Remove.SetPhenologyStage = 1;
                Grapevine.RemoveBiomass("Prune", Remove);
            }

            {
            zone.Set("Grapevine.Cordon.CordonDiameter.FixedValue", CordonDiameter);   
            //calculate the biomass by length 1 meter time 2 cordons time density (0.0005 g/mm3)
            zone.Set("[Grapevine].Cordon.Live.StructuralWt", 3.14*(CordonDiameter/2)*(CordonDiameter/2)*2000*0.0005); 

                }


        }
    }
}
```
    Report: EventNames=[Clock].DoReport
      VariableNames:
        [Clock].Today
        [Clock].Today.Year
        [Clock].Today.DayOfYear
        [Weather].DaysSinceWinterSolstice as DAWS
        [Grapevine].Phenology.CurrentSeason as CurrentSeason
        [Grapevine].Phenology.Stage
        [Grapevine].Phenology.AccumulatedEmergedTT
        [Grapevine].Phenology.BudBurstDOY as BudBurstDOY
        [Grapevine].Phenology.FloweringDOY as FloweringDOY
        [Grapevine].Phenology.DoyJuly1st as DoyJuly1st
        [Grapevine].Phenology.VeraisonDOY as VeraisonDOY
        [Grapevine].Phenology.CurrentStageName as CurrentStageName
        [Grapevine].Phenology.Budding.AccChill
        [Grapevine].Phenology.AccChillMar1st
        [Grapevine].Phenology.Budding.FractionOfBudBurst
        [Grapevine].Structure.PrimaryBudNo
        [Grapevine].Structure.MainStemPopn
        [Grapevine].Structure.LeafTipsAppeared
        [Grapevine].Leaf.LAI
        [Grapevine].Leaf.Photosynthesis.Value
        [Grapevine].Leaf.InitialisedCohortNo
        [Grapevine].Leaf.DeadCohortNo
        [Grapevine].Leaf.AppearedCohortNo
        [Grapevine].Leaf.CohortSize
        [Grapevine].Leaf.Fn
        [Grapevine].Leaf.Fw
        [Grapevine].Leaf.Live.Wt
        [Grapevine].Shoot.Live.Wt
        [Grapevine].Cordon.Live.Wt
        [Grapevine].Cordon.Live.StructuralWt
        [Grapevine].Trunk.Live.Wt
        [Grapevine].Root.Live.Wt
        [Grapevine].Arbitrator.FDM
        [Grapevine].Arbitrator.DM.TotalFixationSupply
        [Berry].Live.Wt
        [Berry].BerryFreshWeight
        [Berry].MeanTempInitiationY0
        [Berry].MeanTempFlowering
        [Berry].BunchesPerShoot
        [Berry].FlowersPerBunch
        [Berry].BerriesPerBunch
        [Berry].NumberFunction
        [Berry].NumberFunction.Shoots
        [Berry].MetFactors.BUN_TmaxIni1 as BUN_TmaxIni
        [Berry].YieldComponent.BunchesPerVine
        [Berry].YieldComponent.BerryNum
        [Berry].YieldComponent.BerryMass
  DataStore
    ExcelInput PhenoObs: FileName=Observations\Marlborough_Sauvignon_blanc_PhenologyObs.xlsx; SheetNames=[Data]
    PredictedObserved PhenoPredObs: PredictedTableName=Report; ObservedTableName=Data; FieldNameUsedForMatch=CurrentSeason; FieldName2UsedForMatch=CurrentStageName
      Tests: POName=PhenoPredObs
        AcceptedStats:
          {Name=Grapevine.Phenology.BudBurstDOY.Value(), n=28, Slope=0.894701, Intercept=24.3971, SEslope=0.184787, SEintercept=51.6024, R2=0.474142, RMSE=7.90569, NSE=-0.49815, ME=-5, MAE=6.42857, RSR=1.20193}
          {Name=Grapevine.Phenology.FloweringDOY.Value(), n=28, Slope=0.721061, Intercept=83.4064, SEslope=0.118227, SEintercept=40.9894, R2=0.58859, RMSE=13.931, NSE=-3.87604, ME=-13.2857, MAE=13.2857, RSR=2.16839}
          {Name=Grapevine.Phenology.VeraisonDOY.Value(), n=28, Slope=0.534054, Intercept=-12.9508, SEslope=0.125269, SEintercept=6.00932, R2=0.411437, RMSE=35.5488, NSE=-19.4047, ME=-35, MAE=35, RSR=4.43576}
        AcceptedStatsName=Name n Slope Intercept SEslope SEintercept R2 RMSE NSE ME MAE RSR
  Folder PrimarySimulation
    Simulation BaseSim
      Zone Vineyard: Area=1; Slope=0; AspectAngle=0; Altitude=50
        Memo
          Double Guyôt-trained vines, pruned each year to retain 24 nodes were monitored. Vines were trained using vertical shoot positioning (VSP), with an exposed leaf area height of 1.2 m, and trimmed to maintain a compact canopy. Vines were planted 1.8 m apart within the row, and 2.4 m apart between rows. Average flowering date was determined by monitoring all the inflorescences on one cane on a vine in each plot on a regular basis throughout flowering. Likewise, regular berry samples (at least weekly) were taken from before the date of véraison until harvest at a soluble solids concentration value of 21.5 oBrix.
        Soil: SoilType=Sedementary; LocalName=Lincoln; Latitude=0; Longitude=0
          Physical
            Thickness  BD   AirDry  LL15  DUL   SAT
            100        1.2  0.08    0.16  0.33  0.5
            200        1.2  0.16    0.16  0.33  0.5
            300        1.2  0.15    0.15  0.31  0.44
            300        1.2  0.13    0.13  0.27  0.46
            300        1.2  0.15    0.15  0.3   0.44
            300        1.2  0.15    0.15  0.3   0.44
            SoilCrop GrapevineSoil: LL=[0.13, 0.16, 0.15, 0.15, 0.15, 0.15]; KL=[0.1, 0.06, 0.04, 0.01, 0.0051, 0.002]; XF=[1, 1, 1, 1, 0.5, 0.2]
          SoilWater: SummerDate=1-Nov; SummerU=9; SummerCona=4.4; WinterDate=1-Apr; WinterU=9; WinterCona=4.4; DiffusConst=88; DiffusSlope=35.4; Salb=0.18; CN2Bare=0; CNRed=-9e-05; CNCov=0; slope=0; discharge_width=0; catchment_area=0; max_pond=0; PrecipitationInterception=0
            Thickness  SWCON  KLAT
            100        0.55   0
            200        0.55   0
            300        0.55   0
            300        0.55   0
            300        0.55   0
            300        0.55   0
          SoilNitrogen: fom_types=[default, manure, mucuna, lablab, shemp, stable]; fract_carb=[0.2, 0.3, 0.54, 0.57, 0.45, 0]; fract_cell=[0.7, 0.3, 0.37, 0.37, 0.47, 0.1]; fract_lign=[0.1, 0.4, 0.09, 0.06, 0.08, 0.9]
            SoilNitrogenNO3 NO3
            SoilNitrogenNH4 NH4
            SoilNitrogenUrea Urea
            SoilNitrogenPlantAvailableNO3 PlantAvailableNO3
            SoilNitrogenPlantAvailableNH4 PlantAvailableNH4
          Organic: FOMCNRatio=30
            Thickness  Carbon  SoilCNRatio  FBiom  FInert  FOM
            100        3.5     11.5         0.025  0.3     1243.93
            200        2.5     11.5         0.025  0.4     833.832
            300        1.2     11.5         0.015  0.75    457.617
            300        1.03    11.5         0.01   0.9     251.145
            300        0.47    11.5         0.01   0.96    137.831
            300        0.47    11.5         0.01   0.96    75.6435
          Chemical
            Thickness  NO3N      NH4N       PH
            100        33.3333   0.0833333  6.6
            200        12.5      0.0416667  6.2
            300        3.88889   0.0277778  5.7
            300        3.88889   0.0277778  5.5
            300        0.383333  0.0277778  5.5
            300        0.383333  0.0277778  5.5
          InitialWater Initial water: PercentMethod=0; FractionFull=1
          Sample: Thickness=[100, 200, 300, 300, 300, 300]; SWUnits=Volumetric; OCUnits=Total; PHUnits=Water
          CERESSoilTemperature
        SurfaceOrganicMatter: InitialResidueName=Grapevine; InitialResidueType=Grapevine; InitialResidueMass=2000; InitialStandingFraction=0; InitialCPR=0; InitialCNR=80; FractionFaecesAdded=1
        MicroClimate: a_interception=0; b_interception=1; c_interception=0; d_interception=0; soil_albedo=0.23; SoilHeatFluxFraction=0.4; MinimumHeightDiffForNewLayer=0; NightInterceptionFraction=0.5; ReferenceHeight=2
        Irrigation
        Fertiliser
        Plant Grapevine: CropType=Grapevine; IsEnding=false; DaysAfterEnding=0
        Report: EventNames=[Clock].DoReport
        Folder Management
          Manager ExtraVariables: same as Replacements.Management.ExtraVariables
          Operations
            2004-01-01  [Grapevine].Sow(population: 0.231481, cultivar: "SauvignonBlanc", depth: 80, rowSpacing: 2400, budNumber:24);
          Manager Pruning
            PruneDateString = 1-May
```csharp
using System;
using System.Collections.Generic;
using Models.Core;
using Models.PMF;
using Models.PMF.Interfaces;
using System.Xml.Serialization;

namespace Models
{
    [Serializable] 
    [System.Xml.Serialization.XmlInclude(typeof(Model))]
    public class Script : Model
    {
        [Link] Plant Grapevine;
        [Link] Clock Clock;

        [Description("Prune Date")]
        public string PruneDateString { get; set; }
        [XmlIgnore] private DateTime PruneDate { get; set; }
        [XmlIgnore] private RemovalFractions Remove { get; set; }
        
        [EventSubscribe("Commencing")]
        private void OnSimulationCommencing(object sender, EventArgs e)
        {
            Remove = new RemovalFractions();
        }
        
        [EventSubscribe("DoManagement")]
        private void OnDoManagement(object sender, EventArgs e)
        {
            //Set up  array of remove fractions to send with Cut method.  Each member in the array corresponds to an organ in the same order they are set up in.
            PruneDate = DateTime.Parse(PruneDateString);
                        
            if (PruneDate.Month == Clock.Today.Month && PruneDate.Day == Clock.Today.Day)
            {
                Remove.SetPhenologyStage = 1;
                Grapevine.RemoveBiomass("Prune", Remove);
            }
        }
    }
}
```
      Weather: FileName=Blenheim.met
      Clock: Start=2004-01-01; End=2016-10-31
      Summary
      SoilArbitrator Soil Arbitrator
  Folder PhenoTest
    Experiment PhenoTest
      Factors
        Factor Climate
          Specification=[Weather].FileName = Site1001_BRA.met,Site1002_OYB.met,Site1003_SEA.met,Site1004_RPC.met
      Simulation PhenologyBase
        Weather: FileName=Site1004_RPC.met
        Clock: Start=2004-01-01; End=2017-07-01
        Summary
        SoilArbitrator Soil Arbitrator
        Zone Vineyard: Area=1; Slope=0; AspectAngle=0; Altitude=50
          Memo: same as PrimarySimulation.BaseSim.Vineyard.Memo
          Soil: SoilType=Sedementary; LocalName=Lincoln; Latitude=0; Longitude=0
            Physical
              Thickness  BD   AirDry  LL15  DUL   SAT
              100        1.2  0.08    0.16  0.33  0.5
              200        1.2  0.16    0.16  0.33  0.5
              300        1.2  0.15    0.15  0.31  0.44
              300        1.2  0.13    0.13  0.27  0.46
              300        1.2  0.15    0.15  0.3   0.44
              300        1.2  0.15    0.15  0.3   0.44
              SoilCrop GrapevineSoil: LL=[0.16, 0.16, 0.15, 0.13, 0.15, 0.15]; KL=[0.1, 0.06, 0.04, 0.01, 0.0051, 0.002]; XF=[1, 1, 1, 1, 0.5, 0.2]
            SoilWater: same as PrimarySimulation.BaseSim.Vineyard.Soil.SoilWater
            SoilNitrogen: same as PrimarySimulation.BaseSim.Vineyard.Soil.SoilNitrogen
            Organic: same as PrimarySimulation.BaseSim.Vineyard.Soil.Organic
            Chemical: same as PrimarySimulation.BaseSim.Vineyard.Soil.Chemical
            InitialWater Initial water: PercentMethod=0; FractionFull=1
            Sample: Thickness=[100, 200, 300, 300, 300, 300]; SWUnits=Volumetric; OCUnits=Total; PHUnits=Water
            CERESSoilTemperature
          SurfaceOrganicMatter: InitialResidueName=Grapevine; InitialResidueType=Grapevine; InitialResidueMass=2000; InitialStandingFraction=0; InitialCPR=0; InitialCNR=80; FractionFaecesAdded=1
          MicroClimate: a_interception=0; b_interception=1; c_interception=0; d_interception=0; soil_albedo=0.23; SoilHeatFluxFraction=0.4; MinimumHeightDiffForNewLayer=0; NightInterceptionFraction=0.5; ReferenceHeight=2
          Irrigation
          Fertiliser
          Plant Grapevine: CropType=Grapevine; IsEnding=false; DaysAfterEnding=0
          Report: EventNames=[Clock].DoReport
          Folder Management: same as PrimarySimulation.BaseSim.Vineyard.Management
  Folder Optimization
    Experiment ParameterOptimize
      Factors
        Permutation
          Factor Climate
            Specification=[Weather].FileName = Site1001_BRA.met,Site1002_OYB.met,Site1003_SEA.met,Site1004_RPC.met
          Factor VeraTarget
            Specification=[ParameterTest].Script.VeraTarget = 37, 38, 39, 40, 41, 42, 43, 44, 45
      Simulation OptimizationBase
        Weather: FileName=Site1004_RPC.met
        Clock: Start=2004-01-01; End=2017-07-01
        Summary
        SoilArbitrator Soil Arbitrator
        Zone Vineyard: Area=1; Slope=0; AspectAngle=0; Altitude=50
          Soil: same as PhenoTest.PhenoTest.PhenologyBase.Vineyard.Soil
          Memo: same as PrimarySimulation.BaseSim.Vineyard.Memo
          SurfaceOrganicMatter: InitialResidueName=Grapevine; InitialResidueType=Grapevine; InitialResidueMass=2000; InitialStandingFraction=0; InitialCPR=0; InitialCNR=80; FractionFaecesAdded=1
          MicroClimate: a_interception=0; b_interception=1; c_interception=0; d_interception=0; soil_albedo=0.23; SoilHeatFluxFraction=0.4; MinimumHeightDiffForNewLayer=0; NightInterceptionFraction=0.5; ReferenceHeight=2
          Irrigation
          Fertiliser
          Plant Grapevine: CropType=Grapevine; IsEnding=false; DaysAfterEnding=0
          Report: EventNames=[Clock].DoReport
          Folder Management: same as PrimarySimulation.BaseSim.Vineyard.Management
        Manager ParameterTest
          FlowerTarget = 28
          VeraTarget = 41
```csharp
using System;
using System.Collections.Generic;
using Models.Core;
using Models.PMF;
using Models.PMF.Interfaces;
using System.Xml.Serialization;

namespace Models
{
    [Serializable] 
    [System.Xml.Serialization.XmlInclude(typeof(Model))]
    public class Script : Model
    {
        [Link] Zone zone;
        [Link] Summary Summary;

        [Description("FlowerTarget")]
        public double FlowerTarget {get; set;}

        [Description("VeraTarget")]
        public double VeraTarget {get; set;}
      //  [Description("chill_a")]
       // public double chill_a  {get; set;}

       // [Description("chill_c")]
       // public double chill_c  {get; set;}
    
        //Description("EndoTarget")]
        //public double EndoTarget  {get; set;}
        //[Description("FloweringTarget")]
        //public double FloweringTarget  {get; set;}

                
        [EventSubscribe("PlantSowing")]
        private void OnPlantSowing(object sender, EventArgs e)
        {
            zone.Set("Grapevine.Phenology.Flowering.Target.FixedValue", FlowerTarget);
            zone.Set("Grapevine.Phenology.BerryDevelopment.Target.Base.FixedValue", VeraTarget);
            //zone.Set("Grapevine.Phenology.Budding.Target.ChillingTadjustment.A", chill_a);
           // zone.Set("Grapevine.Phenology.Budding.Target.ChillingTadjustment.C", chill_c);
            //zone.Set("Grapevine.Phenology.EndoDormancy.Target.FixedValue", EndoTarget);
            //zone.Set("Grapevine.Phenology.Flowering.Target.FixedValue", FloweringTarget);                      
        }
    }
}
```
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