Simulations: Version=6
  Replacements
    Nutrient
      MinimumFunction TemperatureFactorForMineralisation
        ExpressionFunction TF: Expression=([AbsT]^2)/([Topt]^2)
          Constant Topt: FixedValue=32
          MaximumFunction AbsT
            Constant Zero: FixedValue=0
            VariableReference: VariableName=[Soil].Temperature
        Constant One: FixedValue=1
      MinimumFunction WaterFactorForMineralisation
        Constant One: FixedValue=1
        LinearInterpolationFunction WF: XProperty=[SoilWaterScale]
          SoilWaterScale
          XYPairs: X=[0, 0.5, 1, 2]; Y=[0, 1, 1, 0.5]
      MinimumFunction CNRatioFactorForMineralisation
        Constant One: FixedValue=1
        ExpressionFunction CNRF: Expression=Exp(-0.693*([Nutrient].FOMCNR-25)/25)
      ExpressionFunction ppm2kgha: Expression=([Soil].BD*[Soil].Thickness)/100
      ExpressionFunction FOMC: Expression=[FOMLignin].C+[FOMCellulose].C+[FOMCarbohydrate].C
      ExpressionFunction FOMN: Expression=[FOMLignin].N+[FOMCellulose].N+[FOMCarbohydrate].N
      NutrientPool Inert
        ExpressionFunction InitialiseCarbon
          Expression=[SoilOrganicMatter].FInert*[SoilOrganicMatter].OC * 100 * [Soil].BD * [Soil].Thickness
        ExpressionFunction InitialiseNitrogen: Expression=[Inert].C / [Soil].SoilOrganicMatter.SoilCN
      NutrientPool SurfaceResidue
        Constant InitialiseCarbon: FixedValue=0
        Constant InitialiseNitrogen: FixedValue=0
        CarbonFlow Decomposition: destinationNames=[Biomass, Humic]; destinationFraction=[0.9, 0.1]
          Constant Rate: FixedValue=1
          Constant CO2Efficiency: FixedValue=0.4
      NutrientPool Biomass
        ExpressionFunction InitialiseCarbon
          Expression=(([SoilOrganicMatter].OC * 100 * [Soil].BD * [Soil].Thickness -[Inert].C) * [SoilOrganicMatter].FBiom) / (1 + [SoilOrganicMatter].FBiom)
        ExpressionFunction InitialiseNitrogen: Expression=[Biomass].C /  [CNRatio]
        Constant CNRatio: FixedValue=8
        CarbonFlow Decomposition: destinationNames=[Biomass, Humic]; destinationFraction=[0.6, 0.4]
          MultiplyFunction Rate
            Constant PotentialRate: FixedValue=0.0081
            VariableReference TF: VariableName=[TemperatureFactorForMineralisation]
            VariableReference WF: VariableName=[WaterFactorForMineralisation]
          Constant CO2Efficiency: FixedValue=0.4
      NutrientPool Humic
        ExpressionFunction InitialiseCarbon
          Expression=[SoilOrganicMatter].OC * 100 * [Soil].BD * [Soil].Thickness - [Biomass].C
        ExpressionFunction InitialiseNitrogen: Expression=[Humic].C / [Soil].SoilOrganicMatter.SoilCN
        CarbonFlow Decomposition: destinationNames=[Biomass]; destinationFraction=[1]
          MultiplyFunction Rate
            Constant PotentialRate: FixedValue=0.00015
            VariableReference TF: VariableName=[TemperatureFactorForMineralisation]
            VariableReference WF: VariableName=[WaterFactorForMineralisation]
          Constant CO2Efficiency: FixedValue=0.4
      NutrientPool FOMLignin
        Constant InitialiseCarbon: FixedValue=0
        Constant InitialiseNitrogen: FixedValue=0
        CarbonFlow Decomposition: destinationNames=[Biomass, Humic]; destinationFraction=[0.9, 0.1]
          MultiplyFunction Rate
            Constant PotentialRate: FixedValue=0.0095
            VariableReference TF: VariableName=[TemperatureFactorForMineralisation]
            VariableReference WF: VariableName=[WaterFactorForMineralisation]
            VariableReference CNRF: VariableName=[CNRatioFactorForMineralisation]
          Constant CO2Efficiency: FixedValue=0.4
      NutrientPool FOMCellulose
        Constant InitialiseCarbon: FixedValue=0
        Constant InitialiseNitrogen: FixedValue=0
        CarbonFlow Decomposition: destinationNames=[Biomass, Humic]; destinationFraction=[0.9, 0.1]
          MultiplyFunction Rate
            Constant PotentialRate: FixedValue=0.05
            VariableReference TF: VariableName=[TemperatureFactorForMineralisation]
            VariableReference WF: VariableName=[WaterFactorForMineralisation]
            VariableReference CNRF: VariableName=[CNRatioFactorForMineralisation]
          Constant CO2Efficiency: FixedValue=0.4
      NutrientPool FOMCarbohydrate
        Constant InitialiseCarbon: FixedValue=0
        Constant InitialiseNitrogen: FixedValue=0
        CarbonFlow Decomposition: destinationNames=[Biomass, Humic]; destinationFraction=[0.9, 0.1]
          MultiplyFunction Rate
            Constant PotentialRate: FixedValue=0.2
            VariableReference TF: VariableName=[TemperatureFactorForMineralisation]
            VariableReference WF: VariableName=[WaterFactorForMineralisation]
            VariableReference CNRF: VariableName=[CNRatioFactorForMineralisation]
          Constant CO2Efficiency: FixedValue=0.4
      NutrientPool Biochar
        Constant InitialiseCarbon: FixedValue=0
        Constant InitialiseNitrogen: FixedValue=0
      NFlow Hydrolysis: sourceName=Urea; destinationName=NH4
        Constant NLoss: FixedValue=0
        MultiplyFunction Rate
          BoundFunction PotentialRate
            Constant Upper: FixedValue=1
            Constant Lower: FixedValue=0.25
            ExpressionFunction Rate
              Expression=-1.12 + 1.31 * [Soil].OC + 0.203 * [Soil].PH - 0.155 * [Soil].OC * [Soil].PH
          MinimumFunction PNI
            BoundFunction WF
              Constant Upper: FixedValue=1
              Constant Lower: FixedValue=0
              ExpressionFunction Wfactor: Expression=[WaterFactorForMineralisation]+0.2
            BoundFunction TF
              Constant Upper: FixedValue=1
              Constant Lower: FixedValue=0
              ExpressionFunction Tfactor: Expression=([Soil].Temperature/40)+0.2
      NFlow Nitrification: sourceName=NH4; destinationName=NO3
        Constant NLoss: FixedValue=0
        MultiplyFunction Rate
          ExpressionFunction MichaelisMenton: Expression=40/([Soil].Nutrient.NH4.ppm+90)
          VariableReference ppm2kgha: VariableName=[ppm2kgha]
          MinimumFunction PNI
            LinearInterpolationFunction WF: XProperty=[SoilWaterScale]
              SoilWaterScale
              XYPairs: X=[0, 0.25, 1, 2]; Y=[0, 1, 1, 0]
            VariableReference TF: VariableName=[TemperatureFactorForMineralisation]
            LinearInterpolationFunction pHF: XProperty=[Soil].PH
              XYPairs: X=[4.5, 6, 8, 9]; Y=[0, 1, 1, 0]
      Solute NO3
      Solute NH4
      Solute Urea
  DataStore
  Folder SimplePoolTests
    Folder HumicDecay
      Memo
        This simple test has no initial FOM, microbial biomass, or inert C.  It simply tests that the hum pool is initialised and decays correctly.
      Simulation NutirentHumicDecay
        Clock: StartDate=2000-01-01; EndDate=2000-12-31
        Summary SummaryFile
        ControlledEnvironment: MaxT=25; MinT=15; Rain=0; Radn=0; PanEvap=5; VP=2; Wind=0; CO2=350; AirPressure=1010; Latitude=0; DayLength=12
        Zone Field: Area=1; Slope=0
          Report: EventNames=[Clock].DoReport
            VariableNames:
              [Clock].Today
              [Soil].Nutrient.Inert.N
              [Soil].Nutrient.Inert.C
              [Soil].Nutrient.Biomass.N
              [Soil].Nutrient.Biomass.C
              [Soil].Nutrient.Humic.N
              [Soil].Nutrient.Humic.C
              [Soil].Temperature
              [Soil].SoilWater.SW
              [Soil].Nutrient.HumicToBiomass.Rate.TemperatureFactor.Value()
              [Soil].Nutrient.NH4.kgha
              [Soil].Nutrient.NH4.ppm
              [Soil].Nutrient.NO3.kgha
              [Soil].Nutrient.NO3.ppm
              [Soil].Nutrient.urea.kgha
              [Soil].Nutrient.urea.ppm
          Fertiliser
          Soil: ASCOrder=Vertosol; ASCSubOrder=Black; SoilType=Clay; Site=Norwin; NearestTown=Norwin; Region=Darling Downs and Granite Belt; State=Queensland; Country=Australia; NaturalVegetation=Qld. Bluegrass, possible Qld. Blue gum; ApsoilNumber=900; Latitude=-27.581836; Longitude=151.320206; LocationAccuracy=+/- 20m
            DataSource=CSIRO Sustainable Ecosystems, Toowoomba; Characteriesd as part of the GRDC funded project"Doing it better, doing it smarter, managing soil water in Australian agriculture' 2011
            Comments=OC, CLL for all crops estimated-based on Bongeen Mywybilla Soil No1
            Water
              Thickness  BD  AirDry  LL15  DUL  SAT   KS
              100        1   0.1     0.25  0.5  0.55  20
              100        1   0.1     0.25  0.5  0.55  20
              100        1   0.1     0.25  0.5  0.55  20
            SoilWater: SummerDate=1-Nov; SummerU=5; SummerCona=5; WinterDate=1-Apr; WinterU=5; WinterCona=5; DiffusConst=40; DiffusSlope=16; Salb=0.12; CN2Bare=73; CNRed=20; CNCov=0.8; max_pond=0; Thickness=[100, 100, 100]; SWCON=[0.3, 0.3, 0.3]; residueinterception=0
            Nutrient
            SoilOrganicMatter: RootCN=40; RootWt=0; SoilCN=12; EnrACoeff=7.4; EnrBCoeff=0.2; OCUnits=Total
              Thickness  OC  FBiom  FInert
              100        1   0.001  0
              100        1   0.001  0
              100        1   0.001  0
            Analysis: Thickness=[100, 100, 100]; PH=[7, 7, 7]; PHUnits=Water; BoronUnits=HotWater
            InitialWater: PercentMethod=EvenlyDistributed; FractionFull=1
            Sample InitialN: NO3Units=ppm; NH4Units=ppm; SWUnits=Volumetric; OCUnits=Total; PHUnits=Water
              Thickness  NO3  NH4
              100        1    0.1
              100        1    0.1
              100        1    0.1
            CERESSoilTemperature
          SurfaceOrganicMatter: PoolName=wheat_stubble; type=wheat; mass=0; standing_fraction=0; cnr=100; CriticalResidueWeight=2000; OptimumDecompTemp=20; MaxCumulativeEOS=20; CNRatioDecompCoeff=0.277; CNRatioDecompThreshold=25; TotalLeachRain=25; MinRainToLeach=10; CriticalMinimumOrganicC=0.004; DefaultCPRatio=0; DefaultStandingFraction=0; StandingExtinctCoeff=0.5; FractionFaecesAdded=0.5
            Pools:
              {PoolName=wheat_stubble, ResidueType=wheat, Mass=0, CNRatio=100, StandingFraction=0}
            ResidueTypes: LoadFromResource=ResidueTypes
          Operations
            2000-07-01  [Fertiliser].Apply(Amount: 10, Type: Fertiliser.Types.UreaN);
          SoluteManager
      Simulation SoilNHumicDecay
        Clock: StartDate=2000-01-01; EndDate=2000-12-31
        Summary SummaryFile
        ControlledEnvironment: MaxT=25; MinT=15; Rain=0; Radn=0; PanEvap=5; VP=2; Wind=0; CO2=350; AirPressure=1010; Latitude=0; DayLength=12
        Zone Field: Area=1; Slope=0
          Report: EventNames=[Clock].DoReport
            VariableNames:
              [Clock].Today
              [Soil].SoilNitrogen.InertC
              [Soil].SoilNitrogen.HumicC
              [Soil].SoilNitrogen.MicrobialC
              [Soil].SoilNitrogen.InertN
              [Soil].SoilNitrogen.HumicN
              [Soil].SoilNitrogen.MicrobialN
              [Soil].Temperature
              [Soil].SoilWater.SW
              [Soil].SoilNitrogen.NH4
              [Soil].SoilNitrogen.NH4
              [Soil].SoilNitrogen.NO3
              [Soil].SoilNitrogen.NO3
              [Soil].SoilNitrogen.urea
              [Soil].SoilNitrogen.urea
          Fertiliser
          Soil: ASCOrder=Vertosol; ASCSubOrder=Black; SoilType=Clay; Site=Norwin; NearestTown=Norwin; Region=Darling Downs and Granite Belt; State=Queensland; Country=Australia; NaturalVegetation=Qld. Bluegrass, possible Qld. Blue gum; ApsoilNumber=900; Latitude=-27.581836; Longitude=151.320206; LocationAccuracy=+/- 20m
            DataSource=CSIRO Sustainable Ecosystems, Toowoomba; Characteriesd as part of the GRDC funded project"Doing it better, doing it smarter, managing soil water in Australian agriculture' 2011
            Comments=OC, CLL for all crops estimated-based on Bongeen Mywybilla Soil No1
            Water
              Thickness  BD  AirDry  LL15  DUL  SAT   KS
              100        1   0.1     0.25  0.5  0.55  20
              100        1   0.1     0.25  0.5  0.55  20
              100        1   0.1     0.25  0.5  0.55  20
            SoilWater: same as SimplePoolTests.HumicDecay.NutirentHumicDecay.Field.Soil.SoilWater
            SoilNitrogen: fom_type=[default, manure, mucuna, lablab, shemp, stable]; fract_carb=[0.2, 0.3, 0.54, 0.57, 0.45, 0]; fract_cell=[0.7, 0.3, 0.37, 0.37, 0.47, 0.1]; fract_lign=[0.1, 0.4, 0.09, 0.06, 0.08, 0.9]; wfpsN2N2O_x=[22, 88]; wfpsN2N2O_y=[0.1, 1]
            SoilOrganicMatter: RootCN=40; RootWt=0; SoilCN=12; EnrACoeff=7.4; EnrBCoeff=0.2; OCUnits=Total
              Thickness  OC  FBiom  FInert
              100        1   0.001  0
              100        1   0.001  0
              100        1   0.001  0
            Analysis: Thickness=[100, 100, 100]; PH=[7, 7, 7]; PHUnits=Water; BoronUnits=HotWater
            InitialWater: PercentMethod=EvenlyDistributed; FractionFull=1
            Sample InitialN: NO3Units=ppm; NH4Units=ppm; SWUnits=Volumetric; OCUnits=Total; PHUnits=Water
              Thickness  NO3  NH4
              100        1    0.1
              100        1    0.1
              100        1    0.1
            CERESSoilTemperature
          SurfaceOrganicMatter: same as SimplePoolTests.HumicDecay.NutirentHumicDecay.Field.SurfaceOrganicMatter
          Operations
            2000-07-01  [Fertiliser].Apply(Amount: 10, Type: Fertiliser.Types.UreaN);
          SoluteManager
    Folder Lucerne FOM Decay
      Memo
        This simple test has no initial FOM, microbial biomass, or inert C.  It simply tests that the hum pool is initialised and decays correctly.
      Simulation NutirentFOMDecay
        Clock: StartDate=2000-01-01; EndDate=2000-12-31
        Summary SummaryFile
        ControlledEnvironment: MaxT=25; MinT=15; Rain=0; Radn=0; PanEvap=5; VP=2; Wind=0; CO2=350; AirPressure=1010; Latitude=0; DayLength=12
        Zone Field: Area=1; Slope=0
          Report: EventNames=[Clock].DoReport
            VariableNames:
              [Clock].Today
              [Soil].Nutrient.Inert.N
              [Soil].Nutrient.Inert.C
              [Soil].Nutrient.Biomass.N
              [Soil].Nutrient.Biomass.C
              [Soil].Nutrient.Humic.N
              [Soil].Nutrient.Humic.C
              [Soil].Temperature
              [Soil].SoilWater.SW
              [Soil].Nutrient.HumicToBiomass.Rate.TemperatureFactor.Value()
              [Soil].Nutrient.NH4.kgha
              [Soil].Nutrient.NH4.ppm
              [Soil].Nutrient.NO3.kgha
              [Soil].Nutrient.NO3.ppm
              [Soil].Nutrient.urea.kgha
              [Soil].Nutrient.urea.ppm
              [Soil].Nutrient.FOMC
              [Soil].Nutrient.FOMN
              [Soil].Nutrient.FOMCNR
              [Soil].Nutrient.CNRatioFactorForMineralisation
              [Soil].Nutrient.TemperatureFactorForMineralisation.Value
          Fertiliser
          Soil: ASCOrder=Vertosol; ASCSubOrder=Black; SoilType=Clay; Site=Norwin; NearestTown=Norwin; Region=Darling Downs and Granite Belt; State=Queensland; Country=Australia; NaturalVegetation=Qld. Bluegrass, possible Qld. Blue gum; ApsoilNumber=900; Latitude=-27.581836; Longitude=151.320206; LocationAccuracy=+/- 20m
            DataSource=CSIRO Sustainable Ecosystems, Toowoomba; Characteriesd as part of the GRDC funded project"Doing it better, doing it smarter, managing soil water in Australian agriculture' 2011
            Comments=OC, CLL for all crops estimated-based on Bongeen Mywybilla Soil No1
            Water
              Thickness  BD  AirDry  LL15  DUL  SAT   KS
              100        1   0.1     0.25  0.5  0.55  20
              100        1   0.1     0.25  0.5  0.55  20
              100        1   0.1     0.25  0.5  0.55  20
            SoilWater: same as SimplePoolTests.HumicDecay.NutirentHumicDecay.Field.Soil.SoilWater
            Nutrient
              MinimumFunction TemperatureFactorForMineralisation: same as Replacements.Nutrient.TemperatureFactorForMineralisation
              MinimumFunction WaterFactorForMineralisation: same as Replacements.Nutrient.WaterFactorForMineralisation
              ExpressionFunction ppm2kgha: Expression=([Soil].BD*[Soil].Thickness)/100
              NutrientPool Inert
                ExpressionFunction InitialiseCarbon
                  Expression=[SoilOrganicMatter].FInert*[SoilOrganicMatter].OC * 100 * [Soil].BD * [Soil].Thickness
                ExpressionFunction InitialiseNitrogen: Expression=[Inert].C / [Soil].SoilOrganicMatter.SoilCN
              NutrientPool Biomass
                ExpressionFunction InitialiseCarbon
                  Expression=(([SoilOrganicMatter].OC * 100 * [Soil].BD * [Soil].Thickness -[Inert].C) * [SoilOrganicMatter].FBiom) / (1 + [SoilOrganicMatter].FBiom)
                ExpressionFunction InitialiseNitrogen: Expression=[Biomass].C /  [CNRatio]
                Constant CNRatio: FixedValue=8
              NutrientPool Humic
                ExpressionFunction InitialiseCarbon
                  Expression=[SoilOrganicMatter].OC * 100 * [Soil].BD * [Soil].Thickness - [Biomass].C
                ExpressionFunction InitialiseNitrogen: Expression=[Humic].C / [Soil].SoilOrganicMatter.SoilCN
              NutrientPool Biochar
                Constant InitialiseCarbon: FixedValue=0
                Constant InitialiseNitrogen: FixedValue=0
              CarbonFlow HumicToBiomass
                MultiplyFunction Rate
                  Constant PotentialRate: FixedValue=0.00015
                  VariableReference TF: VariableName=[TemperatureFactorForMineralisation]
                  VariableReference WF: VariableName=[WaterFactorForMineralisation]
                Constant CO2Efficiency: FixedValue=0.4
              CarbonFlow BiomassToHumic
                MultiplyFunction Rate
                  Constant PotentialRate: FixedValue=0.00324
                  VariableReference TF: VariableName=[TemperatureFactorForMineralisation]
                  VariableReference WF: VariableName=[WaterFactorForMineralisation]
                Constant CO2Efficiency: FixedValue=0.4
              CarbonFlow BiomassToBiomass
                MultiplyFunction Rate
                  Constant PotentialRate: FixedValue=0.00486
                  VariableReference TF: VariableName=[TemperatureFactorForMineralisation]
                  VariableReference WF: VariableName=[WaterFactorForMineralisation]
                Constant CO2Efficiency: FixedValue=0.4
              NFlow Hydrolysis: same as Replacements.Nutrient.Hydrolysis
              NFlow Nitrification: same as Replacements.Nutrient.Nitrification
              Solute NO3
              Solute NH4
              Solute Urea
            SoilOrganicMatter: RootCN=40; RootWt=0; SoilCN=12; EnrACoeff=7.4; EnrBCoeff=0.2; OCUnits=Total
              Thickness  OC  FBiom  FInert
              100        1   0.001  0
              100        1   0.001  0
              100        1   0.001  0
            Analysis: Thickness=[100, 100, 100]; PH=[7, 7, 7]; PHUnits=Water; BoronUnits=HotWater
            InitialWater: PercentMethod=EvenlyDistributed; FractionFull=1
            Sample InitialN: NO3Units=ppm; NH4Units=ppm; SWUnits=Volumetric; OCUnits=Total; PHUnits=Water
              Thickness  NO3  NH4
              100        1    0.1
              100        1    0.1
              100        1    0.1
            CERESSoilTemperature
          SurfaceOrganicMatter: same as SimplePoolTests.HumicDecay.NutirentHumicDecay.Field.SurfaceOrganicMatter
          Operations
            2000-07-01  [SurfaceOrganicMatter].Add(mass: 1000, N: 50, P:0.0, type: "lucerne", name: "");
            2000-07-01  [SurfaceOrganicMatter].Incorporate(fraction: 1.0, depth:100);
          SoluteManager
      Simulation SoilNFOMDecay
        Clock: StartDate=2000-01-01; EndDate=2000-12-31
        Summary SummaryFile
        ControlledEnvironment: MaxT=25; MinT=15; Rain=0; Radn=0; PanEvap=5; VP=2; Wind=0; CO2=350; AirPressure=1010; Latitude=0; DayLength=12
        Zone Field: Area=1; Slope=0
          Report: same as SimplePoolTests.HumicDecay.SoilNHumicDecay.Field.Report
          Fertiliser
          Soil: same as SimplePoolTests.HumicDecay.SoilNHumicDecay.Field.Soil
          SurfaceOrganicMatter: same as SimplePoolTests.HumicDecay.NutirentHumicDecay.Field.SurfaceOrganicMatter
          Operations
            2000-07-01  [SurfaceOrganicMatter].Add(mass: 1000, N: 50, P:0.0, type: "lucerne", name: "");
            2000-07-01  [SurfaceOrganicMatter].Incorporate(fraction: 1.0, depth:100);
          SoluteManager
    Folder Wheat FOM Decay
      Memo
        This simple test has no initial FOM, microbial biomass, or inert C.  It simply tests that the hum pool is initialised and decays correctly.
      Simulation NutirentWheatFOMDecay
        Clock: StartDate=2000-01-01; EndDate=2000-12-31
        Summary SummaryFile
        ControlledEnvironment: MaxT=25; MinT=15; Rain=0; Radn=0; PanEvap=5; VP=2; Wind=0; CO2=350; AirPressure=1010; Latitude=0; DayLength=12
        Zone Field: Area=1; Slope=0
          Report: EventNames=[Clock].DoReport
            VariableNames:
              [Clock].Today
              [Soil].Nutrient.Inert.N
              [Soil].Nutrient.Inert.C
              [Soil].Nutrient.Biomass.N
              [Soil].Nutrient.Biomass.C
              [Soil].Nutrient.Humic.N
              [Soil].Nutrient.Humic.C
              [Soil].Nutrient.FOMCarbohydrate.C[1] + [Soil].Nutrient.FOMCellulose.C[1] + [Soil].Nutrient.FOMLignin.C[1] as FOMC1
              [Soil].Nutrient.FOMCarbohydrate.N[1] + [Soil].Nutrient.FOMCellulose.N[1] + [Soil].Nutrient.FOMLignin.N[1] as FOMN1
              [Soil].Nutrient.FOMCarbohydrate.C[1]
              [Soil].Nutrient.FOMCellulose.C[1]
              [Soil].Nutrient.FOMLignin.C[1]
              [Soil].Nutrient.FOMCarbohydrate.N[1]
              [Soil].Nutrient.FOMCellulose.N[1]
              [Soil].Nutrient.FOMLignin.N[1]
              [Soil].Temperature
              [Soil].SoilWater.SW
              [Soil].Nutrient.HumicToBiomass.Rate.TemperatureFactor.Value()
              [Soil].Nutrient.NH4.kgha
              [Soil].Nutrient.NH4.ppm
              [Soil].Nutrient.NO3.kgha
              [Soil].Nutrient.NO3.ppm
              [Soil].Nutrient.urea.kgha
              [Soil].Nutrient.urea.ppm
              [Soil].Nutrient.FOMC
              [Soil].Nutrient.FOMN
              [Soil].Nutrient.FOMCNR
              [Soil].Nutrient.CNRatioFactorForMineralisation.Value
              [Soil].Nutrient.TemperatureFactorForMineralisation.Value
          Fertiliser
          Soil: same as SimplePoolTests.Lucerne FOM Decay.NutirentFOMDecay.Field.Soil
          SurfaceOrganicMatter: same as SimplePoolTests.HumicDecay.NutirentHumicDecay.Field.SurfaceOrganicMatter
          Operations
            2000-07-01  [SurfaceOrganicMatter].Add(mass: 1000, N: 5, P:0.0, type: "wheat", name: "");
            2000-07-01  [SurfaceOrganicMatter].Incorporate(fraction: 1.0, depth:100);
          SoluteManager
      Simulation SoilNWheatFOMDecay
        Clock: StartDate=2000-01-01; EndDate=2000-12-31
        Summary SummaryFile
        ControlledEnvironment: MaxT=25; MinT=15; Rain=0; Radn=0; PanEvap=5; VP=2; Wind=0; CO2=350; AirPressure=1010; Latitude=0; DayLength=12
        Zone Field: Area=1; Slope=0
          Report: EventNames=[Clock].DoReport
            VariableNames:
              [Clock].Today
              [Soil].SoilNitrogen.InertC
              [Soil].SoilNitrogen.HumicC
              [Soil].SoilNitrogen.MicrobialC
              [Soil].SoilNitrogen.FOMC[1]
              [Soil].SoilNitrogen.FOMN[1]
              [Soil].SoilNitrogen.InertN
              [Soil].SoilNitrogen.HumicN
              [Soil].SoilNitrogen.MicrobialN
              [Soil].Temperature
              [Soil].SoilWater.SW
              [Soil].SoilNitrogen.NH4
              [Soil].SoilNitrogen.NH4
              [Soil].SoilNitrogen.NO3
              [Soil].SoilNitrogen.NO3
              [Soil].SoilNitrogen.urea
              [Soil].SoilNitrogen.urea
          Fertiliser
          Soil: same as SimplePoolTests.HumicDecay.SoilNHumicDecay.Field.Soil
          SurfaceOrganicMatter: same as SimplePoolTests.HumicDecay.NutirentHumicDecay.Field.SurfaceOrganicMatter
          Operations
            2000-07-01  [SurfaceOrganicMatter].Add(mass: 1000, N: 5, P:0.0, type: "wheat", name: "");
            2000-07-01  [SurfaceOrganicMatter].Incorporate(fraction: 1.0, depth:100);
          SoluteManager
    Folder Surface Lucerne FOM Decomp
      Memo
        This simple test has no initial FOM, microbial biomass, or inert C.  It simply tests that the hum pool is initialised and decays correctly.
      Simulation NutirentSOMDecay
        Clock: StartDate=2000-01-01; EndDate=2000-12-31
        Summary SummaryFile
        ControlledEnvironment: MaxT=25; MinT=15; Rain=0; Radn=0; PanEvap=5; VP=2; Wind=0; CO2=350; AirPressure=1010; Latitude=0; DayLength=12
        Zone Field: Area=1; Slope=0
          Report: EventNames=[Clock].DoReport
            VariableNames:
              [Clock].Today
              [SurfaceOrganicMatter].Wt
              [SurfaceOrganicMatter].N
              [Soil].Nutrient.Inert.N
              [Soil].Nutrient.Inert.C
              [Soil].Nutrient.Biomass.N
              [Soil].Nutrient.Biomass.C
              [Soil].Nutrient.Humic.N
              [Soil].Nutrient.Humic.C
              [Soil].Temperature
              [Soil].SoilWater.SW
              [Soil].Nutrient.HumicToBiomass.Rate.TemperatureFactor.Value()
              [Soil].Nutrient.NH4.kgha
              [Soil].Nutrient.NH4.ppm
              [Soil].Nutrient.NO3.kgha
              [Soil].Nutrient.NO3.ppm
              [Soil].Nutrient.urea.kgha
              [Soil].Nutrient.urea.ppm
              [Soil].Nutrient.FOMC
              [Soil].Nutrient.FOMN
              [Soil].Nutrient.FOMCNR
              [Soil].Nutrient.CNRatioFactorForMineralisation
              [Soil].Nutrient.TemperatureFactorForMineralisation.Value
          Fertiliser
          Soil: same as SimplePoolTests.Lucerne FOM Decay.NutirentFOMDecay.Field.Soil
          SurfaceOrganicMatter: same as SimplePoolTests.HumicDecay.NutirentHumicDecay.Field.SurfaceOrganicMatter
          Operations
            2000-07-01  [SurfaceOrganicMatter].Add(mass: 1000, N: 50, P:0.0, type: "lucerne", name: "");
          SoluteManager
      Simulation SoilNSOMDecay
        Clock: StartDate=2000-01-01; EndDate=2000-12-31
        Summary SummaryFile
        ControlledEnvironment: MaxT=25; MinT=15; Rain=0; Radn=0; PanEvap=5; VP=2; Wind=0; CO2=350; AirPressure=1010; Latitude=0; DayLength=12
        Zone Field: Area=1; Slope=0
          Report: EventNames=[Clock].DoReport
            VariableNames:
              [Clock].Today
              [SurfaceOrganicMatter].Wt
              [SurfaceOrganicMatter].N
              [Soil].SoilNitrogen.InertC
              [Soil].SoilNitrogen.HumicC
              [Soil].SoilNitrogen.MicrobialC
              [Soil].SoilNitrogen.InertN
              [Soil].SoilNitrogen.HumicN
              [Soil].SoilNitrogen.MicrobialN
              [Soil].Temperature
              [Soil].SoilWater.SW
              [Soil].SoilNitrogen.NH4
              [Soil].SoilNitrogen.NH4
              [Soil].SoilNitrogen.NO3
              [Soil].SoilNitrogen.NO3
              [Soil].SoilNitrogen.urea
              [Soil].SoilNitrogen.urea
          Fertiliser
          Soil: same as SimplePoolTests.HumicDecay.SoilNHumicDecay.Field.Soil
          SurfaceOrganicMatter: same as SimplePoolTests.HumicDecay.NutirentHumicDecay.Field.SurfaceOrganicMatter
          Operations
            2000-07-01  [SurfaceOrganicMatter].Add(mass: 1000, N: 50, P:0.0, type: "lucerne", name: "");
          SoluteManager
    Folder Surface Wheat FOM Decomp
      Memo
        This simple test has no initial FOM, microbial biomass, or inert C.  It simply tests that the hum pool is initialised and decays correctly.
      Simulation NutirentWheatSOMDecay
        Clock: StartDate=2000-01-01; EndDate=2000-12-31
        Summary SummaryFile
        ControlledEnvironment: MaxT=25; MinT=15; Rain=0; Radn=0; PanEvap=5; VP=2; Wind=0; CO2=350; AirPressure=1010; Latitude=0; DayLength=12
        Zone Field: Area=1; Slope=0
          Report: same as SimplePoolTests.Surface Lucerne FOM Decomp.NutirentSOMDecay.Field.Report
          Fertiliser
          Soil: same as SimplePoolTests.Lucerne FOM Decay.NutirentFOMDecay.Field.Soil
          SurfaceOrganicMatter: same as SimplePoolTests.HumicDecay.NutirentHumicDecay.Field.SurfaceOrganicMatter
          Operations
            2000-07-01  [SurfaceOrganicMatter].Add(mass: 1000, N: 5, P:0.0, type: "wheat", name: "");
          SoluteManager
      Simulation SoilNWheatSOMDecay
        Clock: StartDate=2000-01-01; EndDate=2000-12-31
        Summary SummaryFile
        ControlledEnvironment: MaxT=25; MinT=15; Rain=0; Radn=0; PanEvap=5; VP=2; Wind=0; CO2=350; AirPressure=1010; Latitude=0; DayLength=12
        Zone Field: Area=1; Slope=0
          Report: same as SimplePoolTests.Surface Lucerne FOM Decomp.SoilNSOMDecay.Field.Report
          Fertiliser
          Soil: same as SimplePoolTests.HumicDecay.SoilNHumicDecay.Field.Soil
          SurfaceOrganicMatter: same as SimplePoolTests.HumicDecay.NutirentHumicDecay.Field.SurfaceOrganicMatter
          Operations
            2000-07-01  [SurfaceOrganicMatter].Add(mass: 1000, N: 5, P:0.0, type: "wheat", name: "");
          SoluteManager
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