Simulations: Version=147
  Memo Introduction
    The APSIM Maize model has been tested on a range of datasets from around the world to provide tests across a range of environmental conditions.  Tests include ranges in plant population, nitrogen management and irrigation levels, as well as including historical datasets from africa using cultivars developed during the 1960's, through to modern varieties grown in the American mid-West.
  DataStore
    ExcelInput Observed: FileNames=[Observations\MaizeObservations.xlsx]; SheetNames=[Observed]
    PredictedObserved: PredictedTableName=HarvestReport; ObservedTableName=Observed; FieldNameUsedForMatch=Maize.Phenology.CurrentStageName; AllColumns=false
    Probability: TableName=SensibilityReport; Exceedence=false; FieldToSplitOn=SimulationName
  Replacements
    Report HarvestReport: EventNames=[Maize].Harvesting
      VariableNames:
        [Clock].Today
        [Maize].Phenology.CurrentStageName
        [Maize].Grain.Wt
        [Maize].Stem.Wt
        [Maize].EarLive.Wt
        [Maize].Leaf.Live.Wt
        [Maize].Root.Live.Wt
        [Maize].Husk.Wt
        [Maize].Rachis.Wt
        [Maize].EarLive.N
        [Maize].Grain.N
        [Maize].Stem.N
        [Maize].Leaf.Live.N
        [Maize].Root.Live.N
        [Maize].Root.Depth
        [Maize].AboveGround.N
        [Maize].AboveGround.Wt
        [Maize].Total.N
        [Maize].Total.Wt
        max of [Maize].Leaf.LAI from [Maize].Sowing to [Maize].Harvesting as LAImax
        [Maize].Grain.Number
        [Maize].Grain.Size
        [Maize].Population
        [Maize].Phenology.FloweringDAS as FloweringDAS
        [Maize].Phenology.MaturityDAS as MaturityDAS
        [Maize].Structure.FinalLeafNumber
  Folder Validation
    Folder Combined Results
      Memo Combined Results
        Simulation results for the combined datasets from the various countries are shown in the following graphs.  The model is able to adequately capture the influence of growing conditions (soil, climate) and management (population, Nitrogen, irrigation, sowing date).
    Folder Africa
      Memo
        A selection of data from Kenya has been included from the work of [Keating_etal_1992].  These include the trial originally labelled JMW2 by the original authors and was labelled Experiment 6 in [Keating_etal_1992].  This trial includes maize (cultivar Katumani Composite B) sown at 5 populations (1.1, 2.2, 4.4, 6.6 and 8.8 plants/m2) under low (0 kg N/ha applied) and high (120 kgN/ha) fertiliser conditions during the Long Rains of 1988.  This same experimental design was conducted at two locations, Katumani (1o 35' S, 37o 14' E) and Kiboko (2o 13' S, 37o 43' E). The trial was rainfed at Katumani but fully irrigated at Kiboko.  Yields ranged from 2000 to 5400 kg/ha at Katumani and 1000 to 6000 kg/ha at Kiboko.  There were strong population x nitrogen interactions at both sites.  A second trial refered to as BMW1 or Experiment 1 in [Keating_etal_1992].  A range of populations (2.0-6.5 plants/m2) and irrigation treatments (6-176 mm) where planted under high (80 kgN/ha) and low (0kgN/ha) fertiliser conditions at Katumani. Individual replicates are modelled separately due to variability in soil (depth to rock), establishment and irrigation application.  Grain yields varied from 1600 to 8000 kg/ha.

        Note.  The BMW1 trail consists of data from unreplicated plots.
      Experiment JMW2Katumani
        Factors
          Permutation
            Factor Popn: Specification=[Sowing]
              Operations 11
                1988-03-24  [Maize].Sow(population:1.1, cultivar:"Katumani", depth:50, rowSpacing:750);
              Operations 22
                1988-03-24  [Maize].Sow(population:2.18, cultivar:"Katumani", depth:50, rowSpacing:750);
              Operations 44
                1988-03-24  [Maize].Sow(population:4.22, cultivar:"Katumani", depth:50, rowSpacing:750);
              Operations 66
                1988-03-24  [Maize].Sow(population:6.2, cultivar:"Katumani", depth:50, rowSpacing:750);
              Operations 88
                1988-03-24  [Maize].Sow(population:7.3, cultivar:"Katumani", depth:50, rowSpacing:750);
            Factor Fert: Specification=[NRate]
              Operations N0
              Operations N120
                1988-04-15  [Fertiliser].Apply(60, Fertiliser.Types.NH4NO3N, 10);
                1988-04-29  [Fertiliser].Apply(60, Fertiliser.Types.NH4NO3N, 10);
        Simulation JMW2Katumani
          Memo
            <?xml version="1.0" encoding="UTF-8"?>
            <!DOCTYPE html PUBLIC "-//W3C//DTD XHTML 1.1//EN" "http://www.w3.org/TR/xhtml11/DTD/xhtml11.dtd">
          Weather: FileName=%root%\Tests\Validation\Maize\KATUMANI.MET
          Clock: Start=1988-01-01; End=1988-09-30
          Summary summaryfile
          SoilArbitrator Soil Arbitrator
          Zone Field: Area=1; Slope=0; AspectAngle=0; Altitude=50
            Plant Maize
            MicroClimate: a_interception=0; b_interception=1; c_interception=0; d_interception=0; SoilHeatFluxFraction=0.4; MinimumHeightDiffForNewLayer=0; NightInterceptionFraction=0.5; ReferenceHeight=2
            Irrigation
            Fertiliser
            SurfaceOrganicMatter: InitialResidueName=maize; InitialResidueType=maize; InitialResidueMass=500; InitialStandingFraction=0; InitialCPR=0; InitialCNR=65
            Operations Sowing
            Operations NRate
            Soil: Latitude=0; Longitude=0
              Physical
                Thickness  BD    AirDry  LL15  DUL   SAT
                100        1.35  0.04    0.14  0.25  0.35
                100        1.35  0.14    0.14  0.25  0.35
                100        1.35  0.14    0.14  0.29  0.37
                200        1.4   0.15    0.15  0.29  0.37
                200        1.4   0.16    0.16  0.29  0.38
                200        1.4   0.16    0.16  0.29  0.38
                200        1.4   0.16    0.16  0.29  0.38
                200        1.4   0.16    0.16  0.29  0.38
                400        1.4   0.16    0.16  0.29  0.38
                SoilCrop MaizeSoil: LL=[0.14, 0.14, 0.14, 0.15, 0.16, 0.16, 0.16, 0.16, 0.16]; KL=[0.08, 0.08, 0.08, 0.08, 0.06, 0.04, 0.03, 0.02, 0.01]; XF=[1, 1, 1, 1, 1, 1, 1, 1, 1]
              WaterBalance SoilWater: SummerDate=1-Nov; SummerU=9; SummerCona=3; WinterDate=1-Apr; WinterU=9; WinterCona=3; DiffusConst=88; DiffusSlope=35.4; Salb=0.13; CN2Bare=50; CNRed=20; CNCov=0.8; Thickness=[100, 100, 100, 200, 200, 200, 200, 200, 200]; SWCON=[0.5, 0.5, 0.5, 0.5, 0.5, 0.5, 0.5, 0.5, 0.5]
              Organic: FOMCNRatio=45
                Thickness  Carbon  SoilCNRatio  FBiom  FInert  FOM
                100        1.2     14.5         0.02   0.42    268.216
                100        1       14.5         0.01   0.5     219.597
                100        0.86    14.5         0.01   0.58    179.791
                200        0.83    14.5         0.01   0.55    120.517
                200        0.58    14.5         0.01   0.86    80.7852
                200        0.54    14.5         0.01   0.9     54.1519
                200        0.47    14.5         0.01   0.95    36.2991
                200        0.5     14.5         0.01   0.95    24.332
                200        0.5     14.5         0.01   0.95    16.3103
              Chemical
                Thickness  NO3N  NH4N  PH
                100        5     1.7   6
                100        7     1.8   6
                100        2     1.5   6
                200        1     1.4   6.2
                200        1     1.3   6.5
                200        0.8   1.2   6.7
                200        0.8   1.1   6.8
                200        0.9   1     6.8
                200        0.5   1.2   6.8
              Sample InitialSW: Thickness=[100, 100, 100, 200, 200, 200, 200, 200, 200]; SWUnits=Volumetric; OCUnits=Total; PHUnits=Water
                SW=[0.162, 0.162, 0.17, 0.178, 0.186, 0.186, 0.186, 0.186, 0.222]
              CERESSoilTemperature Temperature
              Nutrient
            Report HarvestReport: EventNames=[Maize].Harvesting
              VariableNames:
                [Clock].Today
                [Maize].Phenology.CurrentStageName as Stage
                [Maize].Grain.Wt as GrainWt
                [Maize].Stem.Wt
                [Maize].EarLive.Wt
                [Maize].Leaf.Live.Wt
                [Maize].Root.Live.Wt
                [Maize].Husk.Wt
                [Maize].Rachis.Wt
                [Maize].EarLive.N
                [Maize].Grain.N
                [Maize].Stem.N
                [Maize].Leaf.Live.N
                [Maize].Root.Live.N
                [Maize].Root.Depth
                [Maize].AboveGround.N
                [Maize].AboveGround.Wt as Biomass
                [Maize].Total.N
                [Maize].Total.Wt
                max of [Maize].Leaf.LAI from [Maize].Sowing to [Maize].Harvesting as LAImax
                [Maize].Grain.NumberFunction as GPSM
                [Maize].Grain.Size as GrainSize
                [Maize].Population
                [Maize].Phenology.FloweringDAS as FloweringDAS
                [Maize].Phenology.MaturityDAS as MaturityDAS
            Manager Harvesting
```csharp
using Models.PMF.Phen;
using APSIM.Shared.Utilities;
using System.Xml.Serialization;
using Models;
using Models.PMF;
using Models.Soils;
using System.Text;
using System.Collections.Generic;
using Models.Core;
using System;
using Models.Soils.Nutrients;

namespace Models
{
    [Serializable] 
    public class Script : Model
    {      
        [Link] private Plant Maize;
        [Link] private Zone zone;
        [Link(Type = LinkType.Path, Path = "[Maize].Phenology")]
        private Phenology phenology;
                    
        
        [EventSubscribe("StartOfSimulation")]
        private void OnSimulationCommencing(object sender, EventArgs e)
        {
        }       
        
        [EventSubscribe("DoManagement")]
        private void OnDoManagement(object sender, EventArgs e)
        {
        if (phenology.CurrentPhase.Name=="ReadyForHarvesting")
           {
           Maize.Harvest();
           Maize.EndCrop();
           }
        }
        
        [EventSubscribe("DoManagementCalculations")]
        private void OnDoManagementCalculations(object sender, EventArgs e)
        {
            
        }
    }
}
```
      Experiment JMW2Kiboko
        Factors
          Permutation
            Factor Popn: Specification=[Sowing]
              Operations 11
                1988-04-06  [Maize].Sow(population:1.11, cultivar:"Katumani", depth:50, rowSpacing:750);
              Operations 22
                1988-04-06  [Maize].Sow(population:2.18, cultivar:"Katumani", depth:50, rowSpacing:750);
              Operations 44
                1988-04-06  [Maize].Sow(population:4.31, cultivar:"Katumani", depth:50, rowSpacing:750);
              Operations 66
                1988-04-06  [Maize].Sow(population:6.37, cultivar:"Katumani", depth:50, rowSpacing:750);
              Operations 88
                1988-04-06  [Maize].Sow(population:7.79, cultivar:"Katumani", depth:50, rowSpacing:750);
            Factor Fert: Specification=[NRate]
              Operations N0
              Operations N120
                1988-04-13  [Fertiliser].Apply(60, Fertiliser.Types.NH4NO3N, 10);
                1988-04-27  [Fertiliser].Apply(60, Fertiliser.Types.NH4NO3N, 10);
        Simulation JMW2Kiboko
          Weather: FileName=%root%\Tests\Validation\Maize\KIBOKO.MET
          Clock: Start=1988-01-01; End=1988-10-17
          Summary summaryfile
          SoilArbitrator Soil Arbitrator
          Zone Field: Area=1; Slope=0; AspectAngle=0; Altitude=50
            Plant Maize
            MicroClimate: a_interception=0; b_interception=1; c_interception=0; d_interception=0; SoilHeatFluxFraction=0.4; MinimumHeightDiffForNewLayer=0; NightInterceptionFraction=0.5; ReferenceHeight=2
            Irrigation
            Fertiliser
            SurfaceOrganicMatter: InitialResidueName=maize; InitialResidueType=maize; InitialResidueMass=300; InitialStandingFraction=0; InitialCPR=0; InitialCNR=65
            Operations Sowing
            Operations NRate
            Soil: Latitude=0; Longitude=0
              Physical
                Thickness  BD    AirDry  LL15  DUL   SAT
                100        1.35  0.04    0.13  0.23  0.34
                100        1.35  0.13    0.13  0.23  0.34
                100        1.35  0.13    0.13  0.24  0.35
                200        1.35  0.16    0.16  0.27  0.37
                200        1.35  0.18    0.18  0.28  0.37
                200        1.35  0.18    0.18  0.28  0.37
                200        1.35  0.19    0.19  0.28  0.37
                200        1.35  0.19    0.19  0.28  0.37
                200        1.35  0.18    0.18  0.27  0.37
                SoilCrop MaizeSoil: LL=[0.13, 0.13, 0.13, 0.16, 0.18, 0.18, 0.19, 0.19, 0.18]; KL=[0.08, 0.08, 0.08, 0.08, 0.06, 0.04, 0.03, 0.02, 0.01]; XF=[1, 1, 1, 1, 1, 1, 1, 1, 1]
              WaterBalance SoilWater: SummerDate=1-Nov; SummerU=9; SummerCona=3; WinterDate=1-Apr; WinterU=9; WinterCona=3; DiffusConst=88; DiffusSlope=35.4; Salb=0.13; CN2Bare=65; CNRed=20; CNCov=0.8; Thickness=[100, 100, 100, 200, 200, 200, 200, 200, 200]; SWCON=[0.5, 0.5, 0.5, 0.5, 0.5, 0.5, 0.5, 0.5, 0.5]
              Organic: FOMCNRatio=45
                Thickness  Carbon  SoilCNRatio  FBiom  FInert  FOM
                100        0.92    14.5         0.02   0.4     268.216
                100        1.02    14.5         0.015  0.4     219.597
                100        0.77    14.5         0.01   0.5     179.791
                200        0.63    14.5         0.01   0.66    120.517
                200        0.63    14.5         0.01   0.66    80.7852
                200        0.53    14.5         0.01   0.8     54.1519
                200        0.48    14.5         0.01   0.9     36.2991
                200        0.38    14.5         0.01   0.95    24.332
                200        0.33    14.5         0.01   0.95    16.3103
              Chemical
                Thickness  NO3N  NH4N  PH
                100        2.1   0.1   6
                100        2.9   0.1   6
                100        2.1   0.1   6
                200        1.5   0.1   6.2
                200        1.9   0.1   6.5
                200        1.1   0.1   6.7
                200        0.8   0.1   6.8
                200        1.1   0.1   6.8
                200        1.3   0.1   6.8
              Sample InitialSW: Thickness=[100, 100, 100, 200, 200, 200, 200, 200, 200]; SW=[0.12, 0.21, 0.22, 0.26, 0.28, 0.27, 0.25, 0.21, 0.21]; SWUnits=Volumetric; OCUnits=Total; PHUnits=Water
              CERESSoilTemperature Temperature
              Nutrient
            Operations IrrigSchedule
              1985-11-12  [Irrigation].Apply(17.00);
              1988-05-06  [Irrigation].Apply(52.10);
              1988-05-18  [Irrigation].Apply(72.50);
              1988-05-29  [Irrigation].Apply(76.50);
              1988-06-08  [Irrigation].Apply(105.50);
              1988-07-04  [Irrigation].Apply(68.90);
            Report HarvestReport: same as Validation.Africa.JMW2Katumani.JMW2Katumani.Field.HarvestReport
            Manager Harvesting: same as Validation.Africa.JMW2Katumani.JMW2Katumani.Field.Harvesting
      Experiment BMW1
        Factors
          Factor Site
            CompositeFactor Treatment1
              Specifications:
                [Operations]
                [soil]
              Operations 1
                1985-10-29  [Maize].Sow(population:2.53, cultivar:"Katumani", depth:50, rowSpacing:750);
                1985-11-08  [Fertiliser].Apply(50, Fertiliser.Types.NH4NO3N, 10);
                1985-11-29  [Fertiliser].Apply(30, Fertiliser.Types.NH4NO3N, 10);
                1985-11-12  [Irrigation].Apply(17.00);
                1985-11-16  [Irrigation].Apply(8.00);
                1985-11-20  [Irrigation].Apply(18.00);
                1985-11-26  [Irrigation].Apply(13.00);
                1985-11-28  [Irrigation].Apply(14.00);
                1985-12-05  [Irrigation].Apply(10.00);
                1985-12-10  [Irrigation].Apply(15.00);
                1985-12-15  [Irrigation].Apply(8.00);
                1985-12-18  [Irrigation].Apply(8.00);
                1985-12-23  [Irrigation].Apply(20.00);
                1986-01-05  [Irrigation].Apply(30.00);
                1986-01-20  [Irrigation].Apply(15.00);
              Soil: Latitude=0; Longitude=0
                Physical
                  Thickness  BD    AirDry  LL15  DUL   SAT
                  100        1.35  0.04    0.14  0.25  0.3
                  100        1.35  0.14    0.14  0.25  0.3
                  100        1.35  0.15    0.15  0.29  0.32
                  200        1.4   0.16    0.16  0.3   0.33
                  200        1.4   0.18    0.18  0.3   0.34
                  200        1.4   0.18    0.18  0.3   0.35
                  200        1.4   0.18    0.18  0.31  0.36
                  200        1.4   0.18    0.18  0.32  0.37
                  200        1.4   0.18    0.18  0.31  0.37
                  SoilCrop MaizeSoil: LL=[0.14, 0.14, 0.15, 0.16, 0.18, 0.18, 0.18, 0.18, 0.18]; KL=[0.08, 0.08, 0.08, 0.08, 0.06, 0.04, 0.03, 0.02, 0.01]; XF=[1, 1, 1, 1, 1, 1, 1, 1, 1]
                WaterBalance SoilWater: SummerDate=1-Nov; SummerU=9; SummerCona=2.5; WinterDate=1-Apr; WinterU=9; WinterCona=2.5; DiffusConst=88; DiffusSlope=35.4; Salb=0.13; CN2Bare=65; CNRed=20; CNCov=0.8; Thickness=[100, 100, 100, 200, 200, 200, 200, 200, 200]; SWCON=[0.5, 0.5, 0.5, 0.5, 0.5, 0.5, 0.5, 0.5, 0.5]
                Organic: FOMCNRatio=45
                  Thickness  Carbon  SoilCNRatio  FBiom  FInert  FOM
                  100        1.15    14.5         0.04   0.39    268.216
                  100        1.04    14.5         0.02   0.47    219.597
                  100        0.74    14.5         0.015  0.52    179.791
                  200        0.56    14.5         0.01   0.62    120.517
                  200        0.4     14.5         0.01   0.74    80.7852
                  200        0.49    14.5         0.01   0.83    54.1519
                  200        0.49    14.5         0.01   0.93    36.2991
                  200        0.49    14.5         0.01   0.93    24.332
                  200        0.49    14.5         0.01   0.93    16.3103
                Chemical
                  Thickness  NO3N  NH4N  PH
                  100        15    5     6
                  100        10    2.5   6
                  100        5     1.5   6
                  200        5     1.5   6.2
                  200        5     1.5   6.5
                  200        5     1.5   6.7
                  200        2     1.5   6.8
                  200        2     1.5   6.8
                  200        1.5   1.5   6.8
                Sample InitialN: Thickness=[100, 100, 100, 200, 200, 200, 200, 200, 200]; SWUnits=Volumetric; OCUnits=Total; PHUnits=Water
                Sample: Thickness=[100, 100, 100, 200, 200, 200, 200, 200, 200]; SWUnits=Volumetric; OCUnits=Total; PHUnits=Water
                  SW=[0.196, 0.196, 0.234, 0.224, 0.197, 0.199, 0.219, 0.225, 0.234]
                CERESSoilTemperature Temperature
                Nutrient
            CompositeFactor Treatment2
              Specifications:
                [Operations]
                [soil]
              Operations 2
                1985-10-29  [Maize].Sow(population:6.23, cultivar:"Katumani", depth:50, rowSpacing:750);
                1985-11-12  [Irrigation].Apply(17.00);
                1985-11-16  [Irrigation].Apply(8.00);
                1985-11-20  [Irrigation].Apply(18.00);
                1985-11-26  [Irrigation].Apply(13.00);
                1985-11-28  [Irrigation].Apply(14.00);
                1985-12-05  [Irrigation].Apply(10.00);
                1985-12-10  [Irrigation].Apply(15.00);
                1985-12-15  [Irrigation].Apply(8.00);
                1985-12-18  [Irrigation].Apply(8.00);
                1985-12-23  [Irrigation].Apply(20.00);
                1986-01-05  [Irrigation].Apply(30.00);
                1986-01-20  [Irrigation].Apply(15.00);
              Soil: Latitude=0; Longitude=0
                Physical
                  Thickness  BD    AirDry  LL15  DUL   SAT
                  100        1.35  0.04    0.14  0.25  0.3
                  100        1.35  0.14    0.14  0.25  0.3
                  100        1.35  0.15    0.15  0.29  0.32
                  200        1.4   0.16    0.16  0.3   0.33
                  200        1.4   0.18    0.18  0.3   0.34
                  200        1.4   0.18    0.18  0.3   0.35
                  200        1.4   0.18    0.18  0.31  0.36
                  200        1.4   0.18    0.18  0.32  0.37
                  300        1.4   0.18    0.18  0.31  0.37
                  300        1.4   0.18    0.18  0.31  0.37
                  SoilCrop MaizeSoil
                    LL=[0.14, 0.14, 0.15, 0.16, 0.18, 0.18, 0.18, 0.18, 0.18, 0.18]
                    KL=[0.08, 0.08, 0.08, 0.08, 0.06, 0.04, 0.03, 0.02, 0.01, 0.01]
                    XF=[1, 1, 1, 1, 1, 1, 1, 1, 1, 1]
                WaterBalance SoilWater: SummerDate=1-Nov; SummerU=9; SummerCona=2.5; WinterDate=1-Apr; WinterU=9; WinterCona=2.5; DiffusConst=88; DiffusSlope=35.4; Salb=0.13; CN2Bare=65; CNRed=20; CNCov=0.8; Thickness=[100, 100, 100, 200, 200, 200, 200, 200, 300, 300]; SWCON=[0.5, 0.5, 0.5, 0.5, 0.5, 0.5, 0.5, 0.5, 0.5, 0.5]
                Organic: FOMCNRatio=45
                  Thickness  Carbon  SoilCNRatio  FBiom  FInert  FOM
                  100        1.15    14.5         0.04   0.39    232.888
                  100        1.04    14.5         0.02   0.47    198.873
                  100        0.74    14.5         0.015  0.52    169.825
                  200        0.56    14.5         0.01   0.62    123.839
                  200        0.4     14.5         0.01   0.74    90.3048
                  200        0.49    14.5         0.01   0.83    65.8514
                  200        0.49    14.5         0.01   0.93    48.0197
                  200        0.49    14.5         0.01   0.93    35.0166
                  300        0.49    14.5         0.01   0.93    21.805
                  300        0.49    14.5         0.01   0.93    13.578
                Chemical
                  Thickness  NO3N  NH4N  PH
                  100        15    5     6
                  100        10    2.5   6
                  100        5     1.5   6
                  200        5     1.5   6.2
                  200        5     1.5   6.5
                  200        5     1.5   6.7
                  200        2     1.5   6.8
                  200        2     1.5   6.8
                  300        1.5   1.5   6.8
                  300        1.5   1.5   6.8
                Sample InitialN: Thickness=[100, 100, 100, 200, 200, 200, 200, 200, 300, 300]; SWUnits=Volumetric; OCUnits=Total; PHUnits=Water
                Sample: Thickness=[100, 100, 100, 200, 200, 200, 200, 200, 300, 300]; SWUnits=Volumetric; OCUnits=Total; PHUnits=Water
                  SW=[0.17, 0.17, 0.212, 0.208, 0.21, 0.213, 0.229, 0.23, 0.244, 0.233]
                CERESSoilTemperature Temperature
                Nutrient
            CompositeFactor Treatment3
              Specifications:
                [Operations]
                [soil]
              Operations 3
                1985-10-29  [Maize].Sow(population:6.29, cultivar:"Katumani", depth:50, rowSpacing:750);
                1985-11-08  [Fertiliser].Apply(50, Fertiliser.Types.NH4NO3N, 10);
                1985-11-29  [Fertiliser].Apply(30, Fertiliser.Types.NH4NO3N, 10);
                1985-11-12  [Irrigation].Apply(17.00);
                1985-11-16  [Irrigation].Apply(8.00);
                1985-11-20  [Irrigation].Apply(18.00);
                1985-11-26  [Irrigation].Apply(13.00);
                1985-11-28  [Irrigation].Apply(14.00);
                1985-12-05  [Irrigation].Apply(10.00);
                1985-12-10  [Irrigation].Apply(15.00);
                1985-12-15  [Irrigation].Apply(8.00);
                1985-12-18  [Irrigation].Apply(8.00);
                1985-12-23  [Irrigation].Apply(20.00);
                1986-01-05  [Irrigation].Apply(30.00);
                1986-01-20  [Irrigation].Apply(15.00);
              Soil: Latitude=0; Longitude=0
                Physical: same as Validation.Africa.BMW1.Factors.Site.Treatment1.soil.Physical
                WaterBalance SoilWater: same as Validation.Africa.BMW1.Factors.Site.Treatment1.soil.SoilWater
                Organic: same as Validation.Africa.BMW1.Factors.Site.Treatment1.soil.Organic
                Chemical: same as Validation.Africa.BMW1.Factors.Site.Treatment1.soil.Chemical
                Sample: same as Validation.Africa.BMW1.Factors.Site.Treatment1.soil.InitialN
                Sample Sample1: Thickness=[100, 100, 100, 200, 200, 200, 200, 200, 200]; SWUnits=Volumetric; OCUnits=Total; PHUnits=Water
                  SW=[0.17, 0.17, 0.197, 0.204, 0.183, 0.191, 0.196, 0.201, 0.209]
                CERESSoilTemperature Temperature
                Nutrient
            CompositeFactor Treatment4
              Specifications:
                [Operations]
                [soil]
              Operations 4
                1985-10-29  [Maize].Sow(population:2.40, cultivar:"Katumani", depth:50, rowSpacing:750);
                1985-11-12  [Irrigation].Apply(17.00);
                1985-11-16  [Irrigation].Apply(8.00);
                1985-11-20  [Irrigation].Apply(18.00);
                1985-11-26  [Irrigation].Apply(13.00);
                1985-11-28  [Irrigation].Apply(14.00);
                1985-12-05  [Irrigation].Apply(10.00);
                1985-12-10  [Irrigation].Apply(15.00);
                1985-12-15  [Irrigation].Apply(8.00);
                1985-12-18  [Irrigation].Apply(8.00);
                1985-12-23  [Irrigation].Apply(20.00);
                1986-01-05  [Irrigation].Apply(30.00);
                1986-01-20  [Irrigation].Apply(15.00);
              Soil: Latitude=0; Longitude=0
                Physical: same as Validation.Africa.BMW1.Factors.Site.Treatment1.soil.Physical
                WaterBalance SoilWater: same as Validation.Africa.BMW1.Factors.Site.Treatment1.soil.SoilWater
                Organic: same as Validation.Africa.BMW1.Factors.Site.Treatment1.soil.Organic
                Chemical: same as Validation.Africa.BMW1.Factors.Site.Treatment1.soil.Chemical
                Sample: same as Validation.Africa.BMW1.Factors.Site.Treatment1.soil.InitialN
                Sample Sample1: Thickness=[100, 100, 100, 200, 200, 200, 200, 200, 200]; SWUnits=Volumetric; OCUnits=Total; PHUnits=Water
                  SW=[0.256, 0.256, 0.225, 0.203, 0.213, 0.229, 0.243, 0.239, 0.24]
                CERESSoilTemperature Temperature
                Nutrient
            CompositeFactor Treatment5
              Specifications:
                [Operations]
                [soil]
              Operations 5
                1985-10-29  [Maize].Sow(population:6.17, cultivar:"Katumani", depth:50, rowSpacing:750);
                1985-11-08  [Fertiliser].Apply(50, Fertiliser.Types.NH4NO3N, 10);
                1985-11-29  [Fertiliser].Apply(30, Fertiliser.Types.NH4NO3N, 10);
                1985-11-10  [Irrigation].Apply(6.00);
              Soil: Latitude=0; Longitude=0
                Physical
                  Thickness  BD    AirDry  LL15  DUL   SAT
                  100        1.35  0.04    0.14  0.25  0.3
                  100        1.35  0.14    0.14  0.25  0.3
                  100        1.35  0.15    0.15  0.29  0.32
                  200        1.4   0.16    0.16  0.3   0.33
                  200        1.4   0.18    0.18  0.3   0.34
                  200        1.4   0.18    0.18  0.3   0.35
                  200        1.4   0.18    0.18  0.31  0.36
                  200        1.4   0.18    0.18  0.32  0.37
                  200        1.4   0.18    0.18  0.31  0.37
                  200        1.4   0.18    0.18  0.31  0.37
                  SoilCrop MaizeSoil
                    LL=[0.14, 0.14, 0.15, 0.16, 0.18, 0.18, 0.18, 0.18, 0.18, 0.18]
                    KL=[0.08, 0.08, 0.08, 0.08, 0.06, 0.04, 0.03, 0.02, 0.01, 0.01]
                    XF=[1, 1, 1, 1, 1, 1, 1, 1, 1, 1]
                WaterBalance SoilWater: SummerDate=1-Nov; SummerU=9; SummerCona=2.5; WinterDate=1-Apr; WinterU=9; WinterCona=2.5; DiffusConst=88; DiffusSlope=35.4; Salb=0.13; CN2Bare=65; CNRed=20; CNCov=0.8; Thickness=[100, 100, 100, 200, 200, 200, 200, 200, 200, 200]; SWCON=[0.5, 0.5, 0.5, 0.5, 0.5, 0.5, 0.5, 0.5, 0.5, 0.5]
                Organic: FOMCNRatio=45
                  Thickness  Carbon  SoilCNRatio  FBiom  FInert  FOM
                  100        1.15    14.5         0.04   0.39    246.271
                  100        1.04    14.5         0.02   0.47    206.43
                  100        0.74    14.5         0.015  0.52    173.034
                  200        0.56    14.5         0.01   0.62    121.577
                  200        0.4     14.5         0.01   0.74    85.4223
                  200        0.49    14.5         0.01   0.83    60.0193
                  200        0.49    14.5         0.01   0.93    42.1707
                  200        0.49    14.5         0.01   0.93    29.6299
                  200        0.49    14.5         0.01   0.93    20.8185
                  200        0.49    14.5         0.01   0.93    14.6275
                Chemical
                  Thickness  NO3N  NH4N  PH
                  100        15    5     6
                  100        10    2.5   6
                  100        5     1.5   6
                  200        5     1.5   6.2
                  200        5     1.5   6.5
                  200        5     1.5   6.7
                  200        2     1.5   6.8
                  200        2     1.5   6.8
                  200        1.5   1.5   6.8
                  200        1.5   1.5   6.8
                Sample: Thickness=[100, 100, 100, 200, 200, 200, 200, 200, 200, 200]; SWUnits=Volumetric; OCUnits=Total; PHUnits=Water
                Sample Sample1: Thickness=[100, 100, 100, 200, 200, 200, 200, 200, 200, 200]; SWUnits=Volumetric; OCUnits=Total; PHUnits=Water
                  SW=[0.164, 0.164, 0.21, 0.168, 0.189, 0.186, 0.194, 0.191, 0.197, 0.196]
                CERESSoilTemperature Temperature
                Nutrient
            CompositeFactor Treatment6
              Specifications:
                [Operations]
                [soil]
              Operations 6
                1985-10-29  [Maize].Sow(population:2.09, cultivar:"Katumani", depth:50, rowSpacing:750);
                1985-11-08  [Fertiliser].Apply(50, Fertiliser.Types.NH4NO3N, 10);
                1985-11-29  [Fertiliser].Apply(30, Fertiliser.Types.NH4NO3N, 10);
                1985-11-10  [Irrigation].Apply(6.00);
              Soil: Latitude=0; Longitude=0
                Physical: same as Validation.Africa.BMW1.Factors.Site.Treatment2.soil.Physical
                WaterBalance SoilWater: same as Validation.Africa.BMW1.Factors.Site.Treatment2.soil.SoilWater
                Organic: same as Validation.Africa.BMW1.Factors.Site.Treatment2.soil.Organic
                Chemical: same as Validation.Africa.BMW1.Factors.Site.Treatment2.soil.Chemical
                Sample: same as Validation.Africa.BMW1.Factors.Site.Treatment2.soil.InitialN
                Sample Sample1: Thickness=[100, 100, 100, 200, 200, 200, 200, 200, 300, 300]; SWUnits=Volumetric; OCUnits=Total; PHUnits=Water
                  SW=[0.179, 0.179, 0.198, 0.188, 0.187, 0.19, 0.196, 0.213, 0.22, 0.204]
                CERESSoilTemperature Temperature
                Nutrient
            CompositeFactor Treatment7
              Specifications:
                [Operations]
                [soil]
              Operations 7
                1985-10-29  [Maize].Sow(population:2.34, cultivar:"Katumani", depth:50, rowSpacing:750);
                1985-11-10  [Irrigation].Apply(6.00);
              Soil: Latitude=0; Longitude=0
                Physical: same as Validation.Africa.BMW1.Factors.Site.Treatment5.soil.Physical
                WaterBalance SoilWater: same as Validation.Africa.BMW1.Factors.Site.Treatment5.soil.SoilWater
                Organic: same as Validation.Africa.BMW1.Factors.Site.Treatment5.soil.Organic
                Chemical: same as Validation.Africa.BMW1.Factors.Site.Treatment5.soil.Chemical
                Sample: same as Validation.Africa.BMW1.Factors.Site.Treatment5.soil.Sample
                Sample Sample1: Thickness=[100, 100, 100, 200, 200, 200, 200, 200, 200, 200]; SWUnits=Volumetric; OCUnits=Total; PHUnits=Water
                  SW=[0.155, 0.155, 0.213, 0.243, 0.212, 0.2, 0.215, 0.236, 0.247, 0.247]
                CERESSoilTemperature Temperature
                Nutrient
            CompositeFactor Treatment8
              Specifications:
                [Operations]
                [soil]
              Operations 8
                1985-10-29  [Maize].Sow(population:6.04, cultivar:"Katumani", depth:50, rowSpacing:750);
                1985-11-10  [Irrigation].Apply(6.00);
              Soil: Latitude=0; Longitude=0
                Physical
                  Thickness  BD    AirDry  LL15  DUL   SAT
                  100        1.35  0.04    0.14  0.25  0.3
                  100        1.35  0.14    0.14  0.25  0.3
                  100        1.35  0.15    0.15  0.29  0.32
                  200        1.4   0.16    0.16  0.3   0.33
                  200        1.4   0.18    0.18  0.3   0.34
                  200        1.4   0.18    0.18  0.3   0.35
                  200        1.4   0.18    0.18  0.31  0.36
                  200        1.4   0.18    0.18  0.32  0.37
                  SoilCrop MaizeSoil: LL=[0.14, 0.14, 0.15, 0.16, 0.18, 0.18, 0.18, 0.18]; KL=[0.08, 0.08, 0.08, 0.08, 0.06, 0.04, 0.03, 0.02]; XF=[1, 1, 1, 1, 1, 1, 1, 1]
                WaterBalance SoilWater: SummerDate=1-Nov; SummerU=9; SummerCona=2.5; WinterDate=1-Apr; WinterU=9; WinterCona=2.5; DiffusConst=88; DiffusSlope=35.4; Salb=0.13; CN2Bare=65; CNRed=20; CNCov=0.8; Thickness=[100, 100, 100, 200, 200, 200, 200, 200]; SWCON=[0.5, 0.5, 0.5, 0.5, 0.5, 0.5, 0.5, 0.5]
                Organic: FOMCNRatio=45
                  Thickness  Carbon  SoilCNRatio  FBiom  FInert  FOM
                  100        1.15    14.5         0.04   0.39    294.812
                  100        1.04    14.5         0.02   0.47    234.058
                  100        0.74    14.5         0.015  0.52    185.824
                  200        0.56    14.5         0.01   0.62    117.127
                  200        0.4     14.5         0.01   0.74    73.8268
                  200        0.49    14.5         0.01   0.83    46.534
                  200        0.49    14.5         0.01   0.93    29.331
                  200        0.49    14.5         0.01   0.93    18.4877
                Chemical
                  Thickness  NO3N  NH4N  PH
                  100        15    5     6
                  100        10    2.5   6
                  100        5     1.5   6
                  200        5     1.5   6.2
                  200        5     1.5   6.5
                  200        5     1.5   6.7
                  200        2     1.5   6.8
                  200        2     1.5   6.8
                Sample: Thickness=[100, 100, 100, 200, 200, 200, 200, 200]; SWUnits=Volumetric; OCUnits=Total; PHUnits=Water
                Sample Sample1: Thickness=[100, 100, 100, 200, 200, 200, 200, 200]; SW=[0.208, 0.208, 0.215, 0.184, 0.211, 0.226, 0.228, 0.22]; SWUnits=Volumetric; OCUnits=Total; PHUnits=Water
                CERESSoilTemperature Temperature
                Nutrient
            CompositeFactor Treatment9
              Specifications:
                [Operations]
                [soil]
              Operations 9
                1985-11-14  [Maize].Sow(population:2.16, cultivar:"Katumani", depth:50, rowSpacing:750);
                1985-11-29  [Fertiliser].Apply(50, Fertiliser.Types.NH4NO3N, 10);
                1985-12-23  [Fertiliser].Apply(30, Fertiliser.Types.NH4NO3N, 10);
                1985-11-10  [Irrigation].Apply(6.00);
              Soil: Latitude=0; Longitude=0
                Physical: same as Validation.Africa.BMW1.Factors.Site.Treatment2.soil.Physical
                WaterBalance SoilWater: same as Validation.Africa.BMW1.Factors.Site.Treatment2.soil.SoilWater
                Organic: same as Validation.Africa.BMW1.Factors.Site.Treatment2.soil.Organic
                Chemical: same as Validation.Africa.BMW1.Factors.Site.Treatment2.soil.Chemical
                Sample: same as Validation.Africa.BMW1.Factors.Site.Treatment2.soil.InitialN
                Sample Sample1: Thickness=[100, 100, 100, 200, 200, 200, 200, 200, 300, 300]; SWUnits=Volumetric; OCUnits=Total; PHUnits=Water
                  SW=[0.183, 0.183, 0.254, 0.232, 0.216, 0.201, 0.21, 0.228, 0.231, 0.226]
                CERESSoilTemperature Temperature
                Nutrient
            CompositeFactor Treatment10
              Specifications:
                [Operations]
                [soil]
              Operations 10
                1985-11-21  [Maize].Sow(population:6.23, cultivar:"Katumani", depth:50, rowSpacing:750);
                1985-11-10  [Irrigation].Apply(6.00);
              Soil: Latitude=0; Longitude=0
                Physical: same as Validation.Africa.BMW1.Factors.Site.Treatment8.soil.Physical
                WaterBalance SoilWater: same as Validation.Africa.BMW1.Factors.Site.Treatment8.soil.SoilWater
                Organic: same as Validation.Africa.BMW1.Factors.Site.Treatment8.soil.Organic
                Chemical: same as Validation.Africa.BMW1.Factors.Site.Treatment8.soil.Chemical
                Sample InitialN: same as Validation.Africa.BMW1.Factors.Site.Treatment8.soil.Sample
                Sample: Thickness=[100, 100, 100, 200, 200, 200, 200, 200]; SW=[0.151, 0.151, 0.196, 0.193, 0.194, 0.192, 0.192, 0.209]; SWUnits=Volumetric; OCUnits=Total; PHUnits=Water
                CERESSoilTemperature Temperature
                Nutrient
            CompositeFactor Treatment11
              Specifications:
                [Operations]
                [soil]
              Operations 11
                1985-11-21  [Maize].Sow(population:6.23, cultivar:"Katumani", depth:50, rowSpacing:750);
                1985-11-10  [Irrigation].Apply(6.00);
              Soil: Latitude=0; Longitude=0
                Physical
                  Thickness  BD    AirDry  LL15  DUL   SAT
                  100        1.35  0.04    0.14  0.25  0.3
                  100        1.35  0.14    0.14  0.25  0.3
                  100        1.35  0.14    0.15  0.29  0.32
                  200        1.4   0.14    0.16  0.3   0.33
                  200        1.4   0.17    0.18  0.3   0.34
                  200        1.4   0.17    0.18  0.3   0.35
                  200        1.4   0.18    0.18  0.31  0.36
                  200        1.4   0.18    0.18  0.32  0.37
                  300        1.4   0.18    0.18  0.32  0.37
                  SoilCrop MaizeSoil: LL=[0.14, 0.14, 0.15, 0.16, 0.18, 0.18, 0.18, 0.18, 0.18]; KL=[0.08, 0.08, 0.08, 0.08, 0.06, 0.04, 0.03, 0.02, 0.01]; XF=[1, 1, 1, 1, 1, 1, 1, 1, 1]
                WaterBalance SoilWater: SummerDate=1-Nov; SummerU=9; SummerCona=2.5; WinterDate=1-Apr; WinterU=9; WinterCona=2.5; DiffusConst=88; DiffusSlope=35.4; Salb=0.13; CN2Bare=65; CNRed=20; CNCov=0.8; Thickness=[100, 100, 100, 200, 200, 200, 200, 200, 300]; SWCON=[0.5, 0.5, 0.5, 0.5, 0.5, 0.5, 0.5, 0.5, 0.5]
                Organic: FOMCNRatio=45
                  Thickness  Carbon  SoilCNRatio  FBiom  FInert  FOM
                  100        1.15    14.5         0.04   0.39    259.385
                  100        1.04    14.5         0.02   0.47    215.038
                  100        0.74    14.5         0.015  0.52    178.272
                  200        0.56    14.5         0.01   0.62    122.525
                  200        0.4     14.5         0.01   0.74    84.2099
                  200        0.49    14.5         0.01   0.83    57.8766
                  200        0.49    14.5         0.01   0.93    39.7779
                  200        0.49    14.5         0.01   0.93    27.339
                  300        0.49    14.5         0.01   0.93    15.5773
                Chemical
                  Thickness  NO3N  NH4N  PH
                  100        15    5     6
                  100        10    2.5   6
                  100        5     1.5   6
                  200        5     1.5   6.2
                  200        5     1.5   6.5
                  200        5     1.5   6.7
                  200        2     1.5   6.8
                  200        2     1.5   6.8
                  300        2     1.5   6.8
                Sample: Thickness=[100, 100, 100, 200, 200, 200, 200, 200, 300]; SWUnits=Volumetric; OCUnits=Total; PHUnits=Water
                Sample InitialSW: Thickness=[100, 100, 100, 200, 200, 200, 200, 200, 300]; SWUnits=Volumetric; OCUnits=Total; PHUnits=Water
                  SW=[0.146, 0.146, 0.147, 0.158, 0.177, 0.177, 0.187, 0.202, 0.225]
                CERESSoilTemperature Temperature
                Nutrient
            CompositeFactor Treatment12
              Specifications:
                [Operations]
                [soil]
              Operations 12
                1985-11-14  [Maize].Sow(population:2.09, cultivar:"Katumani", depth:50, rowSpacing:750);
                1985-11-10  [Irrigation].Apply(6.00);
              Soil: Latitude=0; Longitude=0
                Physical: same as Validation.Africa.BMW1.Factors.Site.Treatment8.soil.Physical
                WaterBalance SoilWater: same as Validation.Africa.BMW1.Factors.Site.Treatment8.soil.SoilWater
                Organic: same as Validation.Africa.BMW1.Factors.Site.Treatment8.soil.Organic
                Chemical: same as Validation.Africa.BMW1.Factors.Site.Treatment8.soil.Chemical
                Sample: same as Validation.Africa.BMW1.Factors.Site.Treatment8.soil.Sample
                Sample InitialSW: Thickness=[100, 100, 100, 200, 200, 200, 200, 200]; SW=[0.164, 0.164, 0.189, 0.173, 0.186, 0.202, 0.221, 0.208]; SWUnits=Volumetric; OCUnits=Total; PHUnits=Water
                CERESSoilTemperature Temperature
                Nutrient
            CompositeFactor Treatment13
              Specifications:
                [Operations]
                [soil]
              Operations 13
                1985-10-29  [Maize].Sow(population:2.16, cultivar:"Katumani", depth:50, rowSpacing:750);
                1985-11-10  [Irrigation].Apply(6.00);
              Soil: Latitude=0; Longitude=0
                Physical: same as Validation.Africa.BMW1.Factors.Site.Treatment2.soil.Physical
                WaterBalance SoilWater: same as Validation.Africa.BMW1.Factors.Site.Treatment2.soil.SoilWater
                Organic: same as Validation.Africa.BMW1.Factors.Site.Treatment2.soil.Organic
                Chemical: same as Validation.Africa.BMW1.Factors.Site.Treatment2.soil.Chemical
                Sample: same as Validation.Africa.BMW1.Factors.Site.Treatment2.soil.InitialN
                Sample InitialSW: Thickness=[100, 100, 100, 200, 200, 200, 200, 200, 300, 300]; SWUnits=Volumetric; OCUnits=Total; PHUnits=Water
                  SW=[0.157, 0.157, 0.181, 0.219, 0.21, 0.221, 0.228, 0.24, 0.236, 0.224]
                CERESSoilTemperature Temperature
                Nutrient
            CompositeFactor Treatment14
              Specifications:
                [Operations]
                [soil]
              Operations 14
                1985-10-29  [Maize].Sow(population:5.3, cultivar:"Katumani", depth:50, rowSpacing:750);
                1985-11-10  [Irrigation].Apply(6.00);
              Soil: Latitude=0; Longitude=0
                Physical
                  Thickness  BD    AirDry  LL15  DUL   SAT
                  100        1.35  0.04    0.14  0.25  0.3
                  100        1.35  0.14    0.14  0.25  0.3
                  100        1.35  0.15    0.15  0.29  0.32
                  200        1.4   0.16    0.16  0.3   0.33
                  200        1.4   0.18    0.18  0.3   0.34
                  200        1.4   0.18    0.18  0.3   0.35
                  200        1.4   0.18    0.18  0.31  0.36
                  200        1.4   0.18    0.18  0.32  0.37
                  200        1.4   0.18    0.18  0.31  0.37
                  200        1.4   0.18    0.18  0.32  0.37
                  SoilCrop MaizeSoil
                    LL=[0.14, 0.14, 0.15, 0.16, 0.18, 0.18, 0.18, 0.18, 0.18, 0.18]
                    KL=[0.08, 0.08, 0.08, 0.08, 0.06, 0.04, 0.03, 0.02, 0.01, 0.01]
                    XF=[1, 1, 1, 1, 1, 1, 1, 1, 1, 1]
                WaterBalance SoilWater: same as Validation.Africa.BMW1.Factors.Site.Treatment5.soil.SoilWater
                Organic: same as Validation.Africa.BMW1.Factors.Site.Treatment5.soil.Organic
                Chemical
                  Thickness  NO3N  NH4N  PH
                  100        15    5     6
                  100        10    2.5   6
                  100        5     1.5   6
                  200        5     1.5   6.2
                  200        5     1.5   6.5
                  200        5     1.5   6.7
                  200        2     1.5   6.8
                  200        2     1.5   6.8
                  200        1.5   1.5   6.8
                  200        2     1.5   6.8
                Sample: same as Validation.Africa.BMW1.Factors.Site.Treatment5.soil.Sample
                Sample InitialSW: Thickness=[100, 100, 100, 200, 200, 200, 200, 200, 200, 200]; SWUnits=Volumetric; OCUnits=Total; PHUnits=Water
                  SW=[0.227, 0.227, 0.188, 0.181, 0.183, 0.189, 0.18, 0.185, 0.206, 0.201]
                CERESSoilTemperature Temperature
                Nutrient
            CompositeFactor Treatment15
              Specifications:
                [Operations]
                [soil]
              Operations 15
                1985-10-29  [Maize].Sow(population:2.16, cultivar:"Katumani", depth:50, rowSpacing:750);
                1985-11-08  [Fertiliser].Apply(50, Fertiliser.Types.NH4NO3N, 10);
                1985-11-29  [Fertiliser].Apply(30, Fertiliser.Types.NH4NO3N, 10);
                1985-11-10  [Irrigation].Apply(6.00);
              Soil: Latitude=0; Longitude=0
                Physical: same as Validation.Africa.BMW1.Factors.Site.Treatment2.soil.Physical
                WaterBalance SoilWater: same as Validation.Africa.BMW1.Factors.Site.Treatment2.soil.SoilWater
                Organic: same as Validation.Africa.BMW1.Factors.Site.Treatment2.soil.Organic
                Chemical: same as Validation.Africa.BMW1.Factors.Site.Treatment2.soil.Chemical
                Sample: same as Validation.Africa.BMW1.Factors.Site.Treatment2.soil.InitialN
                Sample InitialSW: Thickness=[100, 100, 100, 200, 200, 200, 200, 200, 300, 300]; SWUnits=Volumetric; OCUnits=Total; PHUnits=Water
                  SW=[0.181, 0.181, 0.199, 0.214, 0.239, 0.207, 0.234, 0.231, 0.252, 0.272]
                CERESSoilTemperature Temperature
                Nutrient
            CompositeFactor Treatment16
              Specifications:
                [Operations]
                [soil]
              Operations 16
                1985-10-29  [Maize].Sow(population:6.48, cultivar:"Katumani", depth:50, rowSpacing:750);
                1985-11-08  [Fertiliser].Apply(50, Fertiliser.Types.NH4NO3N, 10);
                1985-11-29  [Fertiliser].Apply(30, Fertiliser.Types.NH4NO3N, 10);
                1985-11-10  [Irrigation].Apply(6.00);
              Soil: Latitude=0; Longitude=0
                Physical: same as Validation.Africa.BMW1.Factors.Site.Treatment1.soil.Physical
                WaterBalance SoilWater: same as Validation.Africa.BMW1.Factors.Site.Treatment1.soil.SoilWater
                Organic: same as Validation.Africa.BMW1.Factors.Site.Treatment1.soil.Organic
                Chemical: same as Validation.Africa.BMW1.Factors.Site.Treatment1.soil.Chemical
                Sample: same as Validation.Africa.BMW1.Factors.Site.Treatment1.soil.InitialN
                Sample InitialSW: Thickness=[100, 100, 100, 200, 200, 200, 200, 200, 200]; SWUnits=Volumetric; OCUnits=Total; PHUnits=Water
                  SW=[0.183, 0.183, 0.23, 0.232, 0.216, 0.205, 0.209, 0.188, 0.201]
                CERESSoilTemperature Temperature
                Nutrient
            CompositeFactor Treatment17
              Specifications:
                [Operations]
                [soil]
              Operations 17
                1985-11-14  [Maize].Sow(population:4.25, cultivar:"Katumani", depth:50, rowSpacing:750);
                1985-11-08  [Fertiliser].Apply(50, Fertiliser.Types.NH4NO3N, 10);
                1985-11-29  [Fertiliser].Apply(30, Fertiliser.Types.NH4NO3N, 10);
                1985-11-10  [Irrigation].Apply(6.00);
              Soil: Latitude=0; Longitude=0
                Physical: same as Validation.Africa.BMW1.Factors.Site.Treatment5.soil.Physical
                WaterBalance SoilWater: same as Validation.Africa.BMW1.Factors.Site.Treatment5.soil.SoilWater
                Organic: same as Validation.Africa.BMW1.Factors.Site.Treatment5.soil.Organic
                Chemical: same as Validation.Africa.BMW1.Factors.Site.Treatment5.soil.Chemical
                Sample: same as Validation.Africa.BMW1.Factors.Site.Treatment5.soil.Sample
                Sample InitialSW: Thickness=[100, 100, 100, 200, 200, 200, 200, 200, 200, 200]; SWUnits=Volumetric; OCUnits=Total; PHUnits=Water
                  SW=[0.233, 0.233, 0.268, 0.232, 0.229, 0.216, 0.22, 0.221, 0.209, 0.194]
                CERESSoilTemperature Temperature
                Nutrient
            CompositeFactor Treatment18
              Specifications:
                [Operations]
                [soil]
              Operations 18
                1985-11-14  [Maize].Sow(population:2.03, cultivar:"Katumani", depth:50, rowSpacing:750);
                1985-11-10  [Irrigation].Apply(6.00);
              Soil: Latitude=0; Longitude=0
                Physical: same as Validation.Africa.BMW1.Factors.Site.Treatment8.soil.Physical
                WaterBalance SoilWater: same as Validation.Africa.BMW1.Factors.Site.Treatment8.soil.SoilWater
                Organic: same as Validation.Africa.BMW1.Factors.Site.Treatment8.soil.Organic
                Chemical: same as Validation.Africa.BMW1.Factors.Site.Treatment8.soil.Chemical
                Sample: same as Validation.Africa.BMW1.Factors.Site.Treatment8.soil.Sample
                Sample InitialSW: Thickness=[100, 100, 100, 200, 200, 200, 200, 200]; SW=[0.199, 0.199, 0.209, 0.213, 0.201, 0.205, 0.214, 0.232]; SWUnits=Volumetric; OCUnits=Total; PHUnits=Water
                CERESSoilTemperature Temperature
                Nutrient
            CompositeFactor Treatment19
              Specifications:
                [Operations]
                [soil]
              Operations 19
                1985-11-14  [Maize].Sow(population:2.22, cultivar:"Katumani", depth:50, rowSpacing:750);
                1985-11-08  [Fertiliser].Apply(50, Fertiliser.Types.NH4NO3N, 10);
                1985-11-29  [Fertiliser].Apply(30, Fertiliser.Types.NH4NO3N, 10);
                1985-11-10  [Irrigation].Apply(6.00);
              Soil: Latitude=0; Longitude=0
                Physical
                  Thickness  BD    AirDry  LL15  DUL   SAT
                  100        1.35  0.04    0.14  0.25  0.3
                  100        1.35  0.14    0.14  0.25  0.3
                  100        1.35  0.15    0.15  0.29  0.32
                  200        1.4   0.16    0.16  0.3   0.33
                  200        1.4   0.18    0.18  0.3   0.34
                  200        1.4   0.18    0.18  0.3   0.35
                  200        1.4   0.18    0.18  0.31  0.36
                  SoilCrop MaizeSoil: LL=[0.14, 0.14, 0.15, 0.16, 0.18, 0.18, 0.18]; KL=[0.08, 0.08, 0.08, 0.08, 0.06, 0.04, 0.03]; XF=[1, 1, 1, 1, 1, 1, 1]
                WaterBalance SoilWater: SummerDate=1-Nov; SummerU=9; SummerCona=2.5; WinterDate=1-Apr; WinterU=9; WinterCona=2.5; DiffusConst=88; DiffusSlope=35.4; Salb=0.13; CN2Bare=65; CNRed=20; CNCov=0.8; Thickness=[100, 100, 100, 200, 200, 200, 200]; SWCON=[0.5, 0.5, 0.5, 0.5, 0.5, 0.5, 0.5]
                Organic: FOMCNRatio=45
                  Thickness  Carbon  SoilCNRatio  FBiom  FInert  FOM
                  100        1.15    14.5         0.04   0.39    327.9
                  100        1.04    14.5         0.02   0.47    249.63
                  100        0.74    14.5         0.015  0.52    190.044
                  200        0.56    14.5         0.01   0.62    110.145
                  200        0.4     14.5         0.01   0.74    63.8378
                  200        0.49    14.5         0.01   0.83    36.999
                  200        0.49    14.5         0.01   0.93    21.4438
                Chemical
                  Thickness  NO3N  NH4N  PH
                  100        15    5     6
                  100        10    2.5   6
                  100        5     1.5   6
                  200        5     1.5   6.2
                  200        5     1.5   6.5
                  200        5     1.5   6.7
                  200        2     1.5   6.8
                Sample: Thickness=[100, 100, 100, 200, 200, 200, 200]; SWUnits=Volumetric; OCUnits=Total; PHUnits=Water
                Sample InitialSW: Thickness=[100, 100, 100, 200, 200, 200, 200]; SW=[0.213, 0.213, 0.229, 0.176, 0.181, 0.188, 0.184]; SWUnits=Volumetric; OCUnits=Total; PHUnits=Water
                CERESSoilTemperature Temperature
                Nutrient
            CompositeFactor Treatment20
              Specifications:
                [Operations]
                [soil]
              Operations 20
                1985-11-14  [Maize].Sow(population:4.87, cultivar:"Katumani", depth:50, rowSpacing:750);
                1985-11-10  [Irrigation].Apply(6.00);
              Soil: Latitude=0; Longitude=0
                Physical: same as Validation.Africa.BMW1.Factors.Site.Treatment19.soil.Physical
                WaterBalance SoilWater: same as Validation.Africa.BMW1.Factors.Site.Treatment19.soil.SoilWater
                Organic: same as Validation.Africa.BMW1.Factors.Site.Treatment19.soil.Organic
                Chemical: same as Validation.Africa.BMW1.Factors.Site.Treatment19.soil.Chemical
                Sample: Thickness=[100, 100, 100, 200, 200, 200, 200]; SWUnits=Volumetric; OCUnits=Total; PHUnits=Water
                Sample InitialSW: Thickness=[100, 100, 100, 200, 200, 200, 200]; SW=[0.17, 0.17, 0.182, 0.208, 0.196, 0.187, 0.201]; SWUnits=Volumetric; OCUnits=Total; PHUnits=Water
                CERESSoilTemperature Temperature
                Nutrient
            CompositeFactor Treatment21
              Specifications:
                [Operations]
                [soil]
              Operations 21
                1985-10-29  [Maize].Sow(population:2.34, cultivar:"Katumani", depth:50, rowSpacing:750);
                1985-11-12  [Irrigation].Apply(17.00);
                1985-11-16  [Irrigation].Apply(8.00);
                1985-11-20  [Irrigation].Apply(18.00);
                1985-11-26  [Irrigation].Apply(13.00);
                1985-11-28  [Irrigation].Apply(14.00);
                1985-12-05  [Irrigation].Apply(10.00);
                1985-12-10  [Irrigation].Apply(15.00);
                1985-12-15  [Irrigation].Apply(8.00);
                1985-12-18  [Irrigation].Apply(8.00);
                1985-12-23  [Irrigation].Apply(20.00);
                1986-01-05  [Irrigation].Apply(30.00);
                1986-01-20  [Irrigation].Apply(15.00);
              Soil: Latitude=0; Longitude=0
                Physical: same as Validation.Africa.BMW1.Factors.Site.Treatment8.soil.Physical
                WaterBalance SoilWater: same as Validation.Africa.BMW1.Factors.Site.Treatment8.soil.SoilWater
                Organic: same as Validation.Africa.BMW1.Factors.Site.Treatment8.soil.Organic
                Chemical: same as Validation.Africa.BMW1.Factors.Site.Treatment8.soil.Chemical
                Sample: same as Validation.Africa.BMW1.Factors.Site.Treatment8.soil.Sample
                Sample InitialSW: Thickness=[100, 100, 100, 200, 200, 200, 200, 200]; SW=[0.238, 0.238, 0.287, 0.244, 0.2, 0.194, 0.202, 0.194]; SWUnits=Volumetric; OCUnits=Total; PHUnits=Water
                CERESSoilTemperature Temperature
                Nutrient
            CompositeFactor Treatment22
              Specifications:
                [Operations]
                [soil]
              Operations 22
                1985-10-29  [Maize].Sow(population:2.22, cultivar:"Katumani", depth:50, rowSpacing:750);
                1985-11-08  [Fertiliser].Apply(50, Fertiliser.Types.NH4NO3N, 10);
                1985-11-29  [Fertiliser].Apply(30, Fertiliser.Types.NH4NO3N, 10);
                1985-11-12  [Irrigation].Apply(17.00);
                1985-11-16  [Irrigation].Apply(8.00);
                1985-11-20  [Irrigation].Apply(18.00);
                1985-11-26  [Irrigation].Apply(13.00);
                1985-11-28  [Irrigation].Apply(14.00);
                1985-12-05  [Irrigation].Apply(10.00);
                1985-12-10  [Irrigation].Apply(15.00);
                1985-12-15  [Irrigation].Apply(8.00);
                1985-12-18  [Irrigation].Apply(8.00);
                1985-12-23  [Irrigation].Apply(20.00);
                1986-01-05  [Irrigation].Apply(30.00);
                1986-01-20  [Irrigation].Apply(15.00);
              Soil: Latitude=0; Longitude=0
                Physical: same as Validation.Africa.BMW1.Factors.Site.Treatment8.soil.Physical
                WaterBalance SoilWater: same as Validation.Africa.BMW1.Factors.Site.Treatment8.soil.SoilWater
                Organic: same as Validation.Africa.BMW1.Factors.Site.Treatment8.soil.Organic
                Chemical: same as Validation.Africa.BMW1.Factors.Site.Treatment8.soil.Chemical
                Sample: same as Validation.Africa.BMW1.Factors.Site.Treatment8.soil.Sample
                Sample InitialSW: Thickness=[100, 100, 100, 200, 200, 200, 200, 200]; SW=[0.193, 0.193, 0.203, 0.192, 0.186, 0.185, 0.194, 0.192]; SWUnits=Volumetric; OCUnits=Total; PHUnits=Water
                CERESSoilTemperature Temperature
                Nutrient
            CompositeFactor Treatment23
              Specifications:
                [Operations]
                [soil]
              Operations 23
                1985-10-29  [Maize].Sow(population:6.54, cultivar:"Katumani", depth:50, rowSpacing:750);
                1985-11-12  [Irrigation].Apply(17.00);
                1985-11-16  [Irrigation].Apply(8.00);
                1985-11-20  [Irrigation].Apply(18.00);
                1985-11-26  [Irrigation].Apply(13.00);
                1985-11-28  [Irrigation].Apply(14.00);
                1985-12-05  [Irrigation].Apply(10.00);
                1985-12-10  [Irrigation].Apply(15.00);
                1985-12-15  [Irrigation].Apply(8.00);
                1985-12-18  [Irrigation].Apply(8.00);
                1985-12-23  [Irrigation].Apply(20.00);
                1986-01-05  [Irrigation].Apply(30.00);
                1986-01-20  [Irrigation].Apply(15.00);
              Soil: Latitude=0; Longitude=0
                Physical: same as Validation.Africa.BMW1.Factors.Site.Treatment19.soil.Physical
                WaterBalance SoilWater: same as Validation.Africa.BMW1.Factors.Site.Treatment19.soil.SoilWater
                Organic: same as Validation.Africa.BMW1.Factors.Site.Treatment19.soil.Organic
                Chemical: same as Validation.Africa.BMW1.Factors.Site.Treatment19.soil.Chemical
                Sample: Thickness=[100, 100, 100, 200, 200, 200, 200]; SWUnits=Volumetric; OCUnits=Total; PHUnits=Water
                Sample InitialSW: Thickness=[100, 100, 100, 200, 200, 200, 200]; SW=[0.197, 0.197, 0.219, 0.194, 0.187, 0.184, 0.197]; SWUnits=Volumetric; OCUnits=Total; PHUnits=Water
                CERESSoilTemperature Temperature
                Nutrient
            CompositeFactor Treatment24
              Specifications:
                [Operations]
                [soil]
              Operations 24
                1985-10-29  [Maize].Sow(population:6.54, cultivar:"Katumani", depth:50, rowSpacing:750);
                1985-11-08  [Fertiliser].Apply(50, Fertiliser.Types.NH4NO3N, 10);
                1985-11-29  [Fertiliser].Apply(30, Fertiliser.Types.NH4NO3N, 10);
                1985-11-12  [Irrigation].Apply(17.00);
                1985-11-16  [Irrigation].Apply(8.00);
                1985-11-20  [Irrigation].Apply(18.00);
                1985-11-26  [Irrigation].Apply(13.00);
                1985-11-28  [Irrigation].Apply(14.00);
                1985-12-05  [Irrigation].Apply(10.00);
                1985-12-10  [Irrigation].Apply(15.00);
                1985-12-15  [Irrigation].Apply(8.00);
                1985-12-18  [Irrigation].Apply(8.00);
                1985-12-23  [Irrigation].Apply(20.00);
                1986-01-05  [Irrigation].Apply(30.00);
                1986-01-20  [Irrigation].Apply(15.00);
              Soil: Latitude=0; Longitude=0
                Physical: same as Validation.Africa.BMW1.Factors.Site.Treatment1.soil.Physical
                WaterBalance SoilWater: same as Validation.Africa.BMW1.Factors.Site.Treatment1.soil.SoilWater
                Organic: same as Validation.Africa.BMW1.Factors.Site.Treatment1.soil.Organic
                Chemical: same as Validation.Africa.BMW1.Factors.Site.Treatment1.soil.Chemical
                Sample: same as Validation.Africa.BMW1.Factors.Site.Treatment1.soil.InitialN
                Sample InitialSW: Thickness=[100, 100, 100, 200, 200, 200, 200, 200, 200]; SWUnits=Volumetric; OCUnits=Total; PHUnits=Water
                  SW=[0.215, 0.215, 0.261, 0.241, 0.23, 0.229, 0.222, 0.198, 0.209]
                CERESSoilTemperature Temperature
                Nutrient
        Simulation BMW1
          Weather: FileName=%root%\Tests\Validation\Maize\KATUMANI.MET
          Clock: Start=1985-10-27; End=1986-10-21
          Summary summaryfile
          SoilArbitrator Soil Arbitrator
          Zone Field: Area=1; Slope=0; AspectAngle=0; Altitude=50
            Plant Maize
            MicroClimate: a_interception=0; b_interception=1; c_interception=0; d_interception=0; SoilHeatFluxFraction=0.4; MinimumHeightDiffForNewLayer=0; NightInterceptionFraction=0.5; ReferenceHeight=2
            Irrigation
            Fertiliser
            SurfaceOrganicMatter: InitialResidueName=wheat; InitialResidueType=wheat; InitialResidueMass=0; InitialStandingFraction=0; InitialCPR=0; InitialCNR=80
            Operations
            Soil: Latitude=0; Longitude=0
              Physical: same as Validation.Africa.BMW1.Factors.Site.Treatment1.soil.Physical
              WaterBalance SoilWater: same as Validation.Africa.BMW1.Factors.Site.Treatment1.soil.SoilWater
              Organic: same as Validation.Africa.BMW1.Factors.Site.Treatment1.soil.Organic
              Chemical: same as Validation.Africa.BMW1.Factors.Site.Treatment1.soil.Chemical
              Sample InitialN: same as Validation.Africa.BMW1.Factors.Site.Treatment1.soil.InitialN
              Sample InitialSW: same as Validation.Africa.BMW1.Factors.Site.Treatment1.soil.Sample
              CERESSoilTemperature Temperature
              Nutrient
            Report HarvestReport: same as Validation.Africa.JMW2Katumani.JMW2Katumani.Field.HarvestReport
            Manager Harvesting: same as Validation.Africa.JMW2Katumani.JMW2Katumani.Field.Harvesting
    Folder Australia
      Memo
        The data for two trials from near Katherine, Northern Territory, Australia, have been included from [Carberry_etal_1989] and [Carberry_&_Aberecht1991].  These include two planting dates for the summer of 1983/1984 (labelled as K841, K842).  At each planting date, cultivar Dekalb XL82 was sown at 4 populations (3, 5, 7, 9 plants/m^2^) under low and high irrigation conditions.  The low irrigation treatments only included preliminary applications to ensure crop establishment.
      Experiment K841
        Factors
          Permutation
            Factor Popn: Specification=[Sowing]
              Operations 3
                1983-11-25  [Maize].Sow(population:3.0, cultivar:"Dekalb_XL82", depth:50, rowSpacing:1000);
              Operations 5
                1983-11-25  [Maize].Sow(population:5.0, cultivar:"Dekalb_XL82", depth:50, rowSpacing:1000);
              Operations 7
                1983-11-25  [Maize].Sow(population:7.0, cultivar:"Dekalb_XL82", depth:50, rowSpacing:1000);
              Operations 9
                1983-11-25  [Maize].Sow(population:9.0, cultivar:"Dekalb_XL82", depth:50, rowSpacing:1000);
            Factor Irrigation: Specification=[IrrigSchedule]
              Operations Dry
                1983-11-21  [Irrigation].Apply(40.00);
                1983-11-26  [Irrigation].Apply(15.00);
              Operations Wet
                1983-11-21  [Irrigation].Apply(40.00);
                1983-11-26  [Irrigation].Apply(15.00);
                1983-12-01  [Irrigation].Apply(10.00);
                1983-12-09  [Irrigation].Apply(19.00);
                1983-12-13  [Irrigation].Apply(30.00);
                1983-12-18  [Irrigation].Apply(15.00);
                1983-12-20  [Irrigation].Apply(25.00);
                1983-12-23  [Irrigation].Apply(39.00);
                1984-01-06  [Irrigation].Apply(30.00);
                1984-02-03  [Irrigation].Apply(40.00);
                1984-02-10  [Irrigation].Apply(40.00);
        Simulation K841
          Weather: FileName=%root%\Tests\Validation\Maize\CLS183.MET
          Clock: Start=1983-11-17; End=1984-06-01
          Summary summaryfile
          SoilArbitrator Soil Arbitrator
          Zone Field: Area=1; Slope=0; AspectAngle=0; Altitude=50
            Plant Maize
            MicroClimate: a_interception=0; b_interception=1; c_interception=0; d_interception=0; SoilHeatFluxFraction=0.4; MinimumHeightDiffForNewLayer=0; NightInterceptionFraction=0.5; ReferenceHeight=2
            Irrigation
            Fertiliser
            SurfaceOrganicMatter: InitialResidueName=wheat; InitialResidueType=wheat; InitialResidueMass=4000; InitialStandingFraction=0; InitialCPR=0; InitialCNR=33
            Operations Sowing
            Operations NRate
              1983-11-23  [Fertiliser].Apply(120, Fertiliser.Types.UreaN, 10);
              1983-12-30  [Fertiliser].Apply(60, Fertiliser.Types.UreaN, 10);
              1984-02-02  [Fertiliser].Apply(60, Fertiliser.Types.UreaN, 10);
            Soil: Latitude=0; Longitude=0
              Physical
                Thickness  BD    AirDry  LL15  DUL   SAT
                150        1.56  0.05    0.19  0.3   0.31
                150        1.52  0.08    0.21  0.31  0.33
                150        1.46  0.21    0.21  0.31  0.34
                150        1.46  0.22    0.22  0.32  0.34
                150        1.42  0.22    0.22  0.33  0.34
                150        1.42  0.22    0.22  0.33  0.34
                300        1.46  0.22    0.22  0.32  0.34
                300        1.5   0.23    0.23  0.34  0.35
                300        1.53  0.24    0.24  0.35  0.37
                SoilCrop MaizeSoil: LL=[0.19, 0.21, 0.21, 0.23, 0.23, 0.24, 0.25, 0.28, 0.28]; KL=[0.12, 0.12, 0.1, 0.08, 0.06, 0.04, 0.03, 0.02, 0.01]; XF=[1, 1, 1, 1, 1, 1, 1, 1, 1]
              WaterBalance SoilWater: SummerDate=1-Nov; SummerU=1.5; SummerCona=6.6; WinterDate=1-Apr; WinterU=1.5; WinterCona=6.6; DiffusConst=88; DiffusSlope=35.4; Salb=0.2; CN2Bare=85; CNRed=20; CNCov=0.8; DischargeWidth=0; CatchmentArea=0; Thickness=[150, 150, 150, 150, 150, 150, 300, 300, 300]; SWCON=[0.7, 0.7, 0.7, 0.7, 0.7, 0.7, 0.7, 0.7, 0.7]
              Organic: FOMCNRatio=36
                Thickness  Carbon  SoilCNRatio  FBiom  FInert  FOM
                150        1.27    14.5         0.04   0.39    518.782
                150        0.59    14.5         0.02   0.47    404.028
                150        0.34    14.5         0.01   0.52    314.657
                150        0.34    14.5         0.01   0.62    245.055
                150        0.26    14.5         0.01   0.74    190.849
                150        0.26    14.5         0.01   0.83    148.634
                300        0.25    14.5         0.01   0.93    90.1508
                300        0.19    14.5         0.01   0.93    54.6792
                300        0.21    14.5         0.01   0.93    33.1646
              Chemical
                Thickness  NO3N  NH4N  PH
                150        2.4   0.6   6.5
                150        0.4   0.1   6.2
                150        0.1   0.1   6.3
                150        0.1   0.1   6.4
                150        0.1   0.1   6.5
                150        0.1   0.1   6.6
                300        0.1   0.1   6.6
                300        0.1   0.1   6.5
                300        0.1   0.1   6.5
              Sample InitialSW: Thickness=[150, 150, 150, 150, 150, 150, 300, 300, 300]; SWUnits=Volumetric; OCUnits=Total; PHUnits=Water
                SW=[0.304, 0.31, 0.31, 0.324, 0.328, 0.328, 0.325, 0.337, 0.35]
              CERESSoilTemperature Temperature
              Nutrient
            Operations IrrigSchedule
              1983-11-21  [Irrigation].Apply(40.00);
              1983-11-26  [Irrigation].Apply(15.00);
            Report HarvestReport: same as Validation.Africa.JMW2Katumani.JMW2Katumani.Field.HarvestReport
            Manager Harvesting: same as Validation.Africa.JMW2Katumani.JMW2Katumani.Field.Harvesting
      Experiment K842
        Factors
          Permutation
            Factor Popn: Specification=[Sowing]
              Operations 3
                1984-02-07  [Maize].Sow(population:3.0, cultivar:"Dekalb_XL82", depth:50, rowSpacing:1000);
              Operations 5
                1984-02-07  [Maize].Sow(population:5.0, cultivar:"Dekalb_XL82", depth:50, rowSpacing:1000);
              Operations 7
                1984-02-07  [Maize].Sow(population:7.0, cultivar:"Dekalb_XL82", depth:50, rowSpacing:1000);
              Operations 9
                1984-02-07  [Maize].Sow(population:9.0, cultivar:"Dekalb_XL82", depth:50, rowSpacing:1000);
            Factor Irrigation: Specification=[IrrigSchedule]
              Operations Dry
                1984-02-05  [Irrigation].Apply(40.00);
                1984-02-10  [Irrigation].Apply(40.00);
              Operations Wet
                1984-02-05  [Irrigation].Apply(40.00);
                1984-02-10  [Irrigation].Apply(40.00);
                1984-03-22  [Irrigation].Apply(40.00);
                1984-03-28  [Irrigation].Apply(38.00);
                1984-03-31  [Irrigation].Apply(24.00);
                1984-04-01  [Irrigation].Apply(16.00);
                1984-04-04  [Irrigation].Apply(34.00);
                1984-04-08  [Irrigation].Apply(4.00);
                1984-04-12  [Irrigation].Apply(41.00);
                1984-04-17  [Irrigation].Apply(28.00);
                1984-04-19  [Irrigation].Apply(44.00);
                1984-04-24  [Irrigation].Apply(43.00);
                1984-04-28  [Irrigation].Apply(44.00);
                1984-05-04  [Irrigation].Apply(39.00);
                1984-05-09  [Irrigation].Apply(42.00);
                1984-05-14  [Irrigation].Apply(40.00);
        Simulation K842
          Weather: FileName=%root%\Tests\Validation\Maize\CLS183.MET
          Clock: Start=1984-01-26; End=1984-06-14
          Summary summaryfile
          SoilArbitrator Soil Arbitrator
          Zone Field: Area=1; Slope=0; AspectAngle=0; Altitude=50
            Plant Maize
            MicroClimate: a_interception=0; b_interception=1; c_interception=0; d_interception=0; SoilHeatFluxFraction=0.4; MinimumHeightDiffForNewLayer=0; NightInterceptionFraction=0.5; ReferenceHeight=2
            Irrigation
            Fertiliser
            SurfaceOrganicMatter: InitialResidueName=wheat; InitialResidueType=wheat; InitialResidueMass=4000; InitialStandingFraction=0; InitialCPR=0; InitialCNR=33
            Operations Sowing
            Operations NRate
              1984-02-05  [Fertiliser].Apply(120, Fertiliser.Types.UreaN, 10);
              1984-03-13  [Fertiliser].Apply(60, Fertiliser.Types.UreaN, 10);
              1984-04-17  [Fertiliser].Apply(60, Fertiliser.Types.UreaN, 10);
            Soil: same as Validation.Australia.K841.K841.Field.soil
            Operations IrrigSchedule
              1983-11-21  [Irrigation].Apply(40.00);
              1983-11-26  [Irrigation].Apply(15.00);
            Report HarvestReport: same as Validation.Africa.JMW2Katumani.JMW2Katumani.Field.HarvestReport
            Manager Harvesting: same as Validation.Africa.JMW2Katumani.JMW2Katumani.Field.Harvesting
      Experiment DRK1
        Factors
          Factor Sowing: Specification=[Sowing]
            Operations Dec11
              1991-12-11  [Maize].Sow(population:6.7, cultivar:"GH_5009", depth:70, rowSpacing:750);
            Operations Feb20
              1991-02-20  [Maize].Sow(population:6.7, cultivar:"GH_5009", depth:70, rowSpacing:750);
            Operations Jan31
              1991-01-31  [Maize].Sow(population:6.7, cultivar:"GH_5009", depth:70, rowSpacing:750);
            Operations Mar12
              1991-03-12  [Maize].Sow(population:6.7, cultivar:"GH_5009", depth:70, rowSpacing:750);
            Operations Nov07
              1991-11-07  [Maize].Sow(population:6.7, cultivar:"GH_5009", depth:70, rowSpacing:750);
            Operations Oct10
              1991-10-10  [Maize].Sow(population:6.7, cultivar:"GH_5009", depth:70, rowSpacing:750);
            Operations Sep19
              1991-09-19  [Maize].Sow(population:6.7, cultivar:"GH_5009", depth:70, rowSpacing:750);
        Simulation DRK1
          Weather: FileName=%root%\Tests\Validation\Maize\DRK.met
          Clock: Start=1991-01-01; End=1992-04-30
          Summary summaryfile
          SoilArbitrator Soil Arbitrator
          Zone Field: Area=1; Slope=0; AspectAngle=0; Altitude=50
            Plant Maize
            MicroClimate: a_interception=0; b_interception=1; c_interception=0; d_interception=0; SoilHeatFluxFraction=0.4; MinimumHeightDiffForNewLayer=0; NightInterceptionFraction=0.5; ReferenceHeight=2
            Irrigation
            Fertiliser
            SurfaceOrganicMatter: InitialResidueName=wheat; InitialResidueType=wheat; InitialResidueMass=4000; InitialStandingFraction=0; InitialCPR=0; InitialCNR=33
            Operations Sowing
            Operations NRate
            Soil: Latitude=0; Longitude=0
              Physical
                Thickness  BD    AirDry  LL15  DUL   SAT
                150        1.35  0.1     0.21  0.41  0.46
                150        1.54  0.1     0.19  0.37  0.39
                300        1.54  0.1     0.26  0.34  0.39
                300        1.53  0.1     0.26  0.35  0.39
                300        1.56  0.1     0.26  0.38  0.39
                300        1.54  0.1     0.26  0.36  0.39
                300        1.54  0.1     0.26  0.33  0.39
                SoilCrop MaizeSoil: LL=[0.21, 0.19, 0.26, 0.26, 0.26, 0.26, 0.26]; KL=[0.12, 0.12, 0.1, 0.08, 0.06, 0.04, 0.03]; XF=[1, 1, 1, 1, 1, 1, 1]
              WaterBalance SoilWater: same as Validation.Australia.K841.K841.Field.soil.SoilWater
              Organic: FOMCNRatio=36
                Thickness  Carbon  SoilCNRatio  FBiom  FInert  FOM
                150        0.8     14.5         0.05   0.39    694.258
                150        0.6     14.5         0.02   0.47    540.689
                300        0.5     14.5         0.01   0.52    327.944
                300        0.3     14.5         0.01   0.62    198.908
                300        0.2     14.5         0.01   0.74    120.644
                300        0.2     14.5         0.01   0.83    73.1743
                300        0.1     14.5         0.01   0.93    44.3824
              Chemical
                Thickness  NO3N  NH4N  PH
                150        2.4   0.6   8.9
                150        0.4   0.1   8.9
                300        0.1   0.1   9
                300        0.1   0.1   9
                300        0.1   0.1   9
                300        0.1   0.1   9
                300        0.1   0.1   9
              Sample InitialSW: same as Validation.Australia.K841.K841.Field.soil.InitialSW
              CERESSoilTemperature Temperature
              Nutrient
            Operations IrrigSchedule
            Report HarvestReport: EventNames=[Maize].Harvesting
              VariableNames:
                [Clock].Today
                [Maize].Phenology.CurrentStageName as Stage
                [Maize].Grain.Wt as GrainWt
                [Maize].Stem.Wt
                [Maize].EarLive.Wt
                [Maize].Leaf.Live.Wt
                [Maize].Root.Live.Wt
                [Maize].Husk.Wt
                [Maize].Rachis.Wt
                [Maize].EarLive.N
                [Maize].Grain.N
                [Maize].Stem.N
                [Maize].Leaf.Live.N
                [Maize].Root.Live.N
                [Maize].Root.Depth
                [Maize].AboveGround.N
                [Maize].AboveGround.Wt as Biomass
                [Maize].Total.N
                [Maize].Total.Wt
                max of [Maize].Leaf.LAI from [Maize].Sowing to [Maize].Harvesting as LAImax
                [Maize].Grain.NumberFunction as GPSM
                [Maize].Grain.Size as GrainSize
                [Maize].Population
                [Maize].Phenology.FloweringDAS as FloweringDAS
                [Maize].Phenology.MaturityDAS as MaturityDAS
                [Maize].Leaf.AppearedCohortNo as FinalLeafNo
            Manager Harvesting
              script: same as in Validation.Africa.JMW2Katumani.JMW2Katumani.Field.Harvesting
            Manager KeepNonLimiting
```csharp
using Models.Soils.Nutrients;
using System;
using Models.Core;
using System.Collections.Generic;
using System.Text;
using Models.Soils;
using Models.Soils.Nutrients;
using Models.PMF;
using Models;
using System.Xml.Serialization;
using APSIM.Shared.Utilities;

namespace Models
{
    [Serializable] 
    public class Script : Model
    {      
        [Link] Plant Maize;          
        [Link] Zone zone;            
        [Link] Fertiliser Fertiliser;
        [Link] Irrigation Irrigation;
                    
        
        [EventSubscribe("StartOfSimulation")]
        private void OnSimulationCommencing(object sender, EventArgs e)
        {
        }       
        
        [EventSubscribe("DoManagement")]
        private void OnDoManagement(object sender, EventArgs e)
        {
        if (Maize.IsAlive)
           {
           Fertiliser.Apply(5.00, Fertiliser.Types.UreaN, 5);
           Irrigation.Apply(5.00);
           }
        }
        
        [EventSubscribe("DoManagementCalculations")]
        private void OnDoManagementCalculations(object sender, EventArgs e)
        {
            
        }
    }
}
```
      Experiment DRK2
        Factors
          Factor Sowing: Specification=[Sowing]
            Operations Dec11
              1991-12-11  [Maize].Sow(population:6.7, cultivar:"Hycorn_40", depth:70, rowSpacing:750);
            Operations Feb20
              1991-02-20  [Maize].Sow(population:6.7, cultivar:"Hycorn_40", depth:70, rowSpacing:750);
            Operations Jan31
              1991-01-31  [Maize].Sow(population:6.7, cultivar:"Hycorn_40", depth:70, rowSpacing:750);
            Operations Mar12
              1991-03-12  [Maize].Sow(population:6.7, cultivar:"Hycorn_40", depth:70, rowSpacing:750);
            Operations Nov07
              1991-11-07  [Maize].Sow(population:6.7, cultivar:"Hycorn_40", depth:70, rowSpacing:750);
            Operations Oct10
              1991-10-10  [Maize].Sow(population:6.7, cultivar:"Hycorn_40", depth:70, rowSpacing:750);
            Operations Sep19
              1991-09-19  [Maize].Sow(population:6.7, cultivar:"Hycorn_40", depth:70, rowSpacing:750);
        Simulation DRK2
          Weather: FileName=DRK.met
          Clock: Start=1991-01-01; End=1992-04-30
          Summary summaryfile
          SoilArbitrator Soil Arbitrator
          Zone Field: Area=1; Slope=0; AspectAngle=0; Altitude=50
            Plant Maize
            MicroClimate: a_interception=0; b_interception=1; c_interception=0; d_interception=0; SoilHeatFluxFraction=0.4; MinimumHeightDiffForNewLayer=0; NightInterceptionFraction=0.5; ReferenceHeight=2
            Irrigation
            Fertiliser
            SurfaceOrganicMatter: InitialResidueName=wheat; InitialResidueType=wheat; InitialResidueMass=4000; InitialStandingFraction=0; InitialCPR=0; InitialCNR=33
            Operations Sowing
            Operations NRate
            Soil: same as Validation.Australia.DRK1.DRK1.Field.soil
            Operations IrrigSchedule
            Report HarvestReport: same as Validation.Australia.DRK1.DRK1.Field.HarvestReport
            Manager Harvesting: same as Validation.Africa.JMW2Katumani.JMW2Katumani.Field.Harvesting
            Manager KeepNonLimiting: same as Validation.Australia.DRK1.DRK1.Field.KeepNonLimiting
      Experiment DRK3
        Factors
          Factor Sowing: Specification=[Sowing]
            Operations Dec11
              1991-12-11  [Maize].Sow(population:6.7, cultivar:"GH_5019WX", depth:70, rowSpacing:750);
            Operations Feb20
              1991-02-20  [Maize].Sow(population:6.7, cultivar:"GH_5019WX", depth:70, rowSpacing:750);
            Operations Jan31
              1991-01-31  [Maize].Sow(population:6.7, cultivar:"GH_5019WX", depth:70, rowSpacing:750);
            Operations Mar12
              1991-03-12  [Maize].Sow(population:6.7, cultivar:"GH_5019WX", depth:70, rowSpacing:750);
            Operations Nov07
              1991-11-07  [Maize].Sow(population:6.7, cultivar:"GH_5019WX", depth:70, rowSpacing:750);
            Operations Oct10
              1991-10-10  [Maize].Sow(population:6.7, cultivar:"GH_5019WX", depth:70, rowSpacing:750);
            Operations Sep19
              1991-09-19  [Maize].Sow(population:6.7, cultivar:"GH_5019WX", depth:70, rowSpacing:750);
        Simulation DRK3
          Weather: FileName=%root%\Tests\Validation\Maize\DRK.met
          Clock: Start=1991-01-01; End=1992-04-30
          Summary summaryfile
          SoilArbitrator Soil Arbitrator
          Zone Field: same as Validation.Australia.DRK2.DRK2.Field
      Experiment Angelo98
        Memo
          This data set has been published by [massignam2009]. Three sowings were conducted at the CSIRO Cooper field station (27o34'S, 152o20'E), Gatton, Australia. The soil was a Lockyer clay loam for sowing 1 and 2 and a Hooper clay loam for sowing 3.  Maize (Hycorn53) was sown on three dates to provide a range of growing environments.  Each sowing was provided with 3 rates of nitrogen.  To ensure moisture was non-limiting, the plots were irrigated weekly by trickle irrigation, except when rainfall occurred. Plots were weeded regularly and insect pests and foliar diseases controlled as required.
        Factors
          Factor Fert: Specification=[NRate]
            Operations N0
            Operations N50
              1999-02-22  [Fertiliser].Apply(50, Fertiliser.Types.UreaN, 10);
            Operations N250
              1999-02-22  [Fertiliser].Apply(50, Fertiliser.Types.UreaN, 10);
              1999-03-24  [Fertiliser].Apply(100, Fertiliser.Types.UreaN, 10);
              1999-04-27  [Fertiliser].Apply(100, Fertiliser.Types.UreaN, 10);
        Simulation Angelo98
          Weather: FileName=Angelo98.met
          Clock: Start=1999-02-19; End=1999-07-23
          Summary summaryfile
          SoilArbitrator Soil Arbitrator
          Zone Field: Area=1; Slope=0; AspectAngle=0; Altitude=50
            Plant Maize
            MicroClimate: a_interception=0; b_interception=1; c_interception=0; d_interception=0; SoilHeatFluxFraction=0.4; MinimumHeightDiffForNewLayer=0; NightInterceptionFraction=0.5; ReferenceHeight=2
            Irrigation
            Fertiliser
            SurfaceOrganicMatter: InitialResidueName=wheat; InitialResidueType=wheat; InitialResidueMass=4000; InitialStandingFraction=0; InitialCPR=0; InitialCNR=33
            Operations Sowing
              1999-02-19  [Maize].Sow(population:6.7, cultivar:"Hycorn_53", depth:50, rowSpacing:750);
            Operations NRate
            Report: EventNames=[Clock].DoReport
              VariableNames:
                [Clock].Today
                [Maize].Grain.Wt
                [Maize].Stem.Wt
                [Maize].Leaf.Live.Wt
                [Maize].Grain.N
                [Maize].Stem.N
                [Maize].Leaf.Live.N
                [Maize].Leaf.LAI
                [Maize].AboveGround.N
                [Maize].AboveGround.Wt
            Operations IrrigSchedule
            Report HarvestReport: same as Validation.Australia.DRK1.DRK1.Field.HarvestReport
            Soil: SoilType=Gatton; Site=UQ Lawes; NearestTown=Unknown; Region=Lockyer; NaturalVegetation=Unknown; Latitude=0; Longitude=0
              InitialWater Initial water: PercentMethod=0; FractionFull=1
              Physical
                Thickness  BD    AirDry  LL15  DUL   SAT
                150        1.32  0.13    0.26  0.41  0.47
                150        1.3   0.23    0.26  0.43  0.48
                300        1.23  0.26    0.26  0.46  0.51
                300        1.27  0.26    0.26  0.44  0.49
                300        1.37  0.25    0.25  0.4   0.45
                300        1.35  0.28    0.28  0.41  0.46
                300        1.35  0.31    0.31  0.38  0.46
                SoilCrop MaizeSoil: LL=[0.26, 0.26, 0.26, 0.26, 0.25, 0.28, 0.31]; KL=[0.1, 0.1, 0.1, 0.08, 0.06, 0.04, 0.02]; XF=[1, 1, 1, 1, 1, 1, 1]
              WaterBalance SoilWater: SummerDate=1-Nov; SummerU=6; SummerCona=3.5; WinterDate=1-Apr; WinterU=6; WinterCona=3.5; DiffusConst=40; DiffusSlope=16; Salb=0.11; CN2Bare=73; CNRed=20; CNCov=0.8; Thickness=[150, 150, 300, 300, 300, 300, 300]; SWCON=[0.3, 0.3, 0.3, 0.3, 0.3, 0.3, 0.3]
              Organic: FOMCNRatio=40
                Thickness  Carbon  SoilCNRatio  FBiom  FInert  FOM
                150        1.24    12.5         0.03   0.5     69.4258
                150        1.24    12.5         0.02   0.6     54.0689
                300        0.8     12.5         0.01   0.7     32.7944
                300        0.75    12.5         0.01   0.9     19.8908
                300        0.71    12.5         0.01   0.95    12.0644
                300        0.34    12.5         0.01   0.95    7.31743
                300        0.26    12.5         0.01   0.95    4.43824
              Chemical
                Thickness  NO3N     NH4N  PH
                150        6.50002  0.1   7
                150        5.50002  0.1   7
                300        6.00002  0.1   7
                300        2.858    0.1   7
                300        2.055    0.1   7
                300        1.013    0.1   7
                300        0.203    0.1   7
              CERESSoilTemperature Temperature
              Nutrient
            Manager CropManagement
              CropName = Maize
              AutoIrrigate = True
              DeficitDepth = 600
              DeficitTrigger = 50
              SoilWaterDeficit = 0
```csharp
using Models.Interfaces;
using System;
using Models.Core;
using Models.PMF;
using Models.Soils;
using Models.Soils.Nutrients;
using Models.Utilities;
using APSIM.Shared.Utilities;
using System.Linq;

namespace Models
{
    [Serializable]
    public class Script : Model
    {
        [Link] private Clock Clock;
        [Link] private Fertiliser Fertiliser;
        [Link] private Irrigation Irrigation;
        [Link] private Summary Summary;
        [Link] private Soil Soil;
        private IPlant Crop;
        [Link]
        private IPhysical soilPhysical;
        [Link]
        private ISoilWater waterBalance;
        
    
        [Description("Crop to be sown")]
        public string CropName { get; set; }

        [Description("Automatically irrigate on deficit (True/False)")]
        public bool AutoIrrigate { get; set; }
        [Description("Depth to use in calculating deficit (mm)")]
        public double DeficitDepth { get; set; }
        [Description("Deficit on which to irrigate (mm)")]
        public double DeficitTrigger { get; set; }
        
        public double SoilWaterDeficit { get; set; }
        
        [EventSubscribe("StartOfSimulation")]
        private void OnSimulationCommencing(object sender, EventArgs e)
        {
            SoilWaterDeficit = 0.0;
            
            foreach (IModel crop in this.FindAllInScope<IPlant>().OfType<IModel>().ToList())
            {
                if (crop.Name == CropName)
                    Crop = crop as IPlant;
            }
            if (Crop == null)
                throw new Exception("Could not find crop called " + CropName);
        }
        

        [EventSubscribe("DoManagement")]
        private void OnDoManagement(object sender, EventArgs e)
        {
    
    
            SoilWaterDeficit = 0;
            if (Crop.IsAlive)
            {
            
                for (int i = 0; i < soilPhysical.Thickness.Length; i++)
                {
                    SoilWaterDeficit += LayerProportion(i, DeficitDepth) *
                    Math.Max(soilPhysical.DULmm[i] - waterBalance.SWmm[i], 0.0);
                }       
                if (SoilWaterDeficit >= DeficitTrigger)
                {
                    if (Irrigation != null)
                        Irrigation.Apply(SoilWaterDeficit);
                }
               
            }
            
        }

        private double LayerProportion(int layer, double root_depth)
        {
            double depth_to_layer_bottom = 0;   // depth to bottom of layer (mm)
            double depth_to_layer_top = 0;      // depth to top of layer (mm)
            double depth_to_root = 0;           // depth to root in layer (mm)
            double depth_of_root_in_layer = 0;  // depth of root within layer (mm)
            // Implementation Section ----------------------------------
            for (int i = 0; i <= layer; i++)
                depth_to_layer_bottom += soilPhysical.Thickness[i];
            depth_to_layer_top = depth_to_layer_bottom - soilPhysical.Thickness[layer];
            depth_to_root = Math.Min(depth_to_layer_bottom, root_depth);
            depth_of_root_in_layer = Math.Max(0.0, depth_to_root - depth_to_layer_top);

            return depth_of_root_in_layer / soilPhysical.Thickness[layer];
        }
    }
        
}
```
            Manager Harvesting: same as Validation.Australia.DRK1.DRK1.Field.Harvesting
      Experiment Angelo99
        Factors
          Factor Fert: Specification=[NRate]
            Operations N0
              1999-10-07  [Fertiliser].Apply(20, Fertiliser.Types.UreaN, 10);
            Operations N70
              1999-09-16  [Fertiliser].Apply(50, Fertiliser.Types.UreaN, 10);
              1999-10-26  [Fertiliser].Apply(20, Fertiliser.Types.UreaN, 10);
            Operations N300
              1999-09-16  [Fertiliser].Apply(50, Fertiliser.Types.UreaN, 10);
              1999-10-26  [Fertiliser].Apply(150, Fertiliser.Types.UreaN, 10);
              1999-12-02  [Fertiliser].Apply(100, Fertiliser.Types.UreaN, 10);
        Simulation Angelo99
          Weather: FileName=Angelo99.met
          Clock: Start=1999-09-16; End=2000-02-16
          Summary summaryfile
          SoilArbitrator Soil Arbitrator
          Zone Field: Area=1; Slope=0; AspectAngle=0; Altitude=50
            Plant Maize
            MicroClimate: a_interception=0; b_interception=1; c_interception=0; d_interception=0; SoilHeatFluxFraction=0.4; MinimumHeightDiffForNewLayer=0; NightInterceptionFraction=0.5; ReferenceHeight=2
            Irrigation
            Fertiliser
            SurfaceOrganicMatter: InitialResidueName=wheat; InitialResidueType=wheat; InitialResidueMass=4000; InitialStandingFraction=0; InitialCPR=0; InitialCNR=33
            Operations Sowing
              1999-09-16  [Maize].Sow(population:10, cultivar:"Hycorn_53", depth:50, rowSpacing:750);
            Operations NRate
            Report: EventNames=[Clock].DoReport
              VariableNames:
                [Clock].Today
                [Maize].Grain.Wt
                [Maize].Stem.Wt
                [Maize].Leaf.Live.Wt
                [Maize].Grain.N
                [Maize].Stem.N
                [Maize].Leaf.Live.N
                [Maize].Leaf.LAI
                [Maize].AboveGround.N
                [Maize].AboveGround.Wt
            Operations IrrigSchedule
            Report HarvestReport: same as Validation.Australia.DRK1.DRK1.Field.HarvestReport
            Soil: SoilType=Gatton; Site=UQ Lawes; NearestTown=Unknown; Region=Lockyer; NaturalVegetation=Unknown; Latitude=0; Longitude=0
              InitialWater Initial water: PercentMethod=0; FractionFull=1
              Physical: same as Validation.Australia.Angelo98.Angelo98.Field.Soil.Physical
              WaterBalance SoilWater: same as Validation.Australia.Angelo98.Angelo98.Field.Soil.SoilWater
              Organic: same as Validation.Australia.Angelo98.Angelo98.Field.Soil.Organic
              Chemical
                Thickness  NO3N  NH4N  PH
                150        2.35  0.05  7
                150        1.98  0.05  7
                300        0.82  0.05  7
                300        0.55  0.05  7
                300        0.45  0.05  7
                300        0.45  0.05  7
                300        0.47  0.05  7
              CERESSoilTemperature Temperature
              Nutrient
            Manager CropManagement: same as Validation.Australia.Angelo98.Angelo98.Field.CropManagement
            Manager Harvesting: same as Validation.Africa.JMW2Katumani.JMW2Katumani.Field.Harvesting
      Experiment Angelo00
        Factors
          Factor Fert: Specification=[NRate]
            Operations N0
            Operations N150
              2001-02-13  [Fertiliser].Apply(150, Fertiliser.Types.UreaN, 10);
            Operations N250
              2001-01-04  [Fertiliser].Apply(100, Fertiliser.Types.UreaN, 10);
              2001-02-13  [Fertiliser].Apply(150, Fertiliser.Types.UreaN, 10);
        Simulation Angelo00
          Weather: FileName=Angelo00.met
          Clock: Start=2001-01-04; End=2001-05-31
          Summary summaryfile
          SoilArbitrator Soil Arbitrator
          Zone Field: Area=1; Slope=0; AspectAngle=0; Altitude=50
            Plant Maize
            MicroClimate: a_interception=0; b_interception=1; c_interception=0; d_interception=0; SoilHeatFluxFraction=0.4; MinimumHeightDiffForNewLayer=0; NightInterceptionFraction=0.5; ReferenceHeight=2
            Irrigation
            Fertiliser
            SurfaceOrganicMatter: InitialResidueName=wheat; InitialResidueType=wheat; InitialResidueMass=4000; InitialStandingFraction=0; InitialCPR=0; InitialCNR=33
            Operations Sowing
              2001-01-04  [Maize].Sow(population:7, cultivar:"Hycorn_53", depth:50, rowSpacing:750);
            Operations NRate
            Report: EventNames=[Clock].DoReport
              VariableNames:
                [Clock].Today
                [Maize].Grain.Wt
                [Maize].Stem.Wt
                [Maize].Leaf.Live.Wt
                [Maize].Grain.N
                [Maize].Stem.N
                [Maize].Leaf.Live.N
                [Maize].Leaf.LAI
                [Maize].AboveGround.N
                [Maize].AboveGround.Wt
            Operations IrrigSchedule
            Report HarvestReport: same as Validation.Australia.DRK1.DRK1.Field.HarvestReport
            Soil: SoilType=Gatton; Site=UQ Lawes; NearestTown=Unknown; Region=Lockyer; NaturalVegetation=Unknown; Latitude=0; Longitude=0
              InitialWater Initial water: PercentMethod=0; FractionFull=1
              Physical: same as Validation.Australia.Angelo98.Angelo98.Field.Soil.Physical
              WaterBalance SoilWater: same as Validation.Australia.Angelo98.Angelo98.Field.Soil.SoilWater
              Organic: FOMCNRatio=40
                Thickness  Carbon  SoilCNRatio  FBiom  FInert  FOM
                150        1.64    12.5         0.03   0.5     69.4258
                150        1.24    12.5         0.02   0.6     54.0689
                300        0.8     12.5         0.01   0.7     32.7944
                300        0.75    12.5         0.01   0.9     19.8908
                300        0.71    12.5         0.01   0.95    12.0644
                300        0.34    12.5         0.01   0.95    7.31743
                300        0.26    12.5         0.01   0.95    4.43824
              Chemical
                Thickness  NO3N     NH4N  PH
                150        15       0.1   7
                150        8        0.1   7
                300        3.68998  0.1   7
                300        3.80998  0.1   7
                300        2.46598  0.1   7
                300        2.42999  0.1   7
                300        2.42999  0.1   7
              CERESSoilTemperature Temperature
              Nutrient
            Manager CropManagement: same as Validation.Australia.Angelo98.Angelo98.Field.CropManagement
            Manager Harvesting: same as Validation.Africa.JMW2Katumani.JMW2Katumani.Field.Harvesting
    Folder USA
      Memo
        Testing of APSIM Maize, Soil Water, Soil Nitrogen, Manure, and Soil Temperature Modules in the Midwestern United States was undertaken by [Archontoulis_etal_2014] using APSIM version 7.4.  A subset of these data has been chosen for testing of the maize model. Datasets involving application of compost have not been included so as to concentrate on tests of maize model performance, rather than overall soil organic matter dynamics.
      Experiment Ames2011
        Factors
          Factor NRate: Specification=[NRate]
            Operations 0
              2011-05-20  [Fertiliser].Apply(0, Fertiliser.Types.UreaN, 10);
            Operations 90
              2011-05-20  [Fertiliser].Apply(90, Fertiliser.Types.UreaN, 10);
            Operations 180
              2011-05-20  [Fertiliser].Apply(180, Fertiliser.Types.UreaN, 10);
        Simulation Ames2011
          Weather: FileName=%root%\Tests\Validation\Maize\Ames2.met
          Clock: Start=2011-01-01; End=2011-10-31
          Summary summaryfile
          SoilArbitrator Soil Arbitrator
          Zone Field: Area=1; Slope=0; AspectAngle=0; Altitude=50
            Plant Maize
            MicroClimate: a_interception=0; b_interception=1; c_interception=0; d_interception=0; SoilHeatFluxFraction=0.4; MinimumHeightDiffForNewLayer=0; NightInterceptionFraction=0.5; ReferenceHeight=2
            Irrigation
            Fertiliser
            SurfaceOrganicMatter: InitialResidueName=soybean; InitialResidueType=soybean; InitialResidueMass=3500; InitialStandingFraction=0; InitialCPR=0; InitialCNR=25
            Operations Sowing
              2011-05-10  [Maize].Sow(population:8.6, cultivar:"Laila", depth:40, rowSpacing:760);
            Operations NRate
              2011-05-20  [Fertiliser].Apply(0, Fertiliser.Types.UreaN, 10);
            Report: EventNames=[Clock].DoReport
              VariableNames:
                [Clock].Today
                [Maize].Grain.Wt
                [Maize].Leaf.LAI
                [Maize].AboveGroundLive.Wt
            Soil: LocalName=Clarion; NearestTown=Ames; State=Iowa; Country=USA; Latitude=0; Longitude=0; Comments=all data only from WSS
              DataSource=for Mahli al-Kaisi paper (Marsden Research farm), tes file , long term soybean
              Physical
                Thickness  BD     AirDry  LL15   DUL    SAT
                180        1.425  0.144   0.16   0.297  0.412
                120        1.425  0.132   0.147  0.289  0.412
                160        1.425  0.147   0.147  0.289  0.412
                200        1.6    0.165   0.165  0.293  0.346
                250        1.6    0.165   0.165  0.293  0.346
                410        1.6    0.105   0.105  0.25   0.346
                200        1.6    0.105   0.105  0.25   0.346
                500        1.6    0.105   0.105  0.25   0.346
                SoilCrop MaizeSoil: LL=[0.16, 0.147, 0.147, 0.165, 0.165, 0.105, 0.105, 0.105]; KL=[0.08, 0.08, 0.08, 0.08, 0.08, 0.06, 0.03, 0.01]; XF=[1, 1, 1, 1, 1, 0.9, 0.5, 0.4]
              WaterBalance SoilWater: SummerDate=1-jun; SummerU=7.975; SummerCona=3.675; WinterDate=1-dec; WinterU=3.975; WinterCona=3.675; DiffusConst=40; DiffusSlope=16; Salb=0.13; CN2Bare=82; CNRed=20; CNCov=0.8; DischargeWidth=0; CatchmentArea=0; Thickness=[50, 100, 50, 100, 300, 300, 300, 320, 300, 200]
                SWCON=[0.414, 0.414, 0.414, 0.317, 0.296, 0.307, 0.307, 0.327, 0.348, 0.364]
              Organic: FOMCNRatio=45
                Thickness  Carbon  SoilCNRatio  FBiom  FInert  FOM
                180        2.035   14           0.035  0.4     269.495
                120        1.453   14           0.018  0.512   225.502
                160        1.453   14           0.014  0.624   177.809
                200        0.727   14           0.01   0.768   132.116
                250        0.727   14           0.01   0.8     91.1394
                410        0.145   14           0.01   0.8     49.5747
                200        0.145   14           0.01   0.874   36.8351
                500        0.1     14           0.01   0.96    17.5293
              Chemical
                Thickness  NO3N     NH4N      PH
                180        14.8148  0.389864  6.317
                120        22.2222  0.584795  6.317
                160        17.5439  0         6.317
                200        12.5     0         6.582
                250        0        0         6.582
                410        0        0         7.96
                200        0        0         7.96
                500        0        0         7.96
              Sample InitialSW: Thickness=[180, 120, 160, 200, 250, 410, 200, 500]; SW=[0.297, 0.289, 0.289, 0.293, 0.293, 0.25, 0.25, 0.25]; SWUnits=Volumetric; OCUnits=Total; PHUnits=Water
              CERESSoilTemperature Temperature
              Nutrient
            Report HarvestReport: EventNames=[Maize].Harvesting
              VariableNames:
                [Clock].Today
                [Maize].Phenology.CurrentStageName as Stage
                [Maize].Grain.Wt as GrainWt
                [Maize].Stem.Wt
                [Maize].EarLive.Wt
                [Maize].Leaf.Live.Wt
                [Maize].Root.Live.Wt
                [Maize].Husk.Wt
                [Maize].Rachis.Wt
                [Maize].EarLive.N
                [Maize].Grain.N
                [Maize].Stem.N
                [Maize].Leaf.Live.N
                [Maize].Root.Live.N
                [Maize].Root.Depth
                [Maize].AboveGround.N
                [Maize].AboveGround.Wt as Biomass
                [Maize].Total.N
                [Maize].Total.Wt
                max of [Maize].Leaf.LAI from [Maize].Sowing to [Maize].Harvesting as LAImax
                [Maize].Grain.NumberFunction as GPSM
                [Maize].Grain.Size as GrainSize
                [Maize].Population
            Manager Harvesting: same as Validation.Africa.JMW2Katumani.JMW2Katumani.Field.Harvesting
      Simulation Ames2006
        Weather: FileName=%root%\Tests\Validation\Maize\Ames2.met
        Clock: Start=2006-01-01; End=2006-10-31
        Summary summaryfile
        SoilArbitrator Soil Arbitrator
        Zone Field: Area=1; Slope=0; AspectAngle=0; Altitude=50
          Plant Maize
          MicroClimate: a_interception=0; b_interception=1; c_interception=0; d_interception=0; SoilHeatFluxFraction=0.4; MinimumHeightDiffForNewLayer=0; NightInterceptionFraction=0.5; ReferenceHeight=2
          Irrigation
          Fertiliser
          SurfaceOrganicMatter: InitialResidueName=soybean; InitialResidueType=soybean; InitialResidueMass=5000; InitialStandingFraction=0; InitialCPR=0; InitialCNR=25
          Operations Sowing
            2006-04-26  [Maize].Sow(population:7.9, cultivar:"Laila", depth:60, rowSpacing:760);
          Operations NRate
            2006-04-24  [Fertiliser].Apply(112, Fertiliser.Types.UreaN, 10);
          Report: EventNames=[Clock].DoReport
            VariableNames:
              [Clock].Today
              [Maize].Grain.Wt
              [Maize].Leaf.LAI
              [Maize].AboveGroundLive.Wt
          Soil: LocalName=Nicollet; Region=Bremer; State=Iowa; Country=USA; Latitude=42.48; Longitude=-92.23; DataSource=from DSSAT soybean williams 1982
            Physical
              Thickness  BD     AirDry  LL15   DUL    SAT
              50         1.248  0.052   0.131  0.256  0.312
              100        1.248  0.07    0.123  0.242  0.306
              50         1.248  0.1     0.119  0.245  0.305
              100        1.248  0.21    0.22   0.33   0.39
              300        1.318  0.205   0.205  0.34   0.4
              300        1.382  0.205   0.205  0.34   0.4
              300        1.551  0.175   0.175  0.31   0.368
              320        1.551  0.14    0.14   0.3    0.355
              300        1.551  0.14    0.14   0.3    0.355
              200        1.551  0.14    0.14   0.3    0.355
              SoilCrop MaizeSoil
                LL=[0.131, 0.123, 0.119, 0.22, 0.205, 0.205, 0.175, 0.14, 0.14, 0.14]
                KL=[0.08, 0.08, 0.08, 0.08, 0.08, 0.08, 0.07, 0.03, 0.02, 0.01]
                XF=[1, 1, 1, 1, 1, 1, 0.97, 0.7, 0.68, 0.66]
            WaterBalance SoilWater: SummerDate=1-Jun; SummerU=9; SummerCona=3.8; WinterDate=1-Dec; WinterU=9; WinterCona=3.8; DiffusConst=40; DiffusSlope=16; Salb=0.13; CN2Bare=82; CNRed=20; CNCov=0.8; DischargeWidth=0; CatchmentArea=0; Thickness=[50, 100, 50, 100, 300, 300, 300, 320, 300, 200]
              SWCON=[0.414, 0.414, 0.414, 0.317, 0.296, 0.307, 0.307, 0.327, 0.348, 0.364]
            Organic: FOMCNRatio=45
              Thickness  Carbon  SoilCNRatio  FBiom  FInert  FOM
              50         3.2     14           0.035  0.4     222.387
              100        3.2     14           0.035  0.4     191.695
              50         3.2     14           0.024  0.46    177.976
              100        3.2     14           0.018  0.52    153.413
              300        2.47    14           0.013  0.68    98.2572
              300        1.74    14           0.01   0.8     62.9313
              300        0.15    14           0.01   0.8     40.3059
              320        0.15    14           0.01   0.855   25.0595
              300        0.15    14           0.01   0.954   16.05
              200        0.15    14           0.01   0.99    11.9255
            Chemical
              Thickness  NO3N     NH4N     PH
              50         16.0256  4.80769  6.7
              100        8.01282  2.40385  6.7
              50         16.0256  4.80769  6.7
              100        24.0385  2.40385  6.7
              300        2.52908  0        6.7
              300        0        0        6.7
              300        0        0        7.9
              320        0        0        7.9
              300        0        0        7.9
              400        0        0        7.9
            Sample InitialSW: Thickness=[50, 100, 50, 100, 300, 300, 300, 320, 300, 200]; SW=[0.26, 0.24, 0.25, 0.33, 0.34, 0.34, 0.31, 0.3, 0.3, 0.3]; SWUnits=Volumetric; OCUnits=Total; PHUnits=Water
            CERESSoilTemperature Temperature
            Nutrient
          Report HarvestReport: same as Validation.USA.Ames2011.Ames2011.Field.HarvestReport
          Manager Harvesting: same as Validation.Africa.JMW2Katumani.JMW2Katumani.Field.Harvesting
      Simulation Ames2007
        Weather: FileName=%root%\Tests\Validation\Maize\Ames2.met
        Clock: Start=2007-01-01; End=2007-10-31
        Summary summaryfile
        SoilArbitrator Soil Arbitrator
        Zone Field: Area=1; Slope=0; AspectAngle=0; Altitude=50
          Plant Maize
          MicroClimate: a_interception=0; b_interception=1; c_interception=0; d_interception=0; SoilHeatFluxFraction=0.4; MinimumHeightDiffForNewLayer=0; NightInterceptionFraction=0.5; ReferenceHeight=2
          Irrigation
          Fertiliser
          SurfaceOrganicMatter: InitialResidueName=maize; InitialResidueType=maize; InitialResidueMass=6000; InitialStandingFraction=0; InitialCPR=0; InitialCNR=40
          Operations Sowing
            2007-05-17  [Maize].Sow(population:7.9, cultivar:"Laila", depth:60, rowSpacing:760);
          Operations NRate
            2007-05-14  [Fertiliser].Apply(112, Fertiliser.Types.UreaN, 10);
          Soil: LocalName=Canisteo; NearestTown=Ames; State=Iowa; Country=USA; Latitude=0; Longitude=0; DataSource=for varius test; Comments=from WSS and saxton
            Physical
              Thickness  BD     AirDry  LL15   DUL    SAT    KS
              50         1.235  0.106   0.212  0.36   0.507  195
              200        1.235  0.191   0.212  0.36   0.507  195
              210        1.386  0.199   0.199  0.338  0.453  94
              150        1.385  0.172   0.172  0.318  0.454  158
              380        1.385  0.172   0.172  0.318  0.454  158
              660        1.6    0.106   0.106  0.234  0.376  199
              380        1.6    0.106   0.106  0.234  0.376  199
              SoilCrop MaizeSoil: LL=[0.212, 0.212, 0.199, 0.172, 0.172, 0.106, 0.106]; KL=[0.08, 0.08, 0.08, 0.08, 0.08, 0.04, 0.01]; XF=[1, 1, 1, 1, 1, 0.6, 0.2]
            WaterBalance SoilWater: SummerDate=1-Jun; SummerU=9.1; SummerCona=4; WinterDate=1-Dec; WinterU=9.1; WinterCona=4; DiffusConst=40; DiffusSlope=16; Salb=0.13; CN2Bare=82; CNRed=20; CNCov=0.8; DischargeWidth=0; CatchmentArea=0; Thickness=[50, 200, 210, 150, 380, 660, 380]; SWCON=[0.326, 0.326, 0.29, 0.333, 0.333, 0.408, 0.408]
            Organic: FOMCNRatio=45
              Thickness  Carbon  SoilCNRatio  FBiom  FInert  FOM
              50         3.488   14           0.035  0.4     320.136
              200        3.488   14           0.028  0.44    238.216
              210        1.744   14           0.015  0.604   174.659
              150        1.744   14           0.011  0.748   139.932
              380        1.744   14           0.01   0.8     79.8048
              660        0.174   14           0.01   0.842   30.0906
              380        0.174   14           0.01   0.99    17.161
            Chemical
              Thickness  NO3N     NH4N     PH
              50         80.9717  16.1943  7.96
              200        8.09717  4.04858  7.96
              210        6.87144  1.71786  7.96
              150        9.62696  0        7.96
              380        1.90006  0        7.96
              660        0.94697  0        7.96
              380        1.64474  0        7.96
            Sample InitialSW: Thickness=[50, 200, 210, 150, 380, 660, 380]; SW=[0.36, 0.36, 0.34, 0.32, 0.32, 0.23, 0.23]; SWUnits=Volumetric; OCUnits=Total; PHUnits=Water
            CERESSoilTemperature Temperature
            Nutrient
          Report HarvestReport: same as Validation.USA.Ames2011.Ames2011.Field.HarvestReport
          Manager Harvesting: same as Validation.Africa.JMW2Katumani.JMW2Katumani.Field.Harvesting
          Report: EventNames=[Clock].DoReport
            VariableNames:
              [Clock].Today
              [Maize].Grain.Wt
              [Maize].Leaf.LAI
              [Maize].AboveGroundLive.Wt
    Folder New Zealand
      Memo
        Testing of APSIM Maize under New Zealand conditions to determine the perormance of the model under temperate conditions with cool springs and mild summers.  A range of trials have been conducted and are detailed below
      Experiment Lincoln2012
        Memo
          ### Lincoln2012 (Rain-Shelter Trail)

          Testing of APSIM Maize under New Zealand conditions was undertaken using the data of [Teixeira_etal_2014].  This dataset includes the impact of three N (0 to 250 kg/ha N) and two water regimes (dryland and fully irrigated) using a rain-shelter structure.  Observations include biomass growth and nitrogen content of individual organs, soil water contents, leaf area index, phenology and yield components. Total biomass ranged from 8000 kg/ha for dryland nil N crops to up to 28000kg/ha for fully irrigated and N fertilised crops.  Dryland crops recovered 25 percent less N from applied fertilizer than irrigated crops.
        Factors
          Permutation
            Factor Nit: Specification=[Fert]
              Operations Nil
                2012-11-15  [Fertiliser].Apply(0, Fertiliser.Types.UreaN, 10);
                2012-12-20  [Fertiliser].Apply(0, Fertiliser.Types.UreaN, 10);
                2013-01-31  [Fertiliser].Apply(0, Fertiliser.Types.UreaN, 10);
              Operations Low
                2012-11-15  [Fertiliser].Apply(25, Fertiliser.Types.UreaN, 10);
                2012-12-20  [Fertiliser].Apply(50, Fertiliser.Types.UreaN, 10);
              Operations Med
                2012-11-15  [Fertiliser].Apply(50, Fertiliser.Types.UreaN, 10);
                2012-12-20  [Fertiliser].Apply(100, Fertiliser.Types.UreaN, 10);
                2013-01-31  [Fertiliser].Apply(100, Fertiliser.Types.UreaN, 10);
            Factor Irr: Specification=[Irrig]
              Operations Full
                2012-10-24  [Irrigation].Apply(16);
                2012-10-26  [Irrigation].Apply(10);
                2012-11-03  [Irrigation].Apply(13);
                2012-11-11  [Irrigation].Apply(19.5);
                2012-11-15  [Irrigation].Apply(3.1);
                2012-11-23  [Irrigation].Apply(25);
                2012-11-29  [Irrigation].Apply(25);
                2012-11-30  [Irrigation].Apply(30);
                2012-12-13  [Irrigation].Apply(19);
                2012-12-20  [Irrigation].Apply(26);
                2012-12-20  [Irrigation].Apply(4);
                2012-12-27  [Irrigation].Apply(22);
                2013-01-03  [Irrigation].Apply(39.7);
                2013-01-10  [Irrigation].Apply(42.1);
                2013-01-17  [Irrigation].Apply(46.2);
                2013-01-24  [Irrigation].Apply(44.7);
                2013-01-31  [Irrigation].Apply(49.0);
                2013-02-07  [Irrigation].Apply(37);
                2013-02-14  [Irrigation].Apply(38);
                2013-02-21  [Irrigation].Apply(38);
                2013-02-28  [Irrigation].Apply(33.4);
                2013-03-07  [Irrigation].Apply(39.7);
                2013-03-14  [Irrigation].Apply(31.3);
                2013-03-21  [Irrigation].Apply(24);
                2013-03-28  [Irrigation].Apply(34);
                2013-04-04  [Irrigation].Apply(27.5);
              Operations Nil
                2012-10-24  [Irrigation].Apply(16);
                2012-10-26  [Irrigation].Apply(10);
                2012-11-03  [Irrigation].Apply(13);
                2012-11-11  [Irrigation].Apply(19.5);
                2012-11-15  [Irrigation].Apply(3.1);
                2012-11-23  [Irrigation].Apply(25);
                2012-11-29  [Irrigation].Apply(25);
                2012-12-20  [Irrigation].Apply(4);
                2013-01-31  [Irrigation].Apply(4.3);
        Simulation Lincoln2012
          Weather: FileName=lincoln.met
          Clock: Start=2012-10-01; End=2013-04-25
          Summary summaryfile
          SoilArbitrator Soil Arbitrator
          Zone RainShelter: Area=1; Slope=0; AspectAngle=0; Altitude=50
            Soil paparoa_silt_loam: SoilType=lignin_FOM; Region=Generic soil types; State=Canterbury; Latitude=999999; Longitude=999999
              DataSource=Profile descriptions provided by Trevor Webb and data for functional horizions based on SWAMP project results
              Physical
                Thickness  BD     AirDry  LL15  DUL   SAT
                200        1      0.06    0.06  0.3   0.37
                200        1.3    0.12    0.12  0.3   0.37
                200        1.601  0.1     0.12  0.26  0.32
                200        1.4    0.13    0.13  0.24  0.3
                200        1.4    0.12    0.12  0.24  0.3
                200        1.4    0.04    0.15  0.21  0.3
                200        1.4    0.04    0.15  0.21  0.3
                200        1.4    0.04    0.15  0.21  0.3
                SoilCrop MaizeSoil: LL=[0.084, 0.12, 0.12, 0.15, 0.15, 0.06, 0.06, 0.06]; KL=[0.1, 0.075, 0.06, 0.06, 0.02, 0.005, 0.002, 0.001]; XF=[1, 0.7, 0.3, 0.3, 0.7, 1, 1, 1]
              WaterBalance SoilWater: SummerDate=1-Nov; SummerU=9; SummerCona=4.4; WinterDate=1-Apr; WinterU=6; WinterCona=3; DiffusConst=88; DiffusSlope=35; Salb=0.13; CN2Bare=73; CNRed=20; CNCov=0.8; Thickness=[200, 200, 200, 200, 200, 200, 200, 200]; SWCON=[0.5, 0.56, 0.31, 0.7, 0.7, 0.7, 0.7, 0.7]
              Organic: FOMCNRatio=16
                Thickness  Carbon  SoilCNRatio  FBiom  FInert  FOM
                200        3.6     11           0.03   0.2     2329.32
                200        2.2     11           0.02   0.4     1561.39
                200        0.42    11           0.01   0.8     1046.63
                300        0.23    11           0.01   0.9     574.404
                300        0.23    11           0.01   0.9     315.24
                300        0.23    11           0.01   0.9     173.007
              Chemical
                Thickness  NO3N  NH4N  PH
                200        2.86  0.89  6
                200        1.98  0.99  6
                200        0.3   0.59  6
                300        0.71  0.37  6
                300        1.56  0.21  6
                300        1.07  0     6
              Sample Initial nitrogen: Thickness=[200, 200, 200, 300, 300, 300]; SW=[0.06, 0.25, 0.2, 0.2, 0.2, 0.2]; SWUnits=Volumetric; OCUnits=Total; PHUnits=Water
              CERESSoilTemperature Temperature
              Nutrient
            MicroClimate: a_interception=0; b_interception=1; c_interception=0; d_interception=0; SoilHeatFluxFraction=0.4; MinimumHeightDiffForNewLayer=0; NightInterceptionFraction=0.5; ReferenceHeight=2
            Irrigation
            Fertiliser
            SurfaceOrganicMatter: InitialResidueName=wheat; InitialResidueType=wheat; InitialResidueMass=0; InitialStandingFraction=0; InitialCPR=0; InitialCNR=80
            Manager ClimateControl
              StartDate = 2012-10-23
              EndDate = 2013-04-10
```csharp
using Models.Climate;
using System;
using Models.Core;
using APSIM.Shared.Utilities;
using System.Collections.Generic;
using System.Text;
using Models.PMF;
using Models;
using System.Xml.Serialization;

namespace Models
{
    [Serializable] 
    [System.Xml.Serialization.XmlInclude(typeof(Model))]
    public class Script : Model
    {
        [Link] Weather Met;
        [Link] Clock Clock;
    
        [Description("Start Date")]
        public DateTime StartDate { get; set; }
        
        [Description("End Date")]
        public DateTime EndDate { get; set; }
 
    
        [EventSubscribe("PreparingNewWeatherData")]
        private void OnPreparingNewWeatherData(object sender, EventArgs e)
        {
            if ((Clock.Today.Date >= StartDate) && (Clock.Today.Date <= EndDate))
                {                
                //Rainshelter stops rain
                Met.Rain = 0;    
                //Rainshelter stops frost
                if (Met.MinT < 2.0)
                    Met.MinT = 2.0;    
                }
        }
    }
}
```
            Operations Irrig
              2012-10-24  [Irrigation].Apply(16);
              2012-10-26  [Irrigation].Apply(10);
              2012-11-03  [Irrigation].Apply(13);
              2012-11-11  [Irrigation].Apply(19.5);
              2012-11-15  [Irrigation].Apply(3.1);
              2012-11-23  [Irrigation].Apply(20);
              2012-11-29  [Irrigation].Apply(20);
              2012-11-30  [Irrigation].Apply(30);
              2012-12-13  [Irrigation].Apply(19);
              2012-12-20  [Irrigation].Apply(26);
              2012-12-20  [Irrigation].Apply(4);
              2012-12-27  [Irrigation].Apply(22);
              2013-01-03  [Irrigation].Apply(39.7);
              2013-01-10  [Irrigation].Apply(42.1);
              2013-01-17  [Irrigation].Apply(46.2);
              2013-01-24  [Irrigation].Apply(44.7);
              2013-01-31  [Irrigation].Apply(44.7);
              2013-01-31  [Irrigation].Apply(4.3);
              2013-02-07  [Irrigation].Apply(37);
              2013-02-14  [Irrigation].Apply(38);
              2013-02-21  [Irrigation].Apply(38);
              2013-02-28  [Irrigation].Apply(33.4);
              2013-03-07  [Irrigation].Apply(39.7);
              2013-03-14  [Irrigation].Apply(31.3);
              2013-03-21  [Irrigation].Apply(24);
              2013-03-28  [Irrigation].Apply(34);
              2013-04-04  [Irrigation].Apply(27.5);
            Operations Fert: same as Validation.New Zealand.Lincoln2012.Factors.Permutation.Nit.Med
            Operations Sow
              2012-10-23  [Maize].Sow(population:11, cultivar:"Pioneer_39G12", depth:50, rowSpacing:710);
            Plant Maize
            Manager ExtraVariables
```csharp
using Newtonsoft.Json;
using System;
using Models.Core;
using System.Collections.Generic;
using System.Text;
using Models.Soils;
using Models.Soils.Nutrients;
using Models.PMF;
using Models;
using System.Xml.Serialization;
using APSIM.Shared.Utilities;
using Models.Climate;

namespace Models
{
    [Serializable] 
    public class Script : Model
    {
        [Link] Clock Clock;
        [Link] Soils.Soil Soil;
        [Link] Models.Surface.SurfaceOrganicMatter SOM;
        [Link] Weather Met;
        [Link] Fertiliser Fert;
        [Link] Irrigation Irrig;
        [Link] Plant Maize;
        [Link] Zone zone;
                    
        [JsonIgnore] public bool InitialDay { get; set; }
        [JsonIgnore] public double LeafExpandedPosition { get; set; }
        [JsonIgnore] public double LeafAppearedPosition { get; set; }
        [JsonIgnore] public double ExpandedLeafNoYesterday { get; set; }
        [JsonIgnore] public double AppearedLeafNoYesterday { get; set; }
        [JsonIgnore] public double MostRecentlyExpandedLeafSize { get; set; }
        [JsonIgnore] public double MostRecentlyAppearedLeafMaxSize { get; set; }
        
        [EventSubscribe("StartOfSimulation")]
        private void OnSimulationCommencing(object sender, EventArgs e)
        {
            InitialDay = true;
            LeafExpandedPosition = 0;
            LeafAppearedPosition = 0;
            ExpandedLeafNoYesterday = 0;
            AppearedLeafNoYesterday = 0;
            MostRecentlyExpandedLeafSize = 0;
            MostRecentlyAppearedLeafMaxSize = 0;
        }
        
        [EventSubscribe("DoManagement")]
        private void OnDoManagement(object sender, EventArgs e)
        {
        }
        
        [EventSubscribe("DoManagementCalculations")]
        private void OnDoManagementCalculations(object sender, EventArgs e)
        {
           
            if (Convert.ToDouble(zone.Get("Maize.Leaf.ExpandedCohortNo")) > ExpandedLeafNoYesterday)
            {
                LeafExpandedPosition = Convert.ToDouble(zone.Get("Maize.Leaf.ExpandedCohortNo"));
                MostRecentlyExpandedLeafSize = (double)zone.Get("Maize.Leaf.CohortSize[" + (int)LeafExpandedPosition + "]");
            }
             
            if (Convert.ToDouble(zone.Get("Maize.Leaf.AppearedCohortNo")) > AppearedLeafNoYesterday)
            {
                LeafAppearedPosition = Convert.ToDouble(zone.Get("Maize.Leaf.AppearedCohortNo"));
                MostRecentlyAppearedLeafMaxSize = (double)zone.Get("Maize.Leaf.CohortParameters.MaxArea.Value()");
            }

        }
    }
}
```
            Manager Harvesting
```csharp
using Newtonsoft.Json;
using Models.Soils.Nutrients;
using System;
using Models.Core;
using System.Collections.Generic;
using System.Text;
using Models.Soils;
using Models.PMF;
using Models;
using System.Xml.Serialization;
using APSIM.Shared.Utilities;
using Models.PMF.Phen;

namespace Models
{
    [Serializable] 
    public class Script : Model
    {
        [Link] private Plant Maize;
        [Link] private Zone zone;
        [Link] private Simulation sim;
        [Link(Type = LinkType.Path, Path = "[Maize].Phenology")]
        private Phenology phenology;

        [JsonIgnore] private RemovalFractions Remove { get; set; }
        [JsonIgnore] private bool Harvested {get; set;}
                
        [EventSubscribe("StartOfSimulation")]
        private void OnSimulationCommencing(object sender, EventArgs e)
        {
        Remove = new RemovalFractions();
        Harvested = false;
        }
        
        [EventSubscribe("DoManagement")]
        private void OnDoManagement(object sender, EventArgs e)
        {
            if ((phenology.CurrentPhase.Name == "ReadyForHarvesting") & (Harvested == false))
            {
                Remove.SetFractionToRemove("Leaf", 0.0,"Live");
                Remove.SetFractionToResidue("Leaf", 0.0,"Live");
                Remove.SetFractionToRemove("Leaf", 0.0,"Dead");
                Remove.SetFractionToResidue("Leaf", 0.0,"Dead");
                Remove.SetFractionToRemove("Grain", 0.0);
                Remove.SetFractionToResidue("Grain", 0.0);
                Remove.SetFractionToRemove("Stem", 0.0);
                Remove.SetFractionToResidue("Stem", 0.0);
                Remove.SetFractionToRemove("Husk", 0.0);
                Remove.SetFractionToResidue("Husk", 0.0);
                Remove.SetFractionToRemove("Rachis", 0.0);
                Remove.SetFractionToResidue("Rachis", 0.0);
                Remove.SetFractionToRemove("Root", 0.0);
                Remove.SetFractionToResidue("Root", 0.0);
                Maize.Harvest(Remove);
                //Maize.EndCrop();
                Harvested = true;
            }
        }
        
        [EventSubscribe("DoManagementCalculations")]
        private void OnDoManagementCalculations(object sender, EventArgs e)
        {
            
        }
    }
}
```
            Report: EventNames=[Clock].DoReport
              VariableNames:
                [Clock].Today
                [ExtraVariables].Script.LeafAppearedPosition
                [ExtraVariables].Script.LeafExpandedPosition
                [ExtraVariables].Script.MostRecentlyAppearedLeafMaxSize
                [ExtraVariables].Script.MostRecentlyExpandedLeafSize
                [Maize].AboveGround.N
                [Maize].AboveGround.Wt
                [Maize].AboveGroundLive.N
                [Maize].AboveGroundLive.Wt
                [Maize].EarLive.N
                [Maize].EarLive.Wt
                [Maize].Grain.Size
                [Maize].Grain.N
                [Maize].Grain.NConc
                [Maize].Grain.Wt
                [Maize].Grain.NumberFunction
                [Maize].Husk.N
                [Maize].Husk.NConc
                [Maize].Husk.Wt
                [Maize].Leaf.AppearedCohortNo
                [Maize].Leaf.CoverDead
                [Maize].Leaf.CoverTotal
                [Maize].Leaf.Dead.NConc
                [Maize].Leaf.Dead.Wt
                [Maize].Leaf.Dead.N
                [Maize].Leaf.DeadCohortNo
                [Maize].Leaf.DeadCohortNo
                [Maize].Leaf.ExpandedCohortNo
                [Maize].Leaf.InitialisedCohortNo
                [Maize].Leaf.LAI
                [Maize].Leaf.Live.N
                [Maize].Leaf.Live.NConc
                [Maize].Leaf.Live.Wt
                [Maize].Leaf.SpecificArea
                [Maize].Leaf.SpecificNitrogen
                [Maize].Leaf.SenescingCohortNo + [Maize].Leaf.DeadCohortNo as NodesStartedSenescing
                [Maize].Phenology.CurrentPhase.Name
                [Maize].Phenology.CurrentStageName
                [Maize].Phenology.Stage
                [Maize].Phenology.BBCH.Stage
                [Maize].Rachis.N
                [Maize].Rachis.NConc
                [Maize].Rachis.Wt
                [Maize].Stem.N
                [Maize].Stem.NConc
                [Maize].Stem.Wt
                [Maize].Structure.LeafTipsAppeared
                [Maize].Structure.Phyllochron
                [Phenology].ThermalTime
                [Soil].SoilWater.SW
                sum([Soil].SoilWater.SWmm) as ProfileWater
                [Maize].Structure.Height
            Report HarvestReport: same as Validation.USA.Ames2011.Ames2011.Field.HarvestReport
      Experiment Lincoln2010
        Memo
          ### Lincoln2010 (Leaf properties trial)
          This trial was conducted to provide data for parametersising the Leaf Area model and is described in detail by [Teixeira_etal_2011].  Detailed measurements were conducted on leaf apperance and expansion with some measurements of biomass accumulation.  Treatments of plus and minus Nitrogen were applied but there was sufficient N in the soil than N responses were very small.
        Factors
          Factor Nitrogen: Specification=[Fert]
            Operations Med
              2010-10-22  [Fertiliser].Apply(47, Fertiliser.Types.UreaN, 10);
              2010-12-17  [Fertiliser].Apply(200, Fertiliser.Types.UreaN, 10);
            Operations Nil
              2010-10-22  [Fertiliser].Apply(0, Fertiliser.Types.UreaN, 10);
              2010-12-17  [Fertiliser].Apply(0, Fertiliser.Types.UreaN, 10);
        Simulation Lincoln2010
          Weather: FileName=%root%\Tests\Validation\Maize\lincoln.met
          Clock: Start=2010-10-01; End=2011-04-20
          Summary summaryfile
          SoilArbitrator Soil Arbitrator
          Zone Field: Area=1; Slope=0; AspectAngle=0; Altitude=50
            Soil paparoa_silt_loam: SoilType=lignin_FOM; Region=Generic soil types; State=Canterbury; Latitude=999999; Longitude=999999
              DataSource=Profile descriptions provided by Trevor Webb and data for functional horizions based on SWAMP project results
              InitialWater Initial water: PercentMethod=1; FractionFull=0.8
              Physical
                Thickness  BD     AirDry  LL15   DUL    SAT
                200        1.311  0.077   0.154  0.374  0.456
                200        1.474  0.152   0.152  0.32   0.413
                200        1.601  0.162   0.162  0.325  0.376
                300        1.68   0.06    0.06   0.15   0.3
                300        1.68   0.06    0.06   0.15   0.3
                300        1.68   0.06    0.06   0.15   0.3
                SoilCrop MaizeSoil: LL=[0.154, 0.152, 0.162, 0.06, 0.06, 0.06]; KL=[0.075, 0.075, 0.06, 0.049, 0.049, 0.049]; XF=[1, 1, 0.51, 1, 1, 1]
              WaterBalance SoilWater: SummerDate=1-Nov; SummerU=9; SummerCona=4.4; WinterDate=1-Apr; WinterU=6; WinterCona=3; DiffusConst=88; DiffusSlope=35; Salb=0.13; CN2Bare=73; CNRed=20; CNCov=0.8; Thickness=[200, 200, 200, 300, 300, 300]; SWCON=[0.5, 0.56, 0.31, 0.7, 0.7, 0.7]
              Organic: FOMCNRatio=16
                Thickness  Carbon  SoilCNRatio  FBiom  FInert  FOM
                200        2.6     11           0.03   0.4     2329.32
                200        0.97    11           0.02   0.6     1561.39
                200        0.42    11           0.01   0.8     1046.63
                300        0.23    11           0.01   0.9     574.404
                300        0.23    11           0.01   0.9     315.24
                300        0.23    11           0.01   0.9     173.007
              Chemical
                Thickness  NO3N      NH4N      PH
                200        26.6972   0.343249  6
                200        16.9607   0.990502  6
                200        3.12305   0.178014  6
                300        1.35913   0.194444  6
                300        0.968254  0.166667  6
                300        0.345238  0.107143  6
              CERESSoilTemperature Temperature
              Nutrient
            Irrigation
            SurfaceOrganicMatter: InitialResidueName=fieldpea; InitialResidueType=fieldpea; InitialResidueMass=0; InitialStandingFraction=0; InitialCPR=0; InitialCNR=40
            Fertiliser
            Folder Manager folder
              Operations Sow
                2010-10-26  [Maize].Sow(population:10, cultivar:"Pioneer_39V43", depth:50, rowSpacing:760);
              Operations Fert
                2010-10-22  [Fertiliser].Apply(47, Fertiliser.Types.UreaN, 10);
                2010-12-17  [Fertiliser].Apply(200, Fertiliser.Types.UreaN, 10);
              Operations Irrig
                2010-10-29  [Irrigation].Apply(14);
                2010-12-03  [Irrigation].Apply(10);
                2010-12-20  [Irrigation].Apply(20);
                2011-01-06  [Irrigation].Apply(30);
                2011-01-17  [Irrigation].Apply(30);
                2011-02-04  [Irrigation].Apply(30);
                2011-02-17  [Irrigation].Apply(30);
                2011-03-03  [Irrigation].Apply(30);
            Manager SimCode
```csharp
using APSIM.Shared.Utilities;
using Models.PMF;
using Models.Core;
using System;

namespace Models
{
    [Serializable]
    [System.Xml.Serialization.XmlInclude(typeof(Model))]
    public class Script : Model
    {
        [Link] Clock Clock;
        [EventSubscribe("StartOfSimulation")]
        private void OnSimulationCommencing(object sender, EventArgs e)
        {
            /*
                ExpNo = 1
TreatNo = 2
            */
        }
    }
}
```
            MicroClimate: a_interception=0; b_interception=1; c_interception=0; d_interception=0; SoilHeatFluxFraction=0.4; MinimumHeightDiffForNewLayer=0; NightInterceptionFraction=0.5; ReferenceHeight=2
            Plant Maize
            Report: EventNames=[Clock].DoReport
              VariableNames:
                [Clock].Today
                [Maize].Leaf.LAI
                [Maize].Phenology.Stage
                [Maize].AboveGroundLive.Wt
                [Maize].Leaf.ExpandedCohortNo
                [Maize].Leaf.AppearedCohortNo
                [Maize].Grain.Wt
            Report HarvestReport: same as Validation.USA.Ames2011.Ames2011.Field.HarvestReport
            Manager Harvesting: same as Validation.Africa.JMW2Katumani.JMW2Katumani.Field.Harvesting
      Experiment Lincoln2008
        Factors
          Permutation
            Factor Sow: Specification=[SowDate]
              Operations Early39G12
                2008-09-17  [Maize].Sow(population:10.52, cultivar:"Pioneer_39G12", depth:50, rowSpacing:800);
              Operations Late39G12
                2008-11-12  [Maize].Sow(population:10.52, cultivar:"Pioneer_39G12", depth:50, rowSpacing:800);
              Operations Early34K77
                2008-09-17  [Maize].Sow(population:10.52, cultivar:"Pioneer_34K77", depth:50, rowSpacing:800);
              Operations Late34K77
                2008-11-12  [Maize].Sow(population:10.52, cultivar:"Pioneer_34K77", depth:50, rowSpacing:800);
            Factor Cover: Specification=[Fert]
              Operations Bare
                2008-09-16  [Fertiliser].Apply(140.5, Fertiliser.Types.UreaN, 10);
                2008-12-17  [Fertiliser].Apply(161, Fertiliser.Types.UreaN, 10);
              Operations Plastic
                2008-09-16  [Fertiliser].Apply(140.5, Fertiliser.Types.UreaN, 10);
                2008-12-17  [Fertiliser].Apply(161, Fertiliser.Types.UreaN, 10);
        Simulation Lincoln2008
          Weather: FileName=%root%\Tests\Validation\Maize\lincoln.met
          Clock: Start=2008-06-01; End=2009-06-15
          Summary summaryfile
          SoilArbitrator Soil Arbitrator
          Zone Field: Area=1; Slope=0; AspectAngle=0; Altitude=50
            Soil paparoa_silt_loam: SoilType=lignin_FOM; Region=Generic soil types; State=Canterbury; Latitude=999999; Longitude=999999
              DataSource=Profile descriptions provided by Trevor Webb and data for functional horizions based on SWAMP project results
              InitialWater Initial water: PercentMethod=1; FractionFull=0.8
              Physical: same as Validation.New Zealand.Lincoln2010.Lincoln2010.Field.paparoa_silt_loam.Physical
              WaterBalance SoilWater: same as Validation.New Zealand.Lincoln2010.Lincoln2010.Field.paparoa_silt_loam.SoilWater
              Organic: FOMCNRatio=16
                Thickness  Carbon  SoilCNRatio  FBiom  FInert  FOM
                200        1.8     11           0.03   0.4     2329.32
                200        0.97    11           0.02   0.6     1561.39
                200        0.42    11           0.01   0.8     1046.63
                300        0.23    11           0.01   0.9     574.404
                300        0.23    11           0.01   0.9     315.24
                300        0.23    11           0.01   0.9     173.007
              Chemical
                Thickness  NO3N      NH4N      PH
                200        6.18993   0.343249  6
                200        3.64993   0.990502  6
                200        2.44535   0.178014  6
                300        1.35913   0.194444  6
                300        0.968254  0.166667  6
                300        0.345238  0.107143  6
              CERESSoilTemperature Temperature
              Nutrient
            Irrigation
            SurfaceOrganicMatter: InitialResidueName=fieldpea; InitialResidueType=fieldpea; InitialResidueMass=0; InitialStandingFraction=0; InitialCPR=0; InitialCNR=40
            Fertiliser
            MicroClimate: a_interception=0; b_interception=1; c_interception=0; d_interception=0; SoilHeatFluxFraction=0.4; MinimumHeightDiffForNewLayer=0; NightInterceptionFraction=0.5; ReferenceHeight=2
            Plant Maize
            Operations Fert
              2008-09-16  [Fertiliser].Apply(140.5, Fertiliser.Types.UreaN, 10);
              2008-12-17  [Fertiliser].Apply(161, Fertiliser.Types.UreaN, 10);
            Operations Irrig
              2008-10-21  [Irrigation].Apply(15);
              2008-10-29  [Irrigation].Apply(10);
              2008-11-18  [Irrigation].Apply(10);
              2008-11-27  [Irrigation].Apply(30);
              2008-12-02  [Irrigation].Apply(25);
              2008-12-09  [Irrigation].Apply(25);
              2008-12-30  [Irrigation].Apply(30);
              2009-01-06  [Irrigation].Apply(25);
              2009-01-13  [Irrigation].Apply(10);
              2009-01-26  [Irrigation].Apply(25);
              2009-01-29  [Irrigation].Apply(25);
              2009-02-04  [Irrigation].Apply(20);
              2009-02-10  [Irrigation].Apply(25);
              2009-03-18  [Irrigation].Apply(30);
            Operations SowDate
              2008-09-17  [Maize].Sow(population:10.52, cultivar:"Pioneer_3153", depth:50, rowSpacing:800);
            Report: EventNames=[Clock].DoReport
              VariableNames:
                [Clock].Today
                [Maize].Grain.Wt
                [Maize].Stem.Wt
                [Maize].Leaf.Live.Wt
                [Maize].Leaf.CoverTotal
                [Maize].Phenology.Stage
                [Maize].AboveGroundLive.Wt
                [Maize].Leaf.ExpandedCohortNo
                [Maize].Leaf.AppearedCohortNo
            Report HarvestReport: same as Validation.USA.Ames2011.Ames2011.Field.HarvestReport
            Manager Harvesting: same as Validation.Africa.JMW2Katumani.JMW2Katumani.Field.Harvesting
      Experiment HawksBay2010
        Factors
          Permutation
            Factor Sow
              CompositeFactor Early: Specifications=[SowingRule].Script.SowingDate = 2010-10-04
              CompositeFactor Mid: Specifications=[SowingRule].Script.SowingDate = 2010-11-01
              CompositeFactor Late: Specifications=[SowingRule].Script.SowingDate = 2010-12-01
            Factor Cv
              CompositeFactor 39V43: Specifications=[SowingRule].Script.CultivarName = Pioneer_39V43
              CompositeFactor 38H20: Specifications=[SowingRule].Script.CultivarName = Pioneer_38H20
              CompositeFactor 33M54: Specifications=[SowingRule].Script.CultivarName = Pioneer_33M54
        Simulation HawksBay2010
          Weather: FileName=%root%\Tests\Validation\Maize\HawkesBay.met
          Clock: Start=2010-10-01; End=2011-06-15
          Summary summaryfile
          SoilArbitrator Soil Arbitrator
          Zone Field: Area=1; Slope=0; AspectAngle=0; Altitude=50
            Soil paparoa_silt_loam: SoilType=lignin_FOM; Region=Generic soil types; State=Canterbury; Latitude=999999; Longitude=999999
              DataSource=Profile descriptions provided by Trevor Webb and data for functional horizions based on SWAMP project results
              InitialWater Initial water: PercentMethod=1; FractionFull=0.8
              Physical
                Thickness  BD     AirDry  LL15   DUL    SAT
                200        1.311  0.077   0.154  0.374  0.456
                200        1.474  0.152   0.152  0.32   0.413
                200        1.601  0.162   0.162  0.325  0.376
                300        1.68   0.14    0.14   0.3    0.366
                300        1.68   0.14    0.14   0.3    0.366
                300        1.68   0.14    0.14   0.3    0.366
                SoilCrop MaizeSoil: LL=[0.154, 0.152, 0.162, 0.14, 0.14, 0.14]; KL=[0.075, 0.075, 0.06, 0.049, 0.049, 0.049]; XF=[1, 1, 0.51, 1, 1, 1]
              WaterBalance SoilWater: same as Validation.New Zealand.Lincoln2010.Lincoln2010.Field.paparoa_silt_loam.SoilWater
              Organic: same as Validation.New Zealand.Lincoln2008.Lincoln2008.Field.paparoa_silt_loam.Organic
              Chemical
                Thickness  NO3N      NH4N      PH
                200        66.19     0.343249  6
                200        3.65      0.990502  6
                200        2.44535   0.178014  6
                300        1.35913   0.194444  6
                300        0.968254  0.166667  6
                300        0.345238  0.107143  6
              CERESSoilTemperature Temperature
              Nutrient
            Irrigation
            SurfaceOrganicMatter: InitialResidueName=fieldpea; InitialResidueType=fieldpea; InitialResidueMass=0; InitialStandingFraction=0; InitialCPR=0; InitialCNR=40
            Fertiliser
            MicroClimate: a_interception=0; b_interception=1; c_interception=0; d_interception=0; SoilHeatFluxFraction=0.4; MinimumHeightDiffForNewLayer=0; NightInterceptionFraction=0.5; ReferenceHeight=2
            Plant Maize
            Operations Fert
              2008-09-16  [Fertiliser].Apply(140.5, Fertiliser.Types.UreaN, 10);
              2008-12-17  [Fertiliser].Apply(161, Fertiliser.Types.UreaN, 10);
            Operations Irrig: same as Validation.New Zealand.Lincoln2008.Lincoln2008.Field.Irrig
            Report: EventNames=[Clock].DoReport
              VariableNames:
                [Clock].Today
                [Maize].Grain.Wt
                [Maize].Stem.Wt
                [Maize].Leaf.Live.Wt
                [Maize].Leaf.CoverTotal
                [Maize].Leaf.LAI
                [Maize].Phenology.Stage
                [Maize].AboveGroundLive.Wt
                [Maize].Leaf.ExpandedCohortNo
                [Maize].Leaf.AppearedCohortNo
            Report HarvestReport: same as Validation.USA.Ames2011.Ames2011.Field.HarvestReport
            Manager Harvesting: same as Validation.Australia.DRK1.DRK1.Field.Harvesting
            Manager SowingRule
              RowSpace = 720
              PlantPopulation = 10.5
              PlantingDepth = 20
              CultivarName = Pioneer_39V43
              SowingDate = 2010-10-04
```csharp
using APSIM.Shared.Utilities;
using Models.PMF;
using Models.Core;
using System;
        
namespace Models
{
    [Serializable] 
    [System.Xml.Serialization.XmlInclude(typeof(Model))]
    public class Script : Model
    {
        [Link] Plant Maize;
        [Link] Clock Clock;

        [Description("Spacing (mm) betweenrows")]
        public double RowSpace { get; set; }
        [Description("Population (/m)")]
        public double PlantPopulation { get; set; }
        [Description("Depth (mm) tubers are planted")]
        public double PlantingDepth { get; set; }
        [Description("Cultivar")]
        public string CultivarName { get; set; }
        [Description("Sowing Date")]
        public DateTime SowingDate { get; set; }

        [EventSubscribe("DoManagement")]
        private void OnDoManagement(object sender, EventArgs e)
        {
            if (Clock.Today.Date == SowingDate)
                Maize.Sow(population: PlantPopulation, cultivar: CultivarName, depth: PlantingDepth, rowSpacing: RowSpace);
        }
    }
}
```
  Folder Sensibility Tests
    Experiment Bugesera
      Memo
        Maize is grown in the Bugesera region of southern Rwanda in Central Africa.  The region has a bimodal rainfall distribution which allows two plantings per year.  For low input situations the maize yields should vary between 1 and 3 t/ha per crop.  Under fertilised conditions the yield should increase up to 5 t/ha per crop.
      Factors
        Factor NRate: Specification=[SowingFertiliser].Script.Amount = 0, 50
      Simulation Bugesera
        Clock: Start=2000-01-01; End=2013-12-31
        Summary SummaryFile
        Weather: FileName=Bugesera.met
        Manager ClimateChange
          DeltaMaxT = 0
          DeltaRadiation = 0
          DeltaRain = 0
```csharp
using Models.Climate;
using APSIM.Shared.Utilities;
using Models.Utilities;
using Models.Soils.Nutrients;
using Models.Soils;
using Models.PMF;
using Models.Core;
using System;
using Models.Soils.Nutrients;

namespace Models
{
    [Serializable]
    public class Script : Model
    {
        [Link] Clock Clock;
        [Link] Weather Weather;
        [Link] Summary Summary;
        
        [Description("Change in Maximum Temperature (oC)")]
        public double DeltaMaxT { get; set; }
        [Description("Change in SolarRadiation (%)")]
        public double DeltaRadiation { get; set; }
        [Description("Change in Rainfall (%)")]
        public double DeltaRain { get; set; }
        
        [EventSubscribe("StartOfSimulation")]
        private void OnSimulationCommencing(object sender, EventArgs e)
        {
        }
        

        [EventSubscribe("PreparingNewWeatherData")]
        private void OnPreparingNewWeatherData(object sender, EventArgs e)
        {
            Weather.MaxT += DeltaMaxT;
            Weather.Radn *= (1.0 + DeltaRadiation / 100);
            Weather.Rain *= (1.0 + DeltaRain / 100);
        }
        
    }
}
```
        SoilArbitrator Soil Arbitrator
        Zone Field: Area=1; Slope=0; AspectAngle=0; Altitude=50
          Report SensibilityReport: EventNames=[Maize].Harvesting
            VariableNames:
              [Clock].Today
              [Maize].Phenology.CurrentStageName
              [Maize].AboveGround.Wt
              [Maize].AboveGround.N
              [Maize].Grain.Size
              [Maize].Grain.Number
              [Maize].Grain.Wt
              [Maize].Grain.N
              [Maize].Total.Wt
              [Maize].Phenology.FloweringDAS as FloweringDAS
              [Maize].Phenology.MaturityDAS as MaturityDAS
              [Maize].DaysAfterSowing
              sum of [Weather].Rain from [Maize].Sowing to [Maize].Harvesting as InCropRain
          Fertiliser
          SurfaceOrganicMatter: InitialResidueName=wheat_stubble; InitialResidueType=wheat; InitialResidueMass=500; InitialStandingFraction=0; InitialCPR=0; InitialCNR=100
          Soil: Site=Bugesera; NearestTown=Nyamata; Region=Bugesera; Country=Rwanda; Latitude=-2.15; Longitude=30.45; DataSource=Rwanda soil database using properties for Ferralsol
            WaterBalance SoilWater: SummerDate=1-Nov; SummerU=3; SummerCona=4.5; WinterDate=1-Apr; WinterU=3; WinterCona=4.5; DiffusConst=40; DiffusSlope=21; Salb=0.13; CN2Bare=73; CNRed=20; CNCov=0.8; Thickness=[150, 150, 300, 300, 300, 300, 300]; SWCON=[0.45, 0.3, 0.3, 0.3, 0.3, 0.3, 0.3]
            InitialWater: PercentMethod=0; FractionFull=0.25
            Physical
              Thickness  BD    AirDry  LL15   DUL    SAT
              150        1.52  0.0796  0.199  0.309  0.382
              150        1.54  0.1332  0.222  0.323  0.389
              300        1.51  0.249   0.249  0.358  0.399
              300        1.44  0.294   0.294  0.412  0.426
              300        1.35  0.32    0.32   0.443  0.459
              300        1.35  0.32    0.32   0.443  0.459
              300        1.35  0.32    0.32   0.443  0.459
              SoilCrop MaizeSoil: LL=[0.199, 0.222, 0.249, 0.294, 0.32, 0.382, 0.443]; KL=[0.08, 0.08, 0.07, 0.05, 0.03, 0.02, 0.01]; XF=[1, 1, 1, 1, 1, 1, 0]
              SoilCrop NavyBeanSoil: LL=[0.199, 0.222, 0.249, 0.294, 0.32, 0.32, 0.32]; KL=[0.07, 0.07, 0.07, 0.07, 0.07, 0.07, 0.04]; XF=[1, 1, 1, 1, 1, 1, 1]
              SoilCrop WeedSoil: LL=[0.199, 0.222, 0.249, 0.294, 0.32, 0.32, 0.32]; KL=[0.07, 0.07, 0.07, 0.07, 0.07, 0.07, 0.04]; XF=[1, 1, 1, 1, 1, 1, 1]
            Organic: FOMCNRatio=40
              Thickness  Carbon  SoilCNRatio  FBiom  FInert  FOM
              150        2       12.8         0.04   0.25    347.129
              150        1       12.8         0.02   0.5     270.344
              300        0.75    12.8         0.01   0.8     163.972
              300        0.5     12.8         0.01   0.99    99.4541
              300        0.5     12.8         0.01   0.99    60.322
              300        0.5     12.8         0.01   0.99    36.5871
              300        0.5     12.8         0.01   0.99    22.1912
            Chemical
              Thickness  NO3N       NH4N      PH
              150        0.42623    0.786885  5.35
              150        0.180527   0.33328   5.1
              300        0.0576752  0.106477  4.85
              300        0.0576752  0.106477  4.9
              300        0.0576752  0.106477  5.1
              300        0.0576752  0.106477  5.1
              300        0.0576752  0.106477  5.1
            CERESSoilTemperature Temperature
            Nutrient
          Plant Maize
          MicroClimate: a_interception=0; b_interception=1; c_interception=0; d_interception=0; SoilHeatFluxFraction=0.4; MinimumHeightDiffForNewLayer=0; NightInterceptionFraction=0.5; ReferenceHeight=2
          Manager SowingFertiliser
            Amount = 0
            CropName = maize
```csharp
using Models.PMF;
using Models.Core;
using System;
namespace Models
{
    [Serializable]
    public class Script : Model
    {
        [Link] Clock Clock;
        [Link] Fertiliser Fertiliser;
        [Link] Summary Summary;
        
        
        [Description("Amount of fertiliser to be applied (kg/ha)")]
        public double Amount { get; set; }
        
        [Description("Crop to be fertilised")]
        public string CropName { get; set; }
        
        
        

        [EventSubscribe("Sowing")]
        private void OnSowing(object sender, EventArgs e)
        {
            Model crop = sender as Model;
            if (crop.Name.ToLower() == CropName.ToLower())
                Fertiliser.Apply(Amount: Amount, Type: Fertiliser.Types.NO3N);
        }
        
    }
}
```
          Manager SowingRuleA
            StartDate = 15-sep
            EndDate = 15-oct
            MinESW = 30
            MinRain = 30
            RainDays = 3
            CultivarName = katumani
            SowingDepth = 30
            RowSpacing = 750
            Population = 5.3
            MustSow = True
```csharp
using Models.Interfaces;
using System;
using Models.Core;
using Models.PMF;
using Models.Soils;
using Models.Soils.Nutrients;
using Models.Utilities;
using APSIM.Shared.Utilities;
using Models.Climate;

namespace Models
{
    [Serializable]
    public class Script : Model
    {
        [Link] private Clock Clock;
        [Link] private Fertiliser Fertiliser;
        [Link] private Summary Summary;
        [Link] private Plant Maize;
        [Link] private Soil Soil;
        private Accumulator accumulatedRain;
        [Link]
        private ISoilWater waterBalance;
        
        [Description("Start of sowing window (d-mmm)")]
        public string StartDate { get; set; }
        [Description("End of sowing window (d-mmm)")]
        public string EndDate { get; set; }
        [Description("Minimum extractable soil water for sowing (mm)")]
        public double MinESW { get; set; }
        [Description("Accumulated rainfall required for sowing (mm)")]
        public double MinRain { get; set; }
        [Description("Duration of rainfall accumulation (d)")]
        public int RainDays { get; set; }
        [Description("Cultivar to be sown")]
        public string CultivarName { get; set; }
        [Description("Sowing depth (mm)")]
        public double SowingDepth { get; set; }
        [Description("Row spacing (mm)")]
        public double RowSpacing { get; set; }
        [Description("Plant population (/m2)")]
        public double Population { get; set; }
        [Description("Must sow at end of window (T/F)")]
        public bool MustSow{ get; set; }
        
        
        [EventSubscribe("StartOfSimulation")]
        private void OnSimulationCommencing(object sender, EventArgs e)
        {
            accumulatedRain = new Accumulator(this, "[Weather].Rain", RainDays);
        }
        

        [EventSubscribe("DoManagement")]
        private void OnDoManagement(object sender, EventArgs e)
        {
            accumulatedRain.Update();
            
            if ((DateUtilities.WithinDates(StartDate, Clock.Today, EndDate) &&
                Maize.IsAlive == false &&
                MathUtilities.Sum(waterBalance.ESW) > MinESW &&
                accumulatedRain.Sum > MinRain)
                || (DateUtilities.WithinDates(EndDate, Clock.Today, EndDate) && Maize.IsAlive == false && MustSow == true))
            {
                Maize.Sow(population: Population, cultivar: CultivarName, depth: SowingDepth, rowSpacing: RowSpacing);    
            }
        
        }
        
    }
}
```
          Manager SowingRuleB
            StartDate = 1-mar
            EndDate = 30-mar
            MinESW = 30
            MinRain = 30
            RainDays = 3
            CultivarName = katumani
            SowingDepth = 30
            RowSpacing = 750
            Population = 5.3
            MustSow = True
            script: same as in Sensibility Tests.Bugesera.Bugesera.Field.SowingRuleA
          Manager Harvesting
            RemoveFraction = 1
```csharp
using Models.PMF.Phen;
using APSIM.Shared.Utilities;
using System.Xml.Serialization;
using Models;
using Models.Surface;
using Models.PMF;
using Models.Soils;
using System.Text;
using System.Collections.Generic;
using Models.Core;
using System;
using Models.Soils.Nutrients;

namespace Models
{
    [Serializable] 
    public class Script : Model
    {
        [Link] private Plant Maize;
        [Link] private Zone zone;
        [Link] private SurfaceOrganicMatter SOM;
        [Link(Type = LinkType.Path, Path = "[Maize].Phenology")]
        private Phenology phenology;

        [Description("Fraction of resiudes to remove at harvest (0-1)")]
        public double RemoveFraction { get; set; }

    
        [EventSubscribe("DoManagement")]
        private void OnDoManagement(object sender, EventArgs e)
        {
            if (phenology.CurrentPhase.Name == "ReadyForHarvesting")
            {
                Maize.Harvest();
                Maize.EndCrop();
                if (RemoveFraction > 0)
                    SOM.Incorporate(RemoveFraction, 0.0);                
            }
        }
        
        [EventSubscribe("DoManagementCalculations")]
        private void OnDoManagementCalculations(object sender, EventArgs e)
        {
            
        }
    }
}
```
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